// SBML level 2 version 4
// dcterms:bibliographicCitation: urn:miriam:pubmed:34379640

function Function_for__J1(APC, CycD, d_deg, default_compartment, delta_d)
  d_deg*CycD*(APC + delta_d)/default_compartment;
end

function xi(x, alpha, r)
  1 + alpha*x*(x - 1)*(x - r);
end

function Function_for__J2(E2F, b_syn, default_compartment)
  b_syn*E2F/default_compartment;
end

function Function_for__J3(APC, CycB, b_deg, default_compartment, delta_b)
  b_deg*CycB*(APC + delta_b)/default_compartment;
end

function Function_for__J0(d_syn, default_compartment)
  d_syn/default_compartment;
end

model DeBoeck2021___Modular_approach_to_modeling_the_cell_cycle__5_ODE_model_with_3_bistable_switches()
  // DeBoeck2021 - Modular approach to modeling the cell cycle, 5 ODE model with 3 bistable switches
  // Model of the mammalian cell cycle as a chain of bistable switches. There are three bistable responses: response of E2F to Cyclin D, of Cdk1 to Cyclin B and of APC/C to Cdk1 activity. The model for the given parameters admits a complex limit cycle characterized by transitions through the bistable switches. The bistable responses are modeled directly using a functional motif, not through biochemical interactions. This modular approach allows to easily modify the properties of the bistable response curves. This version of the model correspond to Fig. 7 in the publication. We illustrated how, using this model, the system can be coupled to the circadian clock, by periodically modifying thresholds of one of the switches. We also illustrated how to implement the restriction point checkpoint using this model (those applications are not coded in the associated sbml file and can be seen in Fig. 8 of the publication). A related, simpler model that illustrates the bistable motif is MODEL2212060001
  // hasProperty mamo:MAMO_0000045
  // isDescribedBy doi:10.1371/journal.pcbi.1009008
  // occursIn ncit:C12508
  // isDescribedBy pubmed:34379640
  // hasProperty ncit:C19987 GO:0051301 GO:0007049 mamo:MAMO_0000045
  // biomodels.db:MODEL2212060002 biomodels.db:BIOMD0000001080

  // Compartments:
  compartment default_compartment = 1;  // SBO:0000410

  // Species:
  species CycD in default_compartment = 69.6;
  species CycB in default_compartment = 32.9;  // isVersionOf uniprot:P14635

  // Parameters:
  d_syn = 0.15;
  d_deg = 0.009;
  APC = 1e-12;  // isVersionOf GO:0005680
  delta_d = 0.05;
  b_syn = 0.03;
  E2F = 1e-12;  // isVersionOf uniprot:Q01094
  b_deg = 0.003;
  delta_b = 0.05;
  epsilon_e2f = 0.01;
  n = 15;
  K_cyc_e2f = 120;
  alpha_e2f = 5;
  r = 0.5;
  Cdk = 0.8;  // isVersionOf uniprot:P06493
  epsilon_cdk = 0.01;
  K_cyc_cdk = 40;
  alpha_cdk = 5;
  epsilon_apc = 0.01;
  K_cdk_apc = 20;
  alpha_apc = 5;

  // Assignment rules:
  Cdk_max := Cdk/44;
  CycD_max := CycD/185.74;
  CycB_max := CycB/45.92;
  APC_max := APC/0.999992;
  E2F_max := E2F/0.998646;

  // Rate rules:
  APC' = 1/epsilon_apc*(Cdk^n/((K_cdk_apc*xi(APC, alpha_apc, r))^n + Cdk^n) - APC);
  E2F' = 1/epsilon_e2f*(CycD^n/((K_cyc_e2f*xi(E2F, alpha_e2f, r))^n + CycD^n) - E2F);
  Cdk' = 1/epsilon_cdk*(CycB^n/((K_cyc_cdk*xi(Cdk/CycB, alpha_cdk, r))^n + CycB^n)*CycB - Cdk);

  // Reactions:
  _J0: -> CycD; default_compartment*Function_for__J0(d_syn, default_compartment); _J0 is "CycD_Synthesis";  // isVersionOf ncit:C61408
  _J1: CycD -> ; default_compartment*Function_for__J1(APC, CycD, d_deg, default_compartment, delta_d); _J1 is "CycD_degradation";  // isVersionOf SBO:0000179
  _J2: -> CycB; default_compartment*Function_for__J2(E2F, b_syn, default_compartment); _J2 is "CycB_synthesis";  // isVersionOf ncit:C61408
  _J3: CycB -> ; default_compartment*Function_for__J3(APC, CycB, b_deg, default_compartment, delta_b); _J3 is "CycB_degradation";  // isVersionOf SBO:0000179

  // Unit definitions:
  unit length = metre;
  unit area = metre^2;
  unit volume = litre;
  unit time = second;
  unit substance = mole;
end
