// SBML level 3 version 1
// dcterms:bibliographicCitation: http://identifiers.org/pubmed/18369435
// dcterms:bibliographicCitation: http://identifiers.org/doi/10.1371/journal.pcbi.1000045

model ChowHall2008_Dynamics_of_Human_Weight_Change_1()
  // ChowHall2008 Dynamics of Human Weight Change_ODE_1
  // This ODE model is a representation of the two compartment macronutrient partition model that Chow and Hall outlined in their 2008 publication. It is one of three models that they outlined in that publication. The model was constructed by a team of five as part of a Workshop on Modelling conducted at Indian Institute of Technology Madras by the EBI.
  // biomodels.db:MODEL1912050005 biomodels.db:BIOMD0000000901
  // hasProperty mamo:MAMO_0000046
  // hasProperty ncit:C92648
  // hasProperty efo:0004338
  // isPropertyOf BTO:0001489
  // hasTaxon taxonomy:9606
  // model units - substance: substance, time: time, volume: volume, area: area, length: length, extent: substance

  // Compartments:
  compartment Body = 1 volume;  // isVersionOf BTO:0001489; hasTaxon taxonomy:9606; hasTaxon taxonomy:9606

  // Species:
  species $Fat_Mass in Body = 50;  // isVersionOf ncit:C158256; isPropertyOf ncit:C81328; isPropertyOf ncit:C81328
  species $Lean_Mass in Body = 50;  // isVersionOf ncit:C71258; isPropertyOf ncit:C81328; isPropertyOf ncit:C81328
  species $Body_Mass in Body;  // isVersionOf ncit:C81328

  // Parameters:
  var p___Ratio; p___Ratio is "p - Ratio";
  rho_F = 39.5;
  rho_L = 7.6;
  Intake_Rate = 9.2;
  var Energy_Expenditure_Rate;

  // Assignment rules:
  alpha := rho_F/rho_L*(Fat_Mass/10.4);
  p___Ratio := 1/(1 + alpha);
  Body_Mass := Fat_Mass + Lean_Mass;
  Energy_Expenditure_Rate := 0.14*Lean_Mass + 0.05*Fat_Mass + 1.55;
  Psy := 0.05*(Fat_Mass - 0.4*exp(Lean_Mass/10.4))/Fat_Mass;

  // Rate rules:
  Fat_Mass' = ((1 - p___Ratio)*(Intake_Rate - Energy_Expenditure_Rate) - Psy)/rho_F;
  Lean_Mass' = (p___Ratio*(Intake_Rate - Energy_Expenditure_Rate) + Psy)/rho_L;

  // Events:
  Fat_Removal: at (time >= 100), t0=false, persistent=false, fromTrigger=false: Fat_Mass = Fat_Mass - 10;

  // Unit definitions:
  unit length = metre;
  unit area = metre^2;
  unit volume = 1e-3 litre;
  unit time = 86400 second;
  unit substance = 1e-3 mole;
end
