// SBML level 2 version 1

function GAMMAF(VV, theta, sigma)
  1/(1 + exp(-(VV - theta)/sigma));
end

model model_0000001()
  // Golomb2006_SomaticBursting
  // Model is according to the paper Contribution of Persistent Na+ Current and M-Type K+ Current to Somatic Bursting in CA1 Pyramidal Cell: Combined Experimental. Figure6Da has been reproduced by MathSBML. The original model from ModelDB. http://senselab.med.yale.edu/modeldb/
  // To the extent possible under law, all copyright and related or neighbouring rights to this encoded model have been dedicated to the public domain worldwide. Please refer to CC0 Public Domain Dedication for more information.
  // In summary, you are entitled to use this encoded model in absolutely any manner you deem suitable, verbatim, or with modification, alone or embedded it in a larger context, redistribute it, commercially or not, in a restricted way or not.
  // To cite BioModels Database, please use: Li C, Donizelli M, Rodriguez N, Dharuri H, Endler L, Chelliah V, Li L, He E, Henry A, Stefan MI, Snoep JL, Hucka M, Le Novère N, Laibe C (2010) BioModels Database: An enhanced, curated and annotated resource for published quantitative kinetic models. BMC Syst Biol., 4:92.
  // biomodels.db:MODEL1243247625
  // biomodels.db:BIOMD0000000118
  // isDescribedBy pubmed:16807352
  // hasTaxon taxonomy:10114
  // isVersionOf GO:0019227 GO:0005248 GO:0005249
  // hasProperty mamo:MAMO_0000046

  // Compartments:
  compartment compartment_0000001 = 1;  // isVersionOf GO:0005623

  // Parameters:
  Cm = 1;
  pms = 3;
  pns = 4;
  VNa = 55;
  t_tauh = -40.5;
  t_taun = -27;
  thetaa = -50;
  sigmaa = 20;
  thetab = -80;
  sigmab = -6;
  tauBs = 15;
  sigmam = 9.5;
  sigmah = -7;
  sigman = 10;
  sigmaz = 5;
  gNa = 35;
  gKdr = 6;
  gL = 0.05;
  Iapp = 0.661914;
  gA = 1.4;
  gNaP = 0.3;
  gZ = 1;
  thetaz = -39;
  tauZs = 75;
  phi = 10;
  thetah = -45;
  thetam = -30;
  thetan = -35;
  thetap = -47;
  sigmap = 3;
  VK = -90;
  VL = -70;
  zzs = 0.00141;
  bbs = 0.203517;
  nns = 0.02457;
  hhs = 0.98786;
  V = -71.81327; V is "VVs";

  // Assignment rules:
  Minfs := GAMMAF(V, thetam, sigmam);
  Pinfs := GAMMAF(V, thetap, sigmap);
  Ainfs := GAMMAF(V, thetaa, sigmaa);
  IA := gA*Ainfs^3*bbs*(V - VK);
  Iz := gZ*zzs*(V - VK);
  INa := gNa*Minfs^pms*hhs*(V - VNa);
  INaP := gNaP*Pinfs*(V - VNa);
  IKdr := gKdr*nns^pns*(V - VK);

  // Rate rules:
  zzs' = (GAMMAF(V, thetaz, sigmaz) - zzs)/tauZs;
  bbs' = (GAMMAF(V, thetab, sigmab) - bbs)/tauBs;
  hhs' = phi*(GAMMAF(V, thetah, sigmah) - hhs)/(1 + 7.5*GAMMAF(V, t_tauh, -6));
  V' = (-gL*(V - VL) - INa - INaP - IKdr - IA - Iz + Iapp)/Cm;
  nns' = phi*(GAMMAF(V, thetan, sigman) - nns)/(1 + 5*GAMMAF(V, t_taun, -15));

  // Unit definitions:
  unit time = 1e-3 second; time is "ms";
  unit mV = 1e-3 volt;
end
