// SBML level 2 version 4

model model_0000001()
  // Izhikevich2003_SpikingNeuron
  // The model is according to the paper Simple Model of Spiking Neurons In this paper, a simple spiking model is presented that is as biologically plausible as the Hodgkin-Huxley model, yet as computationally efficient as the integrate-and-fire model. Known types of neurons correspond to different values of the parameters a,b,c,d in the model. Figure2RS,IB,CH,FS,LTS have been simulated by MathSBML.
  // RS: a=0.02, b=0.2, c=-65, d=8.
  // IB: a=0.02,b=0.2,c=-55,d=4
  // CH: a=0.02,b=0.2,c=-50,d=2
  // FS:a=0.1b=0.2c=-65,d=2
  // LTS:a=0.02,b=0.25,c=-65,d=2
  // To the extent possible under law, all copyright and related or neighbouring rights to this encoded model have been dedicated to the public domain worldwide. Please refer to CC0 Public Domain Dedication for more information.
  // In summary, you are entitled to use this encoded model in absolutely any manner you deem suitable, verbatim, or with modification, alone or embedded it in a larger context, redistribute it, commercially or not, in a restricted way or not.
  // To cite BioModels Database, please use Le Novère N., Bornstein B., Broicher A., Courtot M., Donizelli M., Dharuri H., Li L., Sauro H., Schilstra M., Shapiro B., Snoep J.L., Hucka M. (2006) BioModels Database: A Free, Centralized Database of Curated, Published, Quantitative Kinetic Models of Biochemical and Cellular Systems Nucleic Acids Res., 34: D689-D691.
  // biomodels.db:MODEL4880479792
  // biomodels.db:BIOMD0000000127
  // isDescribedBy pubmed:18244602
  // hasTaxon taxonomy:40674
  // isVersionOf GO:0001508 GO:0042391 GO:0019228
  // hasProperty mamo:MAMO_0000046

  // Compartments:
  compartment cell = 1;  // isVersionOf GO:0005623

  // Parameters:
  a = 0.02;
  b = 0.2;
  c = -65;
  d = 8;
  Vthresh = 30;
  i = 0;
  v = -70;
  U = -14;

  // Rate rules:
  v' = 0.04*v^2 + 5*v + 140 - U + i;
  U' = a*(b*v - U);

  // Events:
  event_0000001: at (v > Vthresh): v = c, U = U + d;  // isVersionOf GO:0030322 GO:0060075
  Stimulus: at (time > 10): i = 10;  // isVersionOf GO:0050981

  // Unit definitions:
  unit time = 1e-3 second; time is "ms";
  unit mV = 1e-3 volt;
end
