// SBML level 3 version 1

model cell_cycle_v4_0_0rs()
  // hasProperty mamo:MAMO_0000046
  // isDescribedBy pubmed:38190398
  // model units - substance: substance, time: second, volume: volume, area: area, length: metre, extent: substance

  // Compartments:
  compartment Plm = 0.02 area;  // 2-D
  compartment Cyt = 1 volume;
  compartment Num = 0.009 area;  // 2-D
  compartment Nuc = 1 volume;

  // Species:
  substanceOnly species _Cyt__CCND in Cyt = 6.02e10;
  substanceOnly species _Cyt__CCNE_CDKN1A_B_ in Cyt = 3.756446e9;
  substanceOnly species _Cyt__E2F_DBD_RB1_Ser332u_ in Cyt = 812609.4;
  substanceOnly species _Cyt__E2F_DBD_RB1_Ser332p_ in Cyt = 36394.7;
  substanceOnly species _Cyt__CCNA_CDKN1A_B_ in Cyt = 26450.35;
  substanceOnly species _Cyt__CCNB_CDK1_Thr14_Tyr15u_CDKN1A_ in Cyt = 3.726494e8;
  substanceOnly species _Cyt__E2F_DBD_RB1_1_Ser332u__RB1_E2F_1_Ser807_Ser811u_ in Cyt = 3.455737e10;
  substanceOnly species _Cyt__E2F_DBD_RB1_1_Ser332p__RB1_E2F_1_Ser807_Ser811u_ in Cyt = 8913699;
  substanceOnly species _Cyt__RB1_E2F_Ser807_Ser811u_ in Cyt = 5.684342e10;
  substanceOnly species _Cyt__RB1_E2F_Ser807_Ser811p_ in Cyt = 178129.6;
  substanceOnly species _Cyt__PPP2R2B_ENSA_ARPP19_ in Cyt = 4.491824e9;
  substanceOnly species _Cyt__APC_FBXO5_FZR1_CDC20_Ser355u_ in Cyt = 3.009047e10;
  substanceOnly species _Cyt__CDC20_APC_ in Cyt = 1.047827e10;
  substanceOnly species _Cyt__APC_FBXO5_FZR1_CDC20_1_Ser355p__CDC20_APC_1_ in Cyt = 5.175058e9;
  substanceOnly species _Cyt__APC_FBXO5_FZR1_CDC20_Ser355p_ in Cyt = 1.09705e10;
  substanceOnly species _Cyt__APC_FBXO5_FZR1_CDC20_1_Ser355u__FZR1_APC_1_FBXO5_nTermu_ in Cyt = 1.752462e10;
  substanceOnly species _Cyt__FZR1_APC_FBXO5_nTermu_ in Cyt = 1.061368e9;
  substanceOnly species _Cyt__FZR1_APC_FBXO5_nTermp_ in Cyt = 5.509115e10;
  substanceOnly species _Cyt__APC_FBXO5_1_FZR1_CDC20_2_Ser355u__FBXO5_APC_1_FZR1_3_Ser182u__FZR1_APC_2_FBXO5_3_nTermu_ in Cyt = 5.98652e9;
  substanceOnly species _Cyt__FBXO5_APC_FZR1_Ser182u_ in Cyt = 1528853;
  substanceOnly species _Cyt__APC_FBXO5_1_FZR1_CDC20_2_Ser355p__FBXO5_APC_1_FZR1_3_Ser182u__FZR1_APC_2_FBXO5_3_nTermu_ in Cyt = 3.688639e8;
  substanceOnly species _Cyt__APC_FBXO5_FZR1_CDC20_1_Ser355p__FZR1_APC_1_FBXO5_nTermu_ in Cyt = 1.833908e10;
  substanceOnly species _Cyt__FBXO5_APC_FZR1_Ser182p_ in Cyt = 8.687065e9;
  substanceOnly species _Cyt__FOXM1_DBD_Thr600u_ in Cyt = 3.762294e7;
  substanceOnly species _Cyt__FOXM1_DBD_Thr600p_ in Cyt = 1.277897e11;
  substanceOnly species _Cyt__WEE1_Ser123u_ in Cyt = 7.437732e9;
  substanceOnly species _Cyt__CCNB_CDK1_Thr14_Tyr15p_CDKN1A_ in Cyt = 2.4193e9;
  substanceOnly species _Cyt__WEE1_Ser123p_ in Cyt = 6.52536e10;
  substanceOnly species _Cyt__CDC25_pSitesp_ in Cyt = 1.708774e11;
  substanceOnly species _Cyt__CDC25_pSitesu_ in Cyt = 2.898563e11;
  substanceOnly species _Cyt__MASTL_Thr198u_ in Cyt = 4.42648e11;
  substanceOnly species _Cyt__MASTL_Thr198p_ in Cyt = 1.233336e8;
  substanceOnly species _Cyt__ENSA_ARPP19_PPP2R2B_Ser62_Ser67u_ in Cyt = 5.097645e11;
  substanceOnly species _Cyt__ENSA_ARPP19_PPP2R2B_Ser62_Ser67p_ in Cyt = 1.327505e10;
  substanceOnly species _Cyt__ENSA_ARPP19_PPP2R2B_1_Ser62_Ser67p__PPP2R2B_ENSA_ARPP19_1_ in Cyt = 8.654516e8;
  substanceOnly species _Cyt__SKP2 in Cyt = 9.042216e8;
  substanceOnly species _Cyt__TP53_DBD_Ser15p_ in Cyt = 0;
  substanceOnly species _Cyt__FOXO_DBD_ in Cyt = 7.232825e9;
  substanceOnly species _Num__NUP_pSitesu_ in Num = 335.9914;
  substanceOnly species _Nuc__CCND in Nuc = 6.02e10;
  substanceOnly species _Nuc__CCNE_CDKN1A_B_ in Nuc = 4.128327e9;
  substanceOnly species _Nuc__E2F_DBD_RB1_Ser332u_ in Nuc = 2.435055e10;
  substanceOnly species _Nuc__E2F_DBD_RB1_Ser332p_ in Nuc = 7.485296e9;
  substanceOnly species _Nuc__CCNA_CDKN1A_B_ in Nuc = 5.830089e9;
  substanceOnly species _Nuc__CCNB_CDK1_Thr14_Tyr15u_CDKN1A_ in Nuc = 1.599345e9;
  substanceOnly species _Nuc__E2F_DBD_RB1_1_Ser332u__RB1_E2F_1_Ser807_Ser811u_ in Nuc = 5.271656e7;
  substanceOnly species _Nuc__E2F_DBD_RB1_1_Ser332p__RB1_E2F_1_Ser807_Ser811u_ in Nuc = 8.713676e9;
  substanceOnly species _Nuc__RB1_E2F_Ser807_Ser811u_ in Nuc = 2.648927e10;
  substanceOnly species _Nuc__RB1_E2F_Ser807_Ser811p_ in Nuc = 8.138942e10;
  substanceOnly species _Nuc__PPP2R2B_ENSA_ARPP19_ in Nuc = 1.667528e10;
  substanceOnly species _Nuc__APC_FBXO5_FZR1_CDC20_Ser355u_ in Nuc = 3.590466e10;
  substanceOnly species _Nuc__CDC20_APC_ in Nuc = 2.306983e10;
  substanceOnly species _Nuc__APC_FBXO5_FZR1_CDC20_1_Ser355p__CDC20_APC_1_ in Nuc = 5.99378e9;
  substanceOnly species _Nuc__APC_FBXO5_FZR1_CDC20_Ser355p_ in Nuc = 1.131766e8;
  substanceOnly species _Nuc__APC_FBXO5_FZR1_CDC20_1_Ser355u__FZR1_APC_1_FBXO5_nTermu_ in Nuc = 7.4297e10;
  substanceOnly species _Nuc__FZR1_APC_FBXO5_nTermu_ in Nuc = 2.283783e9;
  substanceOnly species _Nuc__FZR1_APC_FBXO5_nTermp_ in Nuc = 8.081338e10;
  substanceOnly species _Nuc__APC_FBXO5_1_FZR1_CDC20_2_Ser355u__FBXO5_APC_1_FZR1_3_Ser182u__FZR1_APC_2_FBXO5_3_nTermu_ in Nuc = 1.664992e10;
  substanceOnly species _Nuc__FBXO5_APC_FZR1_Ser182u_ in Nuc = 2.218976e8;
  substanceOnly species _Nuc__APC_FBXO5_1_FZR1_CDC20_2_Ser355p__FBXO5_APC_1_FZR1_3_Ser182u__FZR1_APC_2_FBXO5_3_nTermu_ in Nuc = 8.647046e8;
  substanceOnly species _Nuc__APC_FBXO5_FZR1_CDC20_1_Ser355p__FZR1_APC_1_FBXO5_nTermu_ in Nuc = 1.21185e10;
  substanceOnly species _Nuc__FBXO5_APC_FZR1_Ser182p_ in Nuc = 9394230;
  substanceOnly species _Nuc__FOXM1_DBD_Thr600u_ in Nuc = 4.738573e11;
  substanceOnly species _Nuc__FOXM1_DBD_Thr600p_ in Nuc = 3.117398e9;
  substanceOnly species _Nuc__CCNB_promoter_FOXM1_1__FOXM1_DBD_1_Thr600p_ in Nuc = 0;
  substanceOnly species _Nuc__CCNB_promoter_FOXM1_ in Nuc = 6022000;
  substanceOnly species _Nuc__CDC20_promoter_FOXM1_ in Nuc = 6022000;
  substanceOnly species _Nuc__CDC20_promoter_FOXM1_1__FOXM1_DBD_1_Thr600p_ in Nuc = 0;
  substanceOnly species _Nuc__WEE1_Ser123u_ in Nuc = 5.895778e11;
  substanceOnly species _Nuc__CCNB_CDK1_Thr14_Tyr15p_CDKN1A_ in Nuc = 2.150738e10;
  substanceOnly species _Nuc__WEE1_Ser123p_ in Nuc = 8.877598e9;
  substanceOnly species _Nuc__CDC25_pSitesp_ in Nuc = 2.917165e11;
  substanceOnly species _Nuc__CDC25_pSitesu_ in Nuc = 5.114559e11;
  substanceOnly species _Nuc__MASTL_Thr198u_ in Nuc = 7.461384e11;
  substanceOnly species _Nuc__MASTL_Thr198p_ in Nuc = 1.802091e7;
  substanceOnly species _Nuc__ENSA_ARPP19_PPP2R2B_Ser62_Ser67u_ in Nuc = 3.697299e11;
  substanceOnly species _Nuc__ENSA_ARPP19_PPP2R2B_Ser62_Ser67p_ in Nuc = 96891.62;
  substanceOnly species _Nuc__ENSA_ARPP19_PPP2R2B_1_Ser62_Ser67p__PPP2R2B_ENSA_ARPP19_1_ in Nuc = 1.227249e10;
  substanceOnly species _Nuc__CCNE_promoter_E2F_ in Nuc = 6022000;
  substanceOnly species _Nuc__CCNA_promoter_E2F_ in Nuc = 6022000;
  substanceOnly species _Nuc__E2F_promoter_E2F_ in Nuc = 6022000;
  substanceOnly species _Nuc__FBXO5_promoter_E2F_ in Nuc = 6022000;
  substanceOnly species _Nuc__FOXM1_promoter_E2F_ in Nuc = 6022000;
  substanceOnly species _Nuc__CCNE_promoter_E2F_1__E2F_DBD_1_RB1_Ser332u_ in Nuc = 0;
  substanceOnly species _Nuc__CCNA_promoter_E2F_1__E2F_DBD_1_RB1_Ser332u_ in Nuc = 0;
  substanceOnly species _Nuc__E2F_DBD_1_RB1_Ser332u__E2F_promoter_E2F_1_ in Nuc = 0;
  substanceOnly species _Nuc__E2F_DBD_1_RB1_Ser332u__FBXO5_promoter_E2F_1_ in Nuc = 0;
  substanceOnly species _Nuc__E2F_DBD_1_RB1_Ser332u__FOXM1_promoter_E2F_1_ in Nuc = 0;
  substanceOnly species _Nuc__CCNE_promoter_E2F_1__E2F_DBD_1_RB1_Ser332p_ in Nuc = 0;
  substanceOnly species _Nuc__CCNA_promoter_E2F_1__E2F_DBD_1_RB1_Ser332p_ in Nuc = 0;
  substanceOnly species _Nuc__E2F_DBD_1_RB1_Ser332p__E2F_promoter_E2F_1_ in Nuc = 0;
  substanceOnly species _Nuc__E2F_DBD_1_RB1_Ser332p__FBXO5_promoter_E2F_1_ in Nuc = 0;
  substanceOnly species _Nuc__E2F_DBD_1_RB1_Ser332p__FOXM1_promoter_E2F_1_ in Nuc = 0;
  substanceOnly species _Nuc__SKP2 in Nuc = 4.13724e10;
  substanceOnly species _Nuc__TP53_DBD_Ser15p_ in Nuc = 0;
  substanceOnly species _Nuc__CDKN1A_promoter_TP53_ in Nuc = 6022000;
  substanceOnly species _Nuc__FOXO_DBD_ in Nuc = 6.173059e9;
  substanceOnly species _Nuc__CDKN1B_promoter_FOXO_ in Nuc = 6022000;
  substanceOnly species _Nuc__CDKN1A_promoter_TP53_1__TP53_DBD_1_Ser15p_ in Nuc = 0;
  substanceOnly species _Cyt__CDKN1A_CCNE_A_B_Ser130u_ in Cyt = 281884.1;
  substanceOnly species _Nuc__CDKN1B_promoter_FOXO_1__FOXO_DBD_1_ in Nuc = 0;
  substanceOnly species _Cyt__CDKN1B_CCNE_A_Thr187u_ in Cyt = 2.644755e8;
  substanceOnly species _Cyt__CCNA_CDKN1A_B_1__CDKN1A_CCNE_A_B_1_Ser130u_ in Cyt = 61459.07;
  substanceOnly species _Cyt__CCNE_CDKN1A_B_1__CDKN1A_CCNE_A_B_1_Ser130u_ in Cyt = 1.074844e9;
  substanceOnly species _Cyt__CCNB_CDK1_Thr14_Tyr15u_CDKN1A_1__CDKN1A_CCNE_A_B_1_Ser130u_ in Cyt = 5.71834e9;
  substanceOnly species _Cyt__CCNB_CDK1_Thr14_Tyr15p_CDKN1A_1__CDKN1A_CCNE_A_B_1_Ser130u_ in Cyt = 186434.2;
  substanceOnly species _Cyt__CDKN1A_CCNE_A_B_Ser130p_ in Cyt = 2624.557;
  substanceOnly species _Cyt__CCNA_CDKN1A_B_1__CDKN1B_CCNE_A_1_Thr187u_ in Cyt = 25326.17;
  substanceOnly species _Cyt__CCNE_CDKN1A_B_1__CDKN1B_CCNE_A_1_Thr187u_ in Cyt = 5020.973;
  substanceOnly species _Cyt__CDKN1B_CCNE_A_Thr187p_ in Cyt = 4.547946;
  substanceOnly species _Nuc__CDKN1A_CCNE_A_B_Ser130u_ in Nuc = 4747.631;
  substanceOnly species _Nuc__CDKN1B_CCNE_A_Thr187u_ in Nuc = 5.66733e8;
  substanceOnly species _Nuc__CCNA_CDKN1A_B_1__CDKN1A_CCNE_A_B_1_Ser130u_ in Nuc = 8.490025e9;
  substanceOnly species _Nuc__CCNE_CDKN1A_B_1__CDKN1A_CCNE_A_B_1_Ser130u_ in Nuc = 4.332312e10;
  substanceOnly species _Nuc__CCNB_CDK1_Thr14_Tyr15u_CDKN1A_1__CDKN1A_CCNE_A_B_1_Ser130u_ in Nuc = 3.466769e10;
  substanceOnly species _Nuc__CCNB_CDK1_Thr14_Tyr15p_CDKN1A_1__CDKN1A_CCNE_A_B_1_Ser130u_ in Nuc = 2.161528e10;
  substanceOnly species _Nuc__CDKN1A_CCNE_A_B_Ser130p_ in Nuc = 1.151453e9;
  substanceOnly species _Cyt__CCNA_CDKN1A_B_1__CDKN1B_CCNE_A_1_Thr187p_ in Cyt = 0;
  substanceOnly species _Nuc__CCNA_CDKN1A_B_1__CDKN1B_CCNE_A_1_Thr187u_ in Nuc = 17.76994;
  substanceOnly species _Cyt__CCNE_CDKN1A_B_1__CDKN1B_CCNE_A_1_Thr187p_ in Cyt = 171438;
  substanceOnly species _Nuc__CCNE_CDKN1A_B_1__CDKN1B_CCNE_A_1_Thr187u_ in Nuc = 27347.64;
  substanceOnly species _Nuc__CDKN1B_CCNE_A_Thr187p_ in Nuc = 5.994921e9;
  substanceOnly species _Nuc__CCNA_CDKN1A_B_1__CDKN1B_CCNE_A_1_Thr187p_ in Nuc = 12.73977;
  substanceOnly species _Nuc__CCNE_CDKN1A_B_1__CDKN1B_CCNE_A_1_Thr187p_ in Nuc = 18.04075;

  // Parameters:
  kPhRbD = 1.963162e-14;
  kPhRbE = 1.855665e-13;
  kDpRb = 0.002405223;
  kPhRb = 2.80046e-14;
  kSyCe1 = 7712093;
  kSyCe2 = 3.176642;
  kDeCe = 0.0006862304;
  kDiE2fRb = 0.001259035;
  kAsE2fRb = 5.110641e-13;
  kSyE2f1 = 1964125;
  kSyE2f2 = 14.1927;
  kDeE2f1 = 0.0006936189;
  kDeE2f2 = 1.891737e-19;
  kPhE2f = 2.569418e-12;
  kDpE2f2 = 8.204728e-13;
  kSyEmi1 = 1317275;
  kSyEmi2 = 4.023428;
  kDeEmi1 = 1.642975e-5;
  kDeEmi2 = 3.498129e-5;
  kDeEmi3 = 0.005538575;
  kPhEmiA = 8.974722e-19;
  kPhEmiB = 6.02416e-14;
  kDpEmi = 2.174192e-6;
  kSyCa1 = 607075.3;
  kSyCa2 = 0.225882;
  kDeCa1 = 1.074699e-10;
  kDeCa2 = 6.848879e-13;
  kDeCa3 = 1.236044e-17;
  kDpCdh = 0.008890013;
  kPhCdhA = 2.894272e-14;
  kPhCdhE = 8.289961e-20;
  kPhCdhB = 2.116438e-20;
  kDiACE = 0.009196941;
  kAsACE = 6.104496e-10;
  kDiACdh = 4.079218e-7;
  kAsACdh = 1.067014e-10;
  kPhCeA = 7.754793e-20;
  kPhCeE = 8.29217e-20;
  kPhFoxE = 4.990847e-16;
  kPhFoxA = 3.780043e-15;
  kPhFoxB = 5.206589e-14;
  kDpFox = 1.221067e-8;
  kSyCb1 = 3336037;
  kSyCb2 = 9.843245;
  kDeCb1 = 3.102561e-6;
  kDeCb2 = 8.857281e-15;
  kDeCb3 = 3.660365e-15;
  kPhEnsa = 4.380258e-14;
  kDpEnsa = 0.003234241;
  kPhGw = 9.220941e-13;
  kDpGw1 = 0.009615513;
  kDpGw2 = 6.669202e-13;
  kWee1 = 1.67731e-21;
  kWee2 = 1.302346e-12;
  kPhWeeA = 1.84607e-14;
  kPhWeeB = 4.60588e-13;
  kDpWee = 1.094063e-11;
  kCdc25_1 = 8.650891e-15;
  kCdc25_2 = 8.398921e-14;
  kDpCdc25 = 5.131931e-12;
  kDipEB55 = 0.0006732603;
  kAspEB55 = 1.539339e-11;
  kSyCdc_1 = 260294.1;
  kSyCdc_2 = 0.07961353;
  kDeCdc_1 = 8.104549e-6;
  kDeCdc_2 = 5.784507e-21;
  kDipACdc = 0.8129101;
  kAspACdc = 1.055893e-9;
  kPhApcA = 2.59935e-13;
  kDpApc_1 = 0;
  kDpApc_2 = 5.564388e-12;
  kSyFox1 = 473802.8;
  kSyFox2 = 1.251173;
  kDeFox1 = 1.21368e-7;
  kDeFox2 = 7.971935e-13;
  kAsEPx = 8.087667e-12;
  kDiEPx = 0.03615545;
  kAsFPcb = 9.442581e-12;
  kDiFPcb = 0.2102095;
  kAsFPcdc = 5.283885e-11;
  kDiFPcdc = 0.2942635;
  kPhC25B = 1.199155e-14;
  kPhCAEE = 5.963642e-17;
  kPhCAEA = 2.300347e-14;
  kPhCAEB = 2.306277e-11;
  kDpE2f1 = 0;
  kPhC25A = 0;
  kSySkp2 = 1.303761e7;
  kDeSkp2_1 = 0.0001851815;
  kDeSkp2_2 = 5.675082e-13;
  kAsTP53PCDKN1A = 2.058768e-12;
  kDiTP53PCDKN1A = 1.481277;
  kSyCDKN1A_1 = 1.188196e8;
  kSyCDKN1A_2 = 0.3671393;
  kDeCDKN1A_1 = 0.001037873;
  kDeCDKN1A_2 = 4.658277e-15;
  kAsCdkn1aC = 7.760842e-13;
  kDiCdkn1aC = 4.521347e-10;
  kPhCDKN1AByCe = 2.135007e-14;
  kPhCDKN1AByCa = 9.244118e-15;
  kPhCDKN1AByCb = 1.078276e-13;
  kDpCDKN1A = 0.00282592;
  kAsFOXOPCDKN1B = 4.354807e-11;
  kDiFOXOPCDKN1B = 0.0020376;
  kSyCDKN1B_1 = 1826525;
  kSyCDKN1B_2 = 1.235322;
  kDeCDKN1B_1 = 0.001331691;
  kDeCDKN1B_2 = 3.038629e-14;
  kAsCdkn1bC = 6.416538e-14;
  kDiCdkn1bC = 0.001670601;
  kPhCDKN1BByCe = 7.156821e-15;
  kPhCDKN1BByCa = 1.071025e-8;
  kPhCDKN1BByCb = 5.824005e-16;
  kDpCDKN1B = 0.1019196;
  kPhNup = 49.817336;
  kDpNup_1 = 2;
  kImImCCND_1 = 0.0002705577;
  kExImCCND_1 = 0.016605779;
  kImImCCNE_CDKN1A_B__1 = 0.122128;
  kExImCCNE_CDKN1A_B__1 = 0.016605779;
  kImImE2F_DBD_RB1_Ser332u__1 = 0.01626321;
  kExImE2F_DBD_RB1_Ser332u__1 = 0.016605779;
  kImImE2F_DBD_RB1_Ser332p__1 = 0.03520216;
  kExImE2F_DBD_RB1_Ser332p__1 = 0.016605779;
  kImImCCNA_CDKN1A_B__1 = 1.089767;
  kExImCCNA_CDKN1A_B__1 = 0.016605779;
  kImImCCNB_CDK1_Thr14_Tyr15u_CDKN1A__1 = 0.03781467;
  kExImCCNB_CDK1_Thr14_Tyr15u_CDKN1A__1 = 0.016605779;
  kImImE2F_DBD_RB11_Ser332u__RB1_E2F1_Ser807_Ser811u__1 = 0.02294916;
  kExImE2F_DBD_RB11_Ser332u__RB1_E2F1_Ser807_Ser811u__1 = 0.016605779;
  kImImE2F_DBD_RB11_Ser332p__RB1_E2F1_Ser807_Ser811u__1 = 0.05140312;
  kExImE2F_DBD_RB11_Ser332p__RB1_E2F1_Ser807_Ser811u__1 = 0.016605779;
  kImImRB1_E2F_Ser807_Ser811u__1 = 0.005618108;
  kExImRB1_E2F_Ser807_Ser811u__1 = 0.016605779;
  kImImRB1_E2F_Ser807_Ser811p__1 = 62.50368;
  kExImRB1_E2F_Ser807_Ser811p__1 = 0.016605779;
  kImImPPP2R2B_ENSA_ARPP19__1 = 2.069759;
  kExImPPP2R2B_ENSA_ARPP19__1 = 0.016605779;
  kImImAPC_FBXO5_FZR1_CDC20_Ser355u__1 = 0.08788103;
  kExImAPC_FBXO5_FZR1_CDC20_Ser355u__1 = 0.016605779;
  kImImCDC20_APC__1 = 0.2086779;
  kExImCDC20_APC__1 = 0.016605779;
  kImImAPC_FBXO5_FZR1_CDC201_Ser355p__CDC20_APC1__1 = 0.003609828;
  kExImAPC_FBXO5_FZR1_CDC201_Ser355p__CDC20_APC1__1 = 0.016605779;
  kImImAPC_FBXO5_FZR1_CDC20_Ser355p__1 = 0.003355541;
  kExImAPC_FBXO5_FZR1_CDC20_Ser355p__1 = 0.016605779;
  kImImAPC_FBXO5_FZR1_CDC201_Ser355u__FZR1_APC1_FBXO5_nTermu__1 = 1.937932e-8;
  kExImAPC_FBXO5_FZR1_CDC201_Ser355u__FZR1_APC1_FBXO5_nTermu__1 = 0.016605779;
  kImImFZR1_APC_FBXO5_nTermu__1 = 0.007335432;
  kExImFZR1_APC_FBXO5_nTermu__1 = 0.016605779;
  kImImFZR1_APC_FBXO5_nTermp__1 = 1.722176e-6;
  kExImFZR1_APC_FBXO5_nTermp__1 = 0.016605779;
  kImImAPC_FBXO51_FZR1_CDC202_Ser355u__FBXO5_APC1_FZR13_Ser182u__FZR1_APC2_FBXO53_nTermu__1 = 0.002473524;
  kExImAPC_FBXO51_FZR1_CDC202_Ser355u__FBXO5_APC1_FZR13_Ser182u__FZR1_APC2_FBXO53_nTermu__1 = 0.016605779;
  kImImFBXO5_APC_FZR1_Ser182u__1 = 5.237697e-8;
  kExImFBXO5_APC_FZR1_Ser182u__1 = 0.016605779;
  kImImAPC_FBXO51_FZR1_CDC202_Ser355p__FBXO5_APC1_FZR13_Ser182u__FZR1_APC2_FBXO53_nTermu__1 = 124107.7;
  kExImAPC_FBXO51_FZR1_CDC202_Ser355p__FBXO5_APC1_FZR13_Ser182u__FZR1_APC2_FBXO53_nTermu__1 = 0.016605779;
  kImImAPC_FBXO5_FZR1_CDC201_Ser355p__FZR1_APC1_FBXO5_nTermu__1 = 1.711054e-7;
  kExImAPC_FBXO5_FZR1_CDC201_Ser355p__FZR1_APC1_FBXO5_nTermu__1 = 0.016605779;
  kImImFBXO5_APC_FZR1_Ser182p__1 = 0.004088616;
  kExImFBXO5_APC_FZR1_Ser182p__1 = 0.016605779;
  kImImFOXM1_DBD_Thr600u__1 = 0.001965284;
  kExImFOXM1_DBD_Thr600u__1 = 0.016605779;
  kImImFOXM1_DBD_Thr600p__1 = 0.002472767;
  kExImFOXM1_DBD_Thr600p__1 = 0.016605779;
  kImImWEE1_Ser123u__1 = 0.001981796;
  kExImWEE1_Ser123u__1 = 0.016605779;
  kImImCCNB_CDK1_Thr14_Tyr15p_CDKN1A__1 = 0.02982454;
  kExImCCNB_CDK1_Thr14_Tyr15p_CDKN1A__1 = 0.016605779;
  kImImWEE1_Ser123p__1 = 0.0139369;
  kExImWEE1_Ser123p__1 = 0.016605779;
  kImImCDC25_pSitesp__1 = 0.0800825;
  kExImCDC25_pSitesp__1 = 0.016605779;
  kImImCDC25_pSitesu__1 = 0.001833048;
  kExImCDC25_pSitesu__1 = 0.016605779;
  kImImMASTL_Thr198u__1 = 0.3303074;
  kExImMASTL_Thr198u__1 = 0.016605779;
  kImImMASTL_Thr198p__1 = 0.02220865;
  kExImMASTL_Thr198p__1 = 0.016605779;
  kImImENSA_ARPP19_PPP2R2B_Ser62_Ser67u__1 = 0.001596085;
  kExImENSA_ARPP19_PPP2R2B_Ser62_Ser67u__1 = 0.016605779;
  kImImENSA_ARPP19_PPP2R2B_Ser62_Ser67p__1 = 0.0004651318;
  kExImENSA_ARPP19_PPP2R2B_Ser62_Ser67p__1 = 0.016605779;
  kImImENSA_ARPP19_PPP2R2B1_Ser62_Ser67p__PPP2R2B_ENSA_ARPP191__1 = 0.00449523;
  kExImENSA_ARPP19_PPP2R2B1_Ser62_Ser67p__PPP2R2B_ENSA_ARPP191__1 = 0.016605779;
  kImImSKP2_1 = 2.402388;
  kExImSKP2_1 = 0.016605779;
  kImImTP53_DBD_Ser15p__1 = 162.789;
  kExImTP53_DBD_Ser15p__1 = 0.016605779;
  kImImFOXO_DBD__1 = 0.001128416;
  kExImFOXO_DBD__1 = 0.016605779;
  kImImCDKN1A_CCNE_A_B_Ser130u__1 = 2.021558;
  kExImCDKN1A_CCNE_A_B_Ser130u__1 = 0.016605779;
  kImImCDKN1B_CCNE_A_Thr187u__1 = 0.04020259;
  kExImCDKN1B_CCNE_A_Thr187u__1 = 0.016605779;
  kImImCCNA_CDKN1A_B1__CDKN1A_CCNE_A_B1_Ser130u__1 = 7992425;
  kExImCCNA_CDKN1A_B1__CDKN1A_CCNE_A_B1_Ser130u__1 = 0.016605779;
  kImImCCNE_CDKN1A_B1__CDKN1A_CCNE_A_B1_Ser130u__1 = 0.1025761;
  kExImCCNE_CDKN1A_B1__CDKN1A_CCNE_A_B1_Ser130u__1 = 0.016605779;
  kImImCCNB_CDK1_Thr14_Tyr15u_CDKN1A1__CDKN1A_CCNE_A_B1_Ser130u__1 = 1.230152e-5;
  kExImCCNB_CDK1_Thr14_Tyr15u_CDKN1A1__CDKN1A_CCNE_A_B1_Ser130u__1 = 0.016605779;
  kImImCCNB_CDK1_Thr14_Tyr15p_CDKN1A1__CDKN1A_CCNE_A_B1_Ser130u__1 = 3.784786;
  kExImCCNB_CDK1_Thr14_Tyr15p_CDKN1A1__CDKN1A_CCNE_A_B1_Ser130u__1 = 0.016605779;
  kImImCDKN1A_CCNE_A_B_Ser130p__1 = 0.08201017;
  kExImCDKN1A_CCNE_A_B_Ser130p__1 = 0.016605779;
  kImImCCNA_CDKN1A_B1__CDKN1B_CCNE_A1_Thr187u__1 = 2.130696e-7;
  kExImCCNA_CDKN1A_B1__CDKN1B_CCNE_A1_Thr187u__1 = 0.016605779;
  kImImCCNE_CDKN1A_B1__CDKN1B_CCNE_A1_Thr187u__1 = 0.9449047;
  kExImCCNE_CDKN1A_B1__CDKN1B_CCNE_A1_Thr187u__1 = 0.016605779;
  kImImCDKN1B_CCNE_A_Thr187p__1 = 1.835278;
  kExImCDKN1B_CCNE_A_Thr187p__1 = 0.016605779;
  kImImCCNA_CDKN1A_B1__CDKN1B_CCNE_A1_Thr187p__1 = 1.078781;
  kExImCCNA_CDKN1A_B1__CDKN1B_CCNE_A1_Thr187p__1 = 0.016605779;
  kImImCCNE_CDKN1A_B1__CDKN1B_CCNE_A1_Thr187p__1 = 0.001659903;
  kExImCCNE_CDKN1A_B1__CDKN1B_CCNE_A1_Thr187p__1 = 0.016605779;
  kIm_2 = 0.16605779;
  kEx_2 = 0.16605779;
  _InitialConc1 = 6.022e10;
  _InitialConc2 = 1.3986043e10;
  _InitialConc3 = 1112806800;
  _InitialConc4 = 2.2932894e6;
  _InitialConc5 = 423255970;
  _InitialConc6 = 113355900;
  _InitialConc7 = 4.3034014e9;
  _InitialConc8 = 9065434;
  _InitialConc9 = 5.2778426e9;
  _InitialConc10 = 5.0629691e10;
  _InitialConc11 = 4.6484797e9;
  _InitialConc12 = 2.4260911e11;
  _InitialConc13 = 1.3847757e10;
  _InitialConc14 = 4.2087805e9;
  _InitialConc15 = 3.7993439e9;
  _InitialConc16 = 4.2969631e10;
  _InitialConc17 = 34406152;
  _InitialConc18 = 9.7028319e9;
  _InitialConc19 = 6.5604459e9;
  _InitialConc20 = 43226888;
  _InitialConc21 = 133239590;
  _InitialConc22 = 819445660;
  _InitialConc23 = 1.1324333e6;
  _InitialConc24 = 335108260;
  _InitialConc25 = 22950816;
  _InitialConc26 = 5.9042195e10;
  _InitialConc27 = 452427730;
  _InitialConc28 = 1177804900;
  _InitialConc29 = 1110340400;
  _InitialConc30 = 5.910966e10;
  _InitialConc31 = 6.0070998e10;
  _InitialConc32 = 149002040;
  _InitialConc33 = 4.9793694e10;
  _InitialConc34 = 19785953;
  _InitialConc35 = 1.040652e10;
  _InitialConc36 = 6.022e10;
  _InitialConc37 = 0;
  _InitialConc38 = 6.022e10;
  _InitialConc39 = 298.089;
  _InitialConc40 = 6.022e10;
  _InitialConc41 = 1.3986043e10;
  _InitialConc42 = 1112806800;
  _InitialConc43 = 2.2932894e6;
  _InitialConc44 = 423255970;
  _InitialConc45 = 113355900;
  _InitialConc46 = 4.3034014e9;
  _InitialConc47 = 9065434;
  _InitialConc48 = 5.2778426e9;
  _InitialConc49 = 5.0629691e10;
  _InitialConc50 = 4.6484797e9;
  _InitialConc51 = 2.4260911e11;
  _InitialConc52 = 1.3847757e10;
  _InitialConc53 = 4.2087805e9;
  _InitialConc54 = 3.7993439e9;
  _InitialConc55 = 4.2969631e10;
  _InitialConc56 = 34406152;
  _InitialConc57 = 9.7028319e9;
  _InitialConc58 = 6.5604459e9;
  _InitialConc59 = 43226888;
  _InitialConc60 = 133239590;
  _InitialConc61 = 819445660;
  _InitialConc62 = 1.1324333e6;
  _InitialConc63 = 335108260;
  _InitialConc64 = 22950816;
  _InitialConc65 = 1.1461427e4;
  _InitialConc66 = 6.0105386e6;
  _InitialConc67 = 6.0174121e6;
  _InitialConc68 = 4587.8816;
  _InitialConc69 = 5.9042195e10;
  _InitialConc70 = 452427730;
  _InitialConc71 = 1177804900;
  _InitialConc72 = 1110340400;
  _InitialConc73 = 5.910966e10;
  _InitialConc74 = 6.0070998e10;
  _InitialConc75 = 149002040;
  _InitialConc76 = 4.9793694e10;
  _InitialConc77 = 19785953;
  _InitialConc78 = 1.040652e10;
  _InitialConc79 = 5.0873268e6;
  _InitialConc80 = 5.0873268e6;
  _InitialConc81 = 5.0873268e6;
  _InitialConc82 = 5.0873268e6;
  _InitialConc83 = 5.0873268e6;
  _InitialConc84 = 9.3467317e5;
  _InitialConc85 = 9.3467317e5;
  _InitialConc86 = 9.3467317e5;
  _InitialConc87 = 9.3467317e5;
  _InitialConc88 = 9.3467317e5;
  _InitialConc89 = 0;
  _InitialConc90 = 0;
  _InitialConc91 = 0;
  _InitialConc92 = 0;
  _InitialConc93 = 0;
  _InitialConc94 = 6.022e10;
  _InitialConc95 = 0;
  _InitialConc96 = 6022000;
  _InitialConc97 = 6.022e10;
  _InitialConc98 = 6022000;
  _rateLaw1 = 0;

  // Assignment rules:
  tCCNE := _Cyt__CCNE_CDKN1A_B_ + _Nuc__CCNE_CDKN1A_B_ + _Cyt__CCNE_CDKN1A_B_1__CDKN1A_CCNE_A_B_1_Ser130u_ + _Cyt__CCNE_CDKN1A_B_1__CDKN1B_CCNE_A_1_Thr187u_ + _Nuc__CCNE_CDKN1A_B_1__CDKN1A_CCNE_A_B_1_Ser130u_ + _Cyt__CCNE_CDKN1A_B_1__CDKN1B_CCNE_A_1_Thr187p_ + _Nuc__CCNE_CDKN1A_B_1__CDKN1B_CCNE_A_1_Thr187u_ + _Nuc__CCNE_CDKN1A_B_1__CDKN1B_CCNE_A_1_Thr187p_;
  tCCNA := _Cyt__CCNA_CDKN1A_B_ + _Nuc__CCNA_CDKN1A_B_ + _Cyt__CCNA_CDKN1A_B_1__CDKN1A_CCNE_A_B_1_Ser130u_ + _Cyt__CCNA_CDKN1A_B_1__CDKN1B_CCNE_A_1_Thr187u_ + _Nuc__CCNA_CDKN1A_B_1__CDKN1A_CCNE_A_B_1_Ser130u_ + _Cyt__CCNA_CDKN1A_B_1__CDKN1B_CCNE_A_1_Thr187p_ + _Nuc__CCNA_CDKN1A_B_1__CDKN1B_CCNE_A_1_Thr187u_ + _Nuc__CCNA_CDKN1A_B_1__CDKN1B_CCNE_A_1_Thr187p_;
  tCCNB := _Cyt__CCNB_CDK1_Thr14_Tyr15u_CDKN1A_ + _Cyt__CCNB_CDK1_Thr14_Tyr15p_CDKN1A_ + _Nuc__CCNB_CDK1_Thr14_Tyr15u_CDKN1A_ + _Nuc__CCNB_CDK1_Thr14_Tyr15p_CDKN1A_ + _Cyt__CCNB_CDK1_Thr14_Tyr15u_CDKN1A_1__CDKN1A_CCNE_A_B_1_Ser130u_ + _Cyt__CCNB_CDK1_Thr14_Tyr15p_CDKN1A_1__CDKN1A_CCNE_A_B_1_Ser130u_ + _Nuc__CCNB_CDK1_Thr14_Tyr15u_CDKN1A_1__CDKN1A_CCNE_A_B_1_Ser130u_ + _Nuc__CCNB_CDK1_Thr14_Tyr15p_CDKN1A_1__CDKN1A_CCNE_A_B_1_Ser130u_;
  tCDKN1A := _Cyt__CDKN1A_CCNE_A_B_Ser130u_ + _Cyt__CCNA_CDKN1A_B_1__CDKN1A_CCNE_A_B_1_Ser130u_ + _Cyt__CCNE_CDKN1A_B_1__CDKN1A_CCNE_A_B_1_Ser130u_ + _Cyt__CCNB_CDK1_Thr14_Tyr15u_CDKN1A_1__CDKN1A_CCNE_A_B_1_Ser130u_ + _Cyt__CCNB_CDK1_Thr14_Tyr15p_CDKN1A_1__CDKN1A_CCNE_A_B_1_Ser130u_ + _Cyt__CDKN1A_CCNE_A_B_Ser130p_ + _Nuc__CDKN1A_CCNE_A_B_Ser130u_ + _Nuc__CCNA_CDKN1A_B_1__CDKN1A_CCNE_A_B_1_Ser130u_ + _Nuc__CCNE_CDKN1A_B_1__CDKN1A_CCNE_A_B_1_Ser130u_ + _Nuc__CCNB_CDK1_Thr14_Tyr15u_CDKN1A_1__CDKN1A_CCNE_A_B_1_Ser130u_ + _Nuc__CCNB_CDK1_Thr14_Tyr15p_CDKN1A_1__CDKN1A_CCNE_A_B_1_Ser130u_ + _Nuc__CDKN1A_CCNE_A_B_Ser130p_;
  tCDKN1B := _Cyt__CDKN1B_CCNE_A_Thr187u_ + _Cyt__CCNA_CDKN1A_B_1__CDKN1B_CCNE_A_1_Thr187u_ + _Cyt__CCNE_CDKN1A_B_1__CDKN1B_CCNE_A_1_Thr187u_ + _Cyt__CDKN1B_CCNE_A_Thr187p_ + _Nuc__CDKN1B_CCNE_A_Thr187u_ + _Cyt__CCNA_CDKN1A_B_1__CDKN1B_CCNE_A_1_Thr187p_ + _Nuc__CCNA_CDKN1A_B_1__CDKN1B_CCNE_A_1_Thr187u_ + _Cyt__CCNE_CDKN1A_B_1__CDKN1B_CCNE_A_1_Thr187p_ + _Nuc__CCNE_CDKN1A_B_1__CDKN1B_CCNE_A_1_Thr187u_ + _Nuc__CDKN1B_CCNE_A_Thr187p_ + _Nuc__CCNA_CDKN1A_B_1__CDKN1B_CCNE_A_1_Thr187p_ + _Nuc__CCNE_CDKN1A_B_1__CDKN1B_CCNE_A_1_Thr187p_;
  tSKP2 := _Cyt__SKP2 + _Nuc__SKP2;
  ApcCdh := _Cyt__APC_FBXO5_FZR1_CDC20_1_Ser355u__FZR1_APC_1_FBXO5_nTermu_ + _Cyt__APC_FBXO5_FZR1_CDC20_1_Ser355p__FZR1_APC_1_FBXO5_nTermu_ + _Nuc__APC_FBXO5_FZR1_CDC20_1_Ser355u__FZR1_APC_1_FBXO5_nTermu_ + _Nuc__APC_FBXO5_FZR1_CDC20_1_Ser355p__FZR1_APC_1_FBXO5_nTermu_;
  aCCNB := _Cyt__CCNB_CDK1_Thr14_Tyr15u_CDKN1A_ + _Nuc__CCNB_CDK1_Thr14_Tyr15u_CDKN1A_;

  // Reactions:
  R1: => _Cyt__E2F_DBD_RB1_Ser332u_; kSyE2f1*Cyt;
  R2: _Nuc__FOXM1_DBD_Thr600p_ + _Nuc__CCNB_promoter_FOXM1_ => _Nuc__CCNB_promoter_FOXM1_1__FOXM1_DBD_1_Thr600p_; kAsFPcb*_Nuc__FOXM1_DBD_Thr600p_*_Nuc__CCNB_promoter_FOXM1_*Nuc;
  R3: _Nuc__CCNB_promoter_FOXM1_1__FOXM1_DBD_1_Thr600p_ => _Nuc__FOXM1_DBD_Thr600p_ + _Nuc__CCNB_promoter_FOXM1_; kDiFPcb*_Nuc__CCNB_promoter_FOXM1_1__FOXM1_DBD_1_Thr600p_*Nuc;
  R4: _Nuc__E2F_DBD_1_RB1_Ser332u__E2F_promoter_E2F_1_ => _Cyt__E2F_DBD_RB1_Ser332u_ + _Nuc__E2F_DBD_1_RB1_Ser332u__E2F_promoter_E2F_1_; kSyE2f2*_Nuc__E2F_DBD_1_RB1_Ser332u__E2F_promoter_E2F_1_*Nuc;
  R5: _Nuc__E2F_DBD_1_RB1_Ser332p__E2F_promoter_E2F_1_ => _Cyt__E2F_DBD_RB1_Ser332u_ + _Nuc__E2F_DBD_1_RB1_Ser332p__E2F_promoter_E2F_1_; kSyE2f2*_Nuc__E2F_DBD_1_RB1_Ser332p__E2F_promoter_E2F_1_*Nuc;
  R6: _Cyt__E2F_DBD_RB1_Ser332u_ => ; kDeE2f1*_Cyt__E2F_DBD_RB1_Ser332u_*Cyt;
  R7: _Cyt__E2F_DBD_RB1_Ser332p_ => ; kDeE2f1*_Cyt__E2F_DBD_RB1_Ser332p_*Cyt;
  R8: _Cyt__E2F_DBD_RB1_1_Ser332u__RB1_E2F_1_Ser807_Ser811u_ => _Cyt__RB1_E2F_Ser807_Ser811u_; kDeE2f1*_Cyt__E2F_DBD_RB1_1_Ser332u__RB1_E2F_1_Ser807_Ser811u_*Cyt;
  R9: _Cyt__E2F_DBD_RB1_1_Ser332p__RB1_E2F_1_Ser807_Ser811u_ => _Cyt__RB1_E2F_Ser807_Ser811u_; kDeE2f1*_Cyt__E2F_DBD_RB1_1_Ser332p__RB1_E2F_1_Ser807_Ser811u_*Cyt;
  R10: _Nuc__E2F_DBD_RB1_Ser332u_ => ; kDeE2f1*_Nuc__E2F_DBD_RB1_Ser332u_*Nuc;
  R11: _Nuc__E2F_DBD_RB1_Ser332p_ => ; kDeE2f1*_Nuc__E2F_DBD_RB1_Ser332p_*Nuc;
  R12: _Nuc__E2F_DBD_RB1_1_Ser332u__RB1_E2F_1_Ser807_Ser811u_ => _Nuc__RB1_E2F_Ser807_Ser811u_; kDeE2f1*_Nuc__E2F_DBD_RB1_1_Ser332u__RB1_E2F_1_Ser807_Ser811u_*Nuc;
  R13: _Nuc__E2F_DBD_RB1_1_Ser332p__RB1_E2F_1_Ser807_Ser811u_ => _Nuc__RB1_E2F_Ser807_Ser811u_; kDeE2f1*_Nuc__E2F_DBD_RB1_1_Ser332p__RB1_E2F_1_Ser807_Ser811u_*Nuc;
  R14: _Nuc__CCNE_promoter_E2F_1__E2F_DBD_1_RB1_Ser332u_ => _Nuc__CCNE_promoter_E2F_; kDeE2f1*_Nuc__CCNE_promoter_E2F_1__E2F_DBD_1_RB1_Ser332u_*Nuc;
  R15: _Nuc__CCNA_promoter_E2F_1__E2F_DBD_1_RB1_Ser332u_ => _Nuc__CCNA_promoter_E2F_; kDeE2f1*_Nuc__CCNA_promoter_E2F_1__E2F_DBD_1_RB1_Ser332u_*Nuc;
  R16: _Nuc__E2F_DBD_1_RB1_Ser332u__E2F_promoter_E2F_1_ => _Nuc__E2F_promoter_E2F_; kDeE2f1*_Nuc__E2F_DBD_1_RB1_Ser332u__E2F_promoter_E2F_1_*Nuc;
  R17: _Nuc__E2F_DBD_1_RB1_Ser332u__FBXO5_promoter_E2F_1_ => _Nuc__FBXO5_promoter_E2F_; kDeE2f1*_Nuc__E2F_DBD_1_RB1_Ser332u__FBXO5_promoter_E2F_1_*Nuc;
  R18: _Nuc__E2F_DBD_1_RB1_Ser332u__FOXM1_promoter_E2F_1_ => _Nuc__FOXM1_promoter_E2F_; kDeE2f1*_Nuc__E2F_DBD_1_RB1_Ser332u__FOXM1_promoter_E2F_1_*Nuc;
  R19: _Nuc__CCNE_promoter_E2F_1__E2F_DBD_1_RB1_Ser332p_ => _Nuc__CCNE_promoter_E2F_; kDeE2f1*_Nuc__CCNE_promoter_E2F_1__E2F_DBD_1_RB1_Ser332p_*Nuc;
  R20: _Nuc__CCNA_promoter_E2F_1__E2F_DBD_1_RB1_Ser332p_ => _Nuc__CCNA_promoter_E2F_; kDeE2f1*_Nuc__CCNA_promoter_E2F_1__E2F_DBD_1_RB1_Ser332p_*Nuc;
  R21: _Nuc__E2F_DBD_1_RB1_Ser332p__E2F_promoter_E2F_1_ => _Nuc__E2F_promoter_E2F_; kDeE2f1*_Nuc__E2F_DBD_1_RB1_Ser332p__E2F_promoter_E2F_1_*Nuc;
  R22: _Nuc__E2F_DBD_1_RB1_Ser332p__FBXO5_promoter_E2F_1_ => _Nuc__FBXO5_promoter_E2F_; kDeE2f1*_Nuc__E2F_DBD_1_RB1_Ser332p__FBXO5_promoter_E2F_1_*Nuc;
  R23: _Nuc__E2F_DBD_1_RB1_Ser332p__FOXM1_promoter_E2F_1_ => _Nuc__FOXM1_promoter_E2F_; kDeE2f1*_Nuc__E2F_DBD_1_RB1_Ser332p__FOXM1_promoter_E2F_1_*Nuc;
  R24: _Cyt__CCND + _Cyt__E2F_DBD_RB1_1_Ser332u__RB1_E2F_1_Ser807_Ser811u_ => _Cyt__CCND + _Cyt__E2F_DBD_RB1_Ser332u_ + _Cyt__RB1_E2F_Ser807_Ser811p_; kPhRbD*_Cyt__CCND*_Cyt__E2F_DBD_RB1_1_Ser332u__RB1_E2F_1_Ser807_Ser811u_*Cyt;
  R25: _Cyt__CCND + _Cyt__E2F_DBD_RB1_1_Ser332p__RB1_E2F_1_Ser807_Ser811u_ => _Cyt__CCND + _Cyt__E2F_DBD_RB1_Ser332p_ + _Cyt__RB1_E2F_Ser807_Ser811p_; kPhRbD*_Cyt__CCND*_Cyt__E2F_DBD_RB1_1_Ser332p__RB1_E2F_1_Ser807_Ser811u_*Cyt;
  R26: _Nuc__CCND + _Nuc__E2F_DBD_RB1_1_Ser332u__RB1_E2F_1_Ser807_Ser811u_ => _Nuc__CCND + _Nuc__E2F_DBD_RB1_Ser332u_ + _Nuc__RB1_E2F_Ser807_Ser811p_; kPhRbD*_Nuc__CCND*_Nuc__E2F_DBD_RB1_1_Ser332u__RB1_E2F_1_Ser807_Ser811u_*Nuc;
  R27: _Nuc__CCND + _Nuc__E2F_DBD_RB1_1_Ser332p__RB1_E2F_1_Ser807_Ser811u_ => _Nuc__CCND + _Nuc__E2F_DBD_RB1_Ser332p_ + _Nuc__RB1_E2F_Ser807_Ser811p_; kPhRbD*_Nuc__CCND*_Nuc__E2F_DBD_RB1_1_Ser332p__RB1_E2F_1_Ser807_Ser811u_*Nuc;
  R28: _Cyt__CCNE_CDKN1A_B_ + _Cyt__E2F_DBD_RB1_1_Ser332u__RB1_E2F_1_Ser807_Ser811u_ => _Cyt__CCNE_CDKN1A_B_ + _Cyt__E2F_DBD_RB1_Ser332u_ + _Cyt__RB1_E2F_Ser807_Ser811p_; kPhRbE*_Cyt__CCNE_CDKN1A_B_*_Cyt__E2F_DBD_RB1_1_Ser332u__RB1_E2F_1_Ser807_Ser811u_*Cyt;
  R29: _Cyt__CCNE_CDKN1A_B_ + _Cyt__E2F_DBD_RB1_1_Ser332p__RB1_E2F_1_Ser807_Ser811u_ => _Cyt__CCNE_CDKN1A_B_ + _Cyt__E2F_DBD_RB1_Ser332p_ + _Cyt__RB1_E2F_Ser807_Ser811p_; kPhRbE*_Cyt__CCNE_CDKN1A_B_*_Cyt__E2F_DBD_RB1_1_Ser332p__RB1_E2F_1_Ser807_Ser811u_*Cyt;
  R30: _Nuc__CCNE_CDKN1A_B_ + _Nuc__E2F_DBD_RB1_1_Ser332u__RB1_E2F_1_Ser807_Ser811u_ => _Nuc__CCNE_CDKN1A_B_ + _Nuc__E2F_DBD_RB1_Ser332u_ + _Nuc__RB1_E2F_Ser807_Ser811p_; kPhRbE*_Nuc__CCNE_CDKN1A_B_*_Nuc__E2F_DBD_RB1_1_Ser332u__RB1_E2F_1_Ser807_Ser811u_*Nuc;
  R31: _Nuc__CCNE_CDKN1A_B_ + _Nuc__E2F_DBD_RB1_1_Ser332p__RB1_E2F_1_Ser807_Ser811u_ => _Nuc__CCNE_CDKN1A_B_ + _Nuc__E2F_DBD_RB1_Ser332p_ + _Nuc__RB1_E2F_Ser807_Ser811p_; kPhRbE*_Nuc__CCNE_CDKN1A_B_*_Nuc__E2F_DBD_RB1_1_Ser332p__RB1_E2F_1_Ser807_Ser811u_*Nuc;
  R32: _Cyt__CCNA_CDKN1A_B_ + _Cyt__E2F_DBD_RB1_1_Ser332u__RB1_E2F_1_Ser807_Ser811u_ => _Cyt__E2F_DBD_RB1_Ser332u_ + _Cyt__CCNA_CDKN1A_B_ + _Cyt__RB1_E2F_Ser807_Ser811p_; kPhRb*_Cyt__CCNA_CDKN1A_B_*_Cyt__E2F_DBD_RB1_1_Ser332u__RB1_E2F_1_Ser807_Ser811u_*Cyt;
  R33: _Cyt__CCNA_CDKN1A_B_ + _Cyt__E2F_DBD_RB1_1_Ser332p__RB1_E2F_1_Ser807_Ser811u_ => _Cyt__E2F_DBD_RB1_Ser332p_ + _Cyt__CCNA_CDKN1A_B_ + _Cyt__RB1_E2F_Ser807_Ser811p_; kPhRb*_Cyt__CCNA_CDKN1A_B_*_Cyt__E2F_DBD_RB1_1_Ser332p__RB1_E2F_1_Ser807_Ser811u_*Cyt;
  R34: _Nuc__CCNA_CDKN1A_B_ + _Nuc__E2F_DBD_RB1_1_Ser332u__RB1_E2F_1_Ser807_Ser811u_ => _Nuc__E2F_DBD_RB1_Ser332u_ + _Nuc__CCNA_CDKN1A_B_ + _Nuc__RB1_E2F_Ser807_Ser811p_; kPhRb*_Nuc__CCNA_CDKN1A_B_*_Nuc__E2F_DBD_RB1_1_Ser332u__RB1_E2F_1_Ser807_Ser811u_*Nuc;
  R35: _Nuc__CCNA_CDKN1A_B_ + _Nuc__E2F_DBD_RB1_1_Ser332p__RB1_E2F_1_Ser807_Ser811u_ => _Nuc__E2F_DBD_RB1_Ser332p_ + _Nuc__CCNA_CDKN1A_B_ + _Nuc__RB1_E2F_Ser807_Ser811p_; kPhRb*_Nuc__CCNA_CDKN1A_B_*_Nuc__E2F_DBD_RB1_1_Ser332p__RB1_E2F_1_Ser807_Ser811u_*Nuc;
  R36: _Cyt__CCNB_CDK1_Thr14_Tyr15u_CDKN1A_ + _Cyt__E2F_DBD_RB1_1_Ser332u__RB1_E2F_1_Ser807_Ser811u_ => _Cyt__E2F_DBD_RB1_Ser332u_ + _Cyt__CCNB_CDK1_Thr14_Tyr15u_CDKN1A_ + _Cyt__RB1_E2F_Ser807_Ser811p_; kPhRb*_Cyt__CCNB_CDK1_Thr14_Tyr15u_CDKN1A_*_Cyt__E2F_DBD_RB1_1_Ser332u__RB1_E2F_1_Ser807_Ser811u_*Cyt;
  R37: _Cyt__CCNB_CDK1_Thr14_Tyr15u_CDKN1A_ + _Cyt__E2F_DBD_RB1_1_Ser332p__RB1_E2F_1_Ser807_Ser811u_ => _Cyt__E2F_DBD_RB1_Ser332p_ + _Cyt__CCNB_CDK1_Thr14_Tyr15u_CDKN1A_ + _Cyt__RB1_E2F_Ser807_Ser811p_; kPhRb*_Cyt__CCNB_CDK1_Thr14_Tyr15u_CDKN1A_*_Cyt__E2F_DBD_RB1_1_Ser332p__RB1_E2F_1_Ser807_Ser811u_*Cyt;
  R38: _Nuc__CCNB_CDK1_Thr14_Tyr15u_CDKN1A_ + _Nuc__E2F_DBD_RB1_1_Ser332u__RB1_E2F_1_Ser807_Ser811u_ => _Nuc__E2F_DBD_RB1_Ser332u_ + _Nuc__CCNB_CDK1_Thr14_Tyr15u_CDKN1A_ + _Nuc__RB1_E2F_Ser807_Ser811p_; kPhRb*_Nuc__CCNB_CDK1_Thr14_Tyr15u_CDKN1A_*_Nuc__E2F_DBD_RB1_1_Ser332u__RB1_E2F_1_Ser807_Ser811u_*Nuc;
  R39: _Nuc__CCNB_CDK1_Thr14_Tyr15u_CDKN1A_ + _Nuc__E2F_DBD_RB1_1_Ser332p__RB1_E2F_1_Ser807_Ser811u_ => _Nuc__E2F_DBD_RB1_Ser332p_ + _Nuc__CCNB_CDK1_Thr14_Tyr15u_CDKN1A_ + _Nuc__RB1_E2F_Ser807_Ser811p_; kPhRb*_Nuc__CCNB_CDK1_Thr14_Tyr15u_CDKN1A_*_Nuc__E2F_DBD_RB1_1_Ser332p__RB1_E2F_1_Ser807_Ser811u_*Nuc;
  R40: _Cyt__E2F_DBD_RB1_Ser332u_ + _Cyt__CCNA_CDKN1A_B_ => _Cyt__E2F_DBD_RB1_Ser332p_ + _Cyt__CCNA_CDKN1A_B_; kPhE2f*_Cyt__E2F_DBD_RB1_Ser332u_*_Cyt__CCNA_CDKN1A_B_*Cyt;
  R41: _Cyt__CCNA_CDKN1A_B_ + _Cyt__E2F_DBD_RB1_1_Ser332u__RB1_E2F_1_Ser807_Ser811u_ => _Cyt__CCNA_CDKN1A_B_ + _Cyt__E2F_DBD_RB1_1_Ser332p__RB1_E2F_1_Ser807_Ser811u_; kPhE2f*_Cyt__CCNA_CDKN1A_B_*_Cyt__E2F_DBD_RB1_1_Ser332u__RB1_E2F_1_Ser807_Ser811u_*Cyt;
  R42: _Nuc__E2F_DBD_RB1_Ser332u_ + _Nuc__CCNA_CDKN1A_B_ => _Nuc__E2F_DBD_RB1_Ser332p_ + _Nuc__CCNA_CDKN1A_B_; kPhE2f*_Nuc__E2F_DBD_RB1_Ser332u_*_Nuc__CCNA_CDKN1A_B_*Nuc;
  R43: _Nuc__CCNA_CDKN1A_B_ + _Nuc__E2F_DBD_RB1_1_Ser332u__RB1_E2F_1_Ser807_Ser811u_ => _Nuc__CCNA_CDKN1A_B_ + _Nuc__E2F_DBD_RB1_1_Ser332p__RB1_E2F_1_Ser807_Ser811u_; kPhE2f*_Nuc__CCNA_CDKN1A_B_*_Nuc__E2F_DBD_RB1_1_Ser332u__RB1_E2F_1_Ser807_Ser811u_*Nuc;
  R44: _Nuc__CCNA_CDKN1A_B_ + _Nuc__CCNE_promoter_E2F_1__E2F_DBD_1_RB1_Ser332u_ => _Nuc__CCNA_CDKN1A_B_ + _Nuc__CCNE_promoter_E2F_1__E2F_DBD_1_RB1_Ser332p_; kPhE2f*_Nuc__CCNA_CDKN1A_B_*_Nuc__CCNE_promoter_E2F_1__E2F_DBD_1_RB1_Ser332u_*Nuc;
  R45: _Nuc__CCNA_CDKN1A_B_ + _Nuc__CCNA_promoter_E2F_1__E2F_DBD_1_RB1_Ser332u_ => _Nuc__CCNA_CDKN1A_B_ + _Nuc__CCNA_promoter_E2F_1__E2F_DBD_1_RB1_Ser332p_; kPhE2f*_Nuc__CCNA_CDKN1A_B_*_Nuc__CCNA_promoter_E2F_1__E2F_DBD_1_RB1_Ser332u_*Nuc;
  R46: _Nuc__CCNA_CDKN1A_B_ + _Nuc__E2F_DBD_1_RB1_Ser332u__E2F_promoter_E2F_1_ => _Nuc__CCNA_CDKN1A_B_ + _Nuc__E2F_DBD_1_RB1_Ser332p__E2F_promoter_E2F_1_; kPhE2f*_Nuc__CCNA_CDKN1A_B_*_Nuc__E2F_DBD_1_RB1_Ser332u__E2F_promoter_E2F_1_*Nuc;
  R47: _Nuc__CCNA_CDKN1A_B_ + _Nuc__E2F_DBD_1_RB1_Ser332u__FBXO5_promoter_E2F_1_ => _Nuc__CCNA_CDKN1A_B_ + _Nuc__E2F_DBD_1_RB1_Ser332p__FBXO5_promoter_E2F_1_; kPhE2f*_Nuc__CCNA_CDKN1A_B_*_Nuc__E2F_DBD_1_RB1_Ser332u__FBXO5_promoter_E2F_1_*Nuc;
  R48: _Nuc__CCNA_CDKN1A_B_ + _Nuc__E2F_DBD_1_RB1_Ser332u__FOXM1_promoter_E2F_1_ => _Nuc__CCNA_CDKN1A_B_ + _Nuc__E2F_DBD_1_RB1_Ser332p__FOXM1_promoter_E2F_1_; kPhE2f*_Nuc__CCNA_CDKN1A_B_*_Nuc__E2F_DBD_1_RB1_Ser332u__FOXM1_promoter_E2F_1_*Nuc;
  R49: _Cyt__E2F_DBD_RB1_Ser332u_ + _Cyt__CCNB_CDK1_Thr14_Tyr15u_CDKN1A_ => _Cyt__E2F_DBD_RB1_Ser332p_ + _Cyt__CCNB_CDK1_Thr14_Tyr15u_CDKN1A_; kPhE2f*_Cyt__E2F_DBD_RB1_Ser332u_*_Cyt__CCNB_CDK1_Thr14_Tyr15u_CDKN1A_*Cyt;
  R50: _Cyt__CCNB_CDK1_Thr14_Tyr15u_CDKN1A_ + _Cyt__E2F_DBD_RB1_1_Ser332u__RB1_E2F_1_Ser807_Ser811u_ => _Cyt__CCNB_CDK1_Thr14_Tyr15u_CDKN1A_ + _Cyt__E2F_DBD_RB1_1_Ser332p__RB1_E2F_1_Ser807_Ser811u_; kPhE2f*_Cyt__CCNB_CDK1_Thr14_Tyr15u_CDKN1A_*_Cyt__E2F_DBD_RB1_1_Ser332u__RB1_E2F_1_Ser807_Ser811u_*Cyt;
  R51: _Nuc__E2F_DBD_RB1_Ser332u_ + _Nuc__CCNB_CDK1_Thr14_Tyr15u_CDKN1A_ => _Nuc__E2F_DBD_RB1_Ser332p_ + _Nuc__CCNB_CDK1_Thr14_Tyr15u_CDKN1A_; kPhE2f*_Nuc__E2F_DBD_RB1_Ser332u_*_Nuc__CCNB_CDK1_Thr14_Tyr15u_CDKN1A_*Nuc;
  R52: _Nuc__CCNB_CDK1_Thr14_Tyr15u_CDKN1A_ + _Nuc__E2F_DBD_RB1_1_Ser332u__RB1_E2F_1_Ser807_Ser811u_ => _Nuc__CCNB_CDK1_Thr14_Tyr15u_CDKN1A_ + _Nuc__E2F_DBD_RB1_1_Ser332p__RB1_E2F_1_Ser807_Ser811u_; kPhE2f*_Nuc__CCNB_CDK1_Thr14_Tyr15u_CDKN1A_*_Nuc__E2F_DBD_RB1_1_Ser332u__RB1_E2F_1_Ser807_Ser811u_*Nuc;
  R53: _Nuc__CCNB_CDK1_Thr14_Tyr15u_CDKN1A_ + _Nuc__CCNE_promoter_E2F_1__E2F_DBD_1_RB1_Ser332u_ => _Nuc__CCNB_CDK1_Thr14_Tyr15u_CDKN1A_ + _Nuc__CCNE_promoter_E2F_1__E2F_DBD_1_RB1_Ser332p_; kPhE2f*_Nuc__CCNB_CDK1_Thr14_Tyr15u_CDKN1A_*_Nuc__CCNE_promoter_E2F_1__E2F_DBD_1_RB1_Ser332u_*Nuc;
  R54: _Nuc__CCNB_CDK1_Thr14_Tyr15u_CDKN1A_ + _Nuc__CCNA_promoter_E2F_1__E2F_DBD_1_RB1_Ser332u_ => _Nuc__CCNB_CDK1_Thr14_Tyr15u_CDKN1A_ + _Nuc__CCNA_promoter_E2F_1__E2F_DBD_1_RB1_Ser332p_; kPhE2f*_Nuc__CCNB_CDK1_Thr14_Tyr15u_CDKN1A_*_Nuc__CCNA_promoter_E2F_1__E2F_DBD_1_RB1_Ser332u_*Nuc;
  R55: _Nuc__CCNB_CDK1_Thr14_Tyr15u_CDKN1A_ + _Nuc__E2F_DBD_1_RB1_Ser332u__E2F_promoter_E2F_1_ => _Nuc__CCNB_CDK1_Thr14_Tyr15u_CDKN1A_ + _Nuc__E2F_DBD_1_RB1_Ser332p__E2F_promoter_E2F_1_; kPhE2f*_Nuc__CCNB_CDK1_Thr14_Tyr15u_CDKN1A_*_Nuc__E2F_DBD_1_RB1_Ser332u__E2F_promoter_E2F_1_*Nuc;
  R56: _Nuc__CCNB_CDK1_Thr14_Tyr15u_CDKN1A_ + _Nuc__E2F_DBD_1_RB1_Ser332u__FBXO5_promoter_E2F_1_ => _Nuc__CCNB_CDK1_Thr14_Tyr15u_CDKN1A_ + _Nuc__E2F_DBD_1_RB1_Ser332p__FBXO5_promoter_E2F_1_; kPhE2f*_Nuc__CCNB_CDK1_Thr14_Tyr15u_CDKN1A_*_Nuc__E2F_DBD_1_RB1_Ser332u__FBXO5_promoter_E2F_1_*Nuc;
  R57: _Nuc__CCNB_CDK1_Thr14_Tyr15u_CDKN1A_ + _Nuc__E2F_DBD_1_RB1_Ser332u__FOXM1_promoter_E2F_1_ => _Nuc__CCNB_CDK1_Thr14_Tyr15u_CDKN1A_ + _Nuc__E2F_DBD_1_RB1_Ser332p__FOXM1_promoter_E2F_1_; kPhE2f*_Nuc__CCNB_CDK1_Thr14_Tyr15u_CDKN1A_*_Nuc__E2F_DBD_1_RB1_Ser332u__FOXM1_promoter_E2F_1_*Nuc;
  R58: _Cyt__E2F_DBD_RB1_Ser332p_ => _Cyt__E2F_DBD_RB1_Ser332u_; kDpE2f1*_Cyt__E2F_DBD_RB1_Ser332p_*Cyt;
  R59: _Cyt__E2F_DBD_RB1_1_Ser332p__RB1_E2F_1_Ser807_Ser811u_ => _Cyt__E2F_DBD_RB1_1_Ser332u__RB1_E2F_1_Ser807_Ser811u_; kDpE2f1*_Cyt__E2F_DBD_RB1_1_Ser332p__RB1_E2F_1_Ser807_Ser811u_*Cyt;
  R60: _Nuc__E2F_DBD_RB1_Ser332p_ => _Nuc__E2F_DBD_RB1_Ser332u_; kDpE2f1*_Nuc__E2F_DBD_RB1_Ser332p_*Nuc;
  R61: _Nuc__E2F_DBD_RB1_1_Ser332p__RB1_E2F_1_Ser807_Ser811u_ => _Nuc__E2F_DBD_RB1_1_Ser332u__RB1_E2F_1_Ser807_Ser811u_; kDpE2f1*_Nuc__E2F_DBD_RB1_1_Ser332p__RB1_E2F_1_Ser807_Ser811u_*Nuc;
  R62: _Nuc__CCNE_promoter_E2F_1__E2F_DBD_1_RB1_Ser332p_ => _Nuc__CCNE_promoter_E2F_1__E2F_DBD_1_RB1_Ser332u_; kDpE2f1*_Nuc__CCNE_promoter_E2F_1__E2F_DBD_1_RB1_Ser332p_*Nuc;
  R63: _Nuc__CCNA_promoter_E2F_1__E2F_DBD_1_RB1_Ser332p_ => _Nuc__CCNA_promoter_E2F_1__E2F_DBD_1_RB1_Ser332u_; kDpE2f1*_Nuc__CCNA_promoter_E2F_1__E2F_DBD_1_RB1_Ser332p_*Nuc;
  R64: _Nuc__E2F_DBD_1_RB1_Ser332p__E2F_promoter_E2F_1_ => _Nuc__E2F_DBD_1_RB1_Ser332u__E2F_promoter_E2F_1_; kDpE2f1*_Nuc__E2F_DBD_1_RB1_Ser332p__E2F_promoter_E2F_1_*Nuc;
  R65: _Nuc__E2F_DBD_1_RB1_Ser332p__FBXO5_promoter_E2F_1_ => _Nuc__E2F_DBD_1_RB1_Ser332u__FBXO5_promoter_E2F_1_; kDpE2f1*_Nuc__E2F_DBD_1_RB1_Ser332p__FBXO5_promoter_E2F_1_*Nuc;
  R66: _Nuc__E2F_DBD_1_RB1_Ser332p__FOXM1_promoter_E2F_1_ => _Nuc__E2F_DBD_1_RB1_Ser332u__FOXM1_promoter_E2F_1_; kDpE2f1*_Nuc__E2F_DBD_1_RB1_Ser332p__FOXM1_promoter_E2F_1_*Nuc;
  R67: _Cyt__E2F_DBD_RB1_Ser332p_ + _Cyt__PPP2R2B_ENSA_ARPP19_ => _Cyt__E2F_DBD_RB1_Ser332u_ + _Cyt__PPP2R2B_ENSA_ARPP19_; kDpE2f2*_Cyt__E2F_DBD_RB1_Ser332p_*_Cyt__PPP2R2B_ENSA_ARPP19_*Cyt;
  R68: _Cyt__E2F_DBD_RB1_1_Ser332p__RB1_E2F_1_Ser807_Ser811u_ + _Cyt__PPP2R2B_ENSA_ARPP19_ => _Cyt__E2F_DBD_RB1_1_Ser332u__RB1_E2F_1_Ser807_Ser811u_ + _Cyt__PPP2R2B_ENSA_ARPP19_; kDpE2f2*_Cyt__E2F_DBD_RB1_1_Ser332p__RB1_E2F_1_Ser807_Ser811u_*_Cyt__PPP2R2B_ENSA_ARPP19_*Cyt;
  R69: _Nuc__E2F_DBD_RB1_Ser332p_ + _Nuc__PPP2R2B_ENSA_ARPP19_ => _Nuc__E2F_DBD_RB1_Ser332u_ + _Nuc__PPP2R2B_ENSA_ARPP19_; kDpE2f2*_Nuc__E2F_DBD_RB1_Ser332p_*_Nuc__PPP2R2B_ENSA_ARPP19_*Nuc;
  R70: _Nuc__E2F_DBD_RB1_1_Ser332p__RB1_E2F_1_Ser807_Ser811u_ + _Nuc__PPP2R2B_ENSA_ARPP19_ => _Nuc__E2F_DBD_RB1_1_Ser332u__RB1_E2F_1_Ser807_Ser811u_ + _Nuc__PPP2R2B_ENSA_ARPP19_; kDpE2f2*_Nuc__E2F_DBD_RB1_1_Ser332p__RB1_E2F_1_Ser807_Ser811u_*_Nuc__PPP2R2B_ENSA_ARPP19_*Nuc;
  R71: _Nuc__PPP2R2B_ENSA_ARPP19_ + _Nuc__CCNE_promoter_E2F_1__E2F_DBD_1_RB1_Ser332p_ => _Nuc__PPP2R2B_ENSA_ARPP19_ + _Nuc__CCNE_promoter_E2F_1__E2F_DBD_1_RB1_Ser332u_; kDpE2f2*_Nuc__PPP2R2B_ENSA_ARPP19_*_Nuc__CCNE_promoter_E2F_1__E2F_DBD_1_RB1_Ser332p_*Nuc;
  R72: _Nuc__PPP2R2B_ENSA_ARPP19_ + _Nuc__CCNA_promoter_E2F_1__E2F_DBD_1_RB1_Ser332p_ => _Nuc__PPP2R2B_ENSA_ARPP19_ + _Nuc__CCNA_promoter_E2F_1__E2F_DBD_1_RB1_Ser332u_; kDpE2f2*_Nuc__PPP2R2B_ENSA_ARPP19_*_Nuc__CCNA_promoter_E2F_1__E2F_DBD_1_RB1_Ser332p_*Nuc;
  R73: _Nuc__PPP2R2B_ENSA_ARPP19_ + _Nuc__E2F_DBD_1_RB1_Ser332p__E2F_promoter_E2F_1_ => _Nuc__PPP2R2B_ENSA_ARPP19_ + _Nuc__E2F_DBD_1_RB1_Ser332u__E2F_promoter_E2F_1_; kDpE2f2*_Nuc__PPP2R2B_ENSA_ARPP19_*_Nuc__E2F_DBD_1_RB1_Ser332p__E2F_promoter_E2F_1_*Nuc;
  R74: _Nuc__PPP2R2B_ENSA_ARPP19_ + _Nuc__E2F_DBD_1_RB1_Ser332p__FBXO5_promoter_E2F_1_ => _Nuc__PPP2R2B_ENSA_ARPP19_ + _Nuc__E2F_DBD_1_RB1_Ser332u__FBXO5_promoter_E2F_1_; kDpE2f2*_Nuc__PPP2R2B_ENSA_ARPP19_*_Nuc__E2F_DBD_1_RB1_Ser332p__FBXO5_promoter_E2F_1_*Nuc;
  R75: _Nuc__PPP2R2B_ENSA_ARPP19_ + _Nuc__E2F_DBD_1_RB1_Ser332p__FOXM1_promoter_E2F_1_ => _Nuc__PPP2R2B_ENSA_ARPP19_ + _Nuc__E2F_DBD_1_RB1_Ser332u__FOXM1_promoter_E2F_1_; kDpE2f2*_Nuc__PPP2R2B_ENSA_ARPP19_*_Nuc__E2F_DBD_1_RB1_Ser332p__FOXM1_promoter_E2F_1_*Nuc;
  R76: _Cyt__E2F_DBD_RB1_Ser332p_ + _Cyt__SKP2 => _Cyt__SKP2; kDeE2f2*_Cyt__E2F_DBD_RB1_Ser332p_*_Cyt__SKP2*Cyt;
  R77: _Cyt__E2F_DBD_RB1_1_Ser332p__RB1_E2F_1_Ser807_Ser811u_ + _Cyt__SKP2 => _Cyt__RB1_E2F_Ser807_Ser811u_ + _Cyt__SKP2; kDeE2f2*_Cyt__E2F_DBD_RB1_1_Ser332p__RB1_E2F_1_Ser807_Ser811u_*_Cyt__SKP2*Cyt;
  R78: _Nuc__E2F_DBD_RB1_Ser332p_ + _Nuc__SKP2 => _Nuc__SKP2; kDeE2f2*_Nuc__E2F_DBD_RB1_Ser332p_*_Nuc__SKP2*Nuc;
  R79: _Nuc__E2F_DBD_RB1_1_Ser332p__RB1_E2F_1_Ser807_Ser811u_ + _Nuc__SKP2 => _Nuc__RB1_E2F_Ser807_Ser811u_ + _Nuc__SKP2; kDeE2f2*_Nuc__E2F_DBD_RB1_1_Ser332p__RB1_E2F_1_Ser807_Ser811u_*_Nuc__SKP2*Nuc;
  R80: _Nuc__CCNE_promoter_E2F_1__E2F_DBD_1_RB1_Ser332p_ + _Nuc__SKP2 => _Nuc__CCNE_promoter_E2F_ + _Nuc__SKP2; kDeE2f2*_Nuc__CCNE_promoter_E2F_1__E2F_DBD_1_RB1_Ser332p_*_Nuc__SKP2*Nuc;
  R81: _Nuc__CCNA_promoter_E2F_1__E2F_DBD_1_RB1_Ser332p_ + _Nuc__SKP2 => _Nuc__CCNA_promoter_E2F_ + _Nuc__SKP2; kDeE2f2*_Nuc__CCNA_promoter_E2F_1__E2F_DBD_1_RB1_Ser332p_*_Nuc__SKP2*Nuc;
  R82: _Nuc__E2F_DBD_1_RB1_Ser332p__E2F_promoter_E2F_1_ + _Nuc__SKP2 => _Nuc__E2F_promoter_E2F_ + _Nuc__SKP2; kDeE2f2*_Nuc__E2F_DBD_1_RB1_Ser332p__E2F_promoter_E2F_1_*_Nuc__SKP2*Nuc;
  R83: _Nuc__E2F_DBD_1_RB1_Ser332p__FBXO5_promoter_E2F_1_ + _Nuc__SKP2 => _Nuc__FBXO5_promoter_E2F_ + _Nuc__SKP2; kDeE2f2*_Nuc__E2F_DBD_1_RB1_Ser332p__FBXO5_promoter_E2F_1_*_Nuc__SKP2*Nuc;
  R84: _Nuc__E2F_DBD_1_RB1_Ser332p__FOXM1_promoter_E2F_1_ + _Nuc__SKP2 => _Nuc__FOXM1_promoter_E2F_ + _Nuc__SKP2; kDeE2f2*_Nuc__E2F_DBD_1_RB1_Ser332p__FOXM1_promoter_E2F_1_*_Nuc__SKP2*Nuc;
  R85: _Cyt__CCND + _Cyt__RB1_E2F_Ser807_Ser811u_ => _Cyt__CCND + _Cyt__RB1_E2F_Ser807_Ser811p_; kPhRbD*_Cyt__CCND*_Cyt__RB1_E2F_Ser807_Ser811u_*Cyt;
  R86: _Nuc__CCND + _Nuc__RB1_E2F_Ser807_Ser811u_ => _Nuc__CCND + _Nuc__RB1_E2F_Ser807_Ser811p_; kPhRbD*_Nuc__CCND*_Nuc__RB1_E2F_Ser807_Ser811u_*Nuc;
  R87: _Cyt__CCNE_CDKN1A_B_ + _Cyt__RB1_E2F_Ser807_Ser811u_ => _Cyt__CCNE_CDKN1A_B_ + _Cyt__RB1_E2F_Ser807_Ser811p_; kPhRbE*_Cyt__CCNE_CDKN1A_B_*_Cyt__RB1_E2F_Ser807_Ser811u_*Cyt;
  R88: _Nuc__CCNE_CDKN1A_B_ + _Nuc__RB1_E2F_Ser807_Ser811u_ => _Nuc__CCNE_CDKN1A_B_ + _Nuc__RB1_E2F_Ser807_Ser811p_; kPhRbE*_Nuc__CCNE_CDKN1A_B_*_Nuc__RB1_E2F_Ser807_Ser811u_*Nuc;
  R89: _Cyt__CCNA_CDKN1A_B_ + _Cyt__RB1_E2F_Ser807_Ser811u_ => _Cyt__CCNA_CDKN1A_B_ + _Cyt__RB1_E2F_Ser807_Ser811p_; kPhRb*_Cyt__CCNA_CDKN1A_B_*_Cyt__RB1_E2F_Ser807_Ser811u_*Cyt;
  R90: _Nuc__CCNA_CDKN1A_B_ + _Nuc__RB1_E2F_Ser807_Ser811u_ => _Nuc__CCNA_CDKN1A_B_ + _Nuc__RB1_E2F_Ser807_Ser811p_; kPhRb*_Nuc__CCNA_CDKN1A_B_*_Nuc__RB1_E2F_Ser807_Ser811u_*Nuc;
  R91: _Cyt__CCNB_CDK1_Thr14_Tyr15u_CDKN1A_ + _Cyt__RB1_E2F_Ser807_Ser811u_ => _Cyt__CCNB_CDK1_Thr14_Tyr15u_CDKN1A_ + _Cyt__RB1_E2F_Ser807_Ser811p_; kPhRb*_Cyt__CCNB_CDK1_Thr14_Tyr15u_CDKN1A_*_Cyt__RB1_E2F_Ser807_Ser811u_*Cyt;
  R92: _Nuc__CCNB_CDK1_Thr14_Tyr15u_CDKN1A_ + _Nuc__RB1_E2F_Ser807_Ser811u_ => _Nuc__CCNB_CDK1_Thr14_Tyr15u_CDKN1A_ + _Nuc__RB1_E2F_Ser807_Ser811p_; kPhRb*_Nuc__CCNB_CDK1_Thr14_Tyr15u_CDKN1A_*_Nuc__RB1_E2F_Ser807_Ser811u_*Nuc;
  R93: => _Cyt__CCNE_CDKN1A_B_; kSyCe1*Cyt;
  R94: _Nuc__CCNA_promoter_E2F_1__E2F_DBD_1_RB1_Ser332u_ => _Cyt__CCNA_CDKN1A_B_ + _Nuc__CCNA_promoter_E2F_1__E2F_DBD_1_RB1_Ser332u_; kSyCa2*_Nuc__CCNA_promoter_E2F_1__E2F_DBD_1_RB1_Ser332u_*Nuc;
  R95: _Nuc__CCNA_promoter_E2F_1__E2F_DBD_1_RB1_Ser332p_ => _Cyt__CCNA_CDKN1A_B_ + _Nuc__CCNA_promoter_E2F_1__E2F_DBD_1_RB1_Ser332p_; kSyCa2*_Nuc__CCNA_promoter_E2F_1__E2F_DBD_1_RB1_Ser332p_*Nuc;
  R96: _Cyt__CCNE_CDKN1A_B_ => ; kDeCe*_Cyt__CCNE_CDKN1A_B_*Cyt;
  R97: _Nuc__CCNE_CDKN1A_B_ => ; kDeCe*_Nuc__CCNE_CDKN1A_B_*Nuc;
  R98: _Cyt__CCNE_CDKN1A_B_ + _Cyt__CCNE_CDKN1A_B_ => _Cyt__CCNE_CDKN1A_B_; kPhCeE*_Cyt__CCNE_CDKN1A_B_*_Cyt__CCNE_CDKN1A_B_*Cyt;
  R99: _Nuc__CCNE_CDKN1A_B_ + _Nuc__CCNE_CDKN1A_B_ => _Nuc__CCNE_CDKN1A_B_; kPhCeE*_Nuc__CCNE_CDKN1A_B_*_Nuc__CCNE_CDKN1A_B_*Nuc;
  R100: _Cyt__RB1_E2F_Ser807_Ser811p_ => _Cyt__RB1_E2F_Ser807_Ser811u_; kDpRb*_Cyt__RB1_E2F_Ser807_Ser811p_*Cyt;
  R101: _Nuc__RB1_E2F_Ser807_Ser811p_ => _Nuc__RB1_E2F_Ser807_Ser811u_; kDpRb*_Nuc__RB1_E2F_Ser807_Ser811p_*Nuc;
  R102: _Cyt__APC_FBXO5_FZR1_CDC20_1_Ser355p__CDC20_APC_1_ => _Cyt__APC_FBXO5_FZR1_CDC20_Ser355u_ + _Cyt__CDC20_APC_; kDpApc_1*_Cyt__APC_FBXO5_FZR1_CDC20_1_Ser355p__CDC20_APC_1_*Cyt;
  R103: _Nuc__APC_FBXO5_FZR1_CDC20_1_Ser355p__CDC20_APC_1_ => _Nuc__APC_FBXO5_FZR1_CDC20_Ser355u_ + _Nuc__CDC20_APC_; kDpApc_1*_Nuc__APC_FBXO5_FZR1_CDC20_1_Ser355p__CDC20_APC_1_*Nuc;
  R104: _Cyt__PPP2R2B_ENSA_ARPP19_ + _Cyt__APC_FBXO5_FZR1_CDC20_1_Ser355p__CDC20_APC_1_ => _Cyt__PPP2R2B_ENSA_ARPP19_ + _Cyt__APC_FBXO5_FZR1_CDC20_Ser355u_ + _Cyt__CDC20_APC_; kDpApc_2*_Cyt__PPP2R2B_ENSA_ARPP19_*_Cyt__APC_FBXO5_FZR1_CDC20_1_Ser355p__CDC20_APC_1_*Cyt;
  R105: _Nuc__PPP2R2B_ENSA_ARPP19_ + _Nuc__APC_FBXO5_FZR1_CDC20_1_Ser355p__CDC20_APC_1_ => _Nuc__PPP2R2B_ENSA_ARPP19_ + _Nuc__APC_FBXO5_FZR1_CDC20_Ser355u_ + _Nuc__CDC20_APC_; kDpApc_2*_Nuc__PPP2R2B_ENSA_ARPP19_*_Nuc__APC_FBXO5_FZR1_CDC20_1_Ser355p__CDC20_APC_1_*Nuc;
  R106: _Cyt__CCNA_CDKN1A_B_ + _Cyt__APC_FBXO5_FZR1_CDC20_Ser355u_ => _Cyt__CCNA_CDKN1A_B_ + _Cyt__APC_FBXO5_FZR1_CDC20_Ser355p_; kPhApcA*_Cyt__CCNA_CDKN1A_B_*_Cyt__APC_FBXO5_FZR1_CDC20_Ser355u_*Cyt;
  R107: _Cyt__CCNA_CDKN1A_B_ + _Cyt__APC_FBXO5_FZR1_CDC20_1_Ser355u__FZR1_APC_1_FBXO5_nTermu_ => _Cyt__CCNA_CDKN1A_B_ + _Cyt__APC_FBXO5_FZR1_CDC20_1_Ser355p__FZR1_APC_1_FBXO5_nTermu_; kPhApcA*_Cyt__CCNA_CDKN1A_B_*_Cyt__APC_FBXO5_FZR1_CDC20_1_Ser355u__FZR1_APC_1_FBXO5_nTermu_*Cyt;
  R108: _Cyt__CCNA_CDKN1A_B_ + _Cyt__APC_FBXO5_1_FZR1_CDC20_2_Ser355u__FBXO5_APC_1_FZR1_3_Ser182u__FZR1_APC_2_FBXO5_3_nTermu_ => _Cyt__CCNA_CDKN1A_B_ + _Cyt__APC_FBXO5_1_FZR1_CDC20_2_Ser355p__FBXO5_APC_1_FZR1_3_Ser182u__FZR1_APC_2_FBXO5_3_nTermu_; kPhApcA*_Cyt__CCNA_CDKN1A_B_*_Cyt__APC_FBXO5_1_FZR1_CDC20_2_Ser355u__FBXO5_APC_1_FZR1_3_Ser182u__FZR1_APC_2_FBXO5_3_nTermu_*Cyt;
  R109: _Nuc__CCNA_CDKN1A_B_ + _Nuc__APC_FBXO5_FZR1_CDC20_Ser355u_ => _Nuc__CCNA_CDKN1A_B_ + _Nuc__APC_FBXO5_FZR1_CDC20_Ser355p_; kPhApcA*_Nuc__CCNA_CDKN1A_B_*_Nuc__APC_FBXO5_FZR1_CDC20_Ser355u_*Nuc;
  R110: _Nuc__CCNA_CDKN1A_B_ + _Nuc__APC_FBXO5_FZR1_CDC20_1_Ser355u__FZR1_APC_1_FBXO5_nTermu_ => _Nuc__CCNA_CDKN1A_B_ + _Nuc__APC_FBXO5_FZR1_CDC20_1_Ser355p__FZR1_APC_1_FBXO5_nTermu_; kPhApcA*_Nuc__CCNA_CDKN1A_B_*_Nuc__APC_FBXO5_FZR1_CDC20_1_Ser355u__FZR1_APC_1_FBXO5_nTermu_*Nuc;
  R111: _Nuc__CCNA_CDKN1A_B_ + _Nuc__APC_FBXO5_1_FZR1_CDC20_2_Ser355u__FBXO5_APC_1_FZR1_3_Ser182u__FZR1_APC_2_FBXO5_3_nTermu_ => _Nuc__CCNA_CDKN1A_B_ + _Nuc__APC_FBXO5_1_FZR1_CDC20_2_Ser355p__FBXO5_APC_1_FZR1_3_Ser182u__FZR1_APC_2_FBXO5_3_nTermu_; kPhApcA*_Nuc__CCNA_CDKN1A_B_*_Nuc__APC_FBXO5_1_FZR1_CDC20_2_Ser355u__FBXO5_APC_1_FZR1_3_Ser182u__FZR1_APC_2_FBXO5_3_nTermu_*Nuc;
  R112: _Cyt__CCNB_CDK1_Thr14_Tyr15u_CDKN1A_ + _Cyt__APC_FBXO5_FZR1_CDC20_Ser355u_ => _Cyt__CCNB_CDK1_Thr14_Tyr15u_CDKN1A_ + _Cyt__APC_FBXO5_FZR1_CDC20_Ser355p_; kPhApcA*_Cyt__CCNB_CDK1_Thr14_Tyr15u_CDKN1A_*_Cyt__APC_FBXO5_FZR1_CDC20_Ser355u_*Cyt;
  R113: _Cyt__CCNB_CDK1_Thr14_Tyr15u_CDKN1A_ + _Cyt__APC_FBXO5_FZR1_CDC20_1_Ser355u__FZR1_APC_1_FBXO5_nTermu_ => _Cyt__CCNB_CDK1_Thr14_Tyr15u_CDKN1A_ + _Cyt__APC_FBXO5_FZR1_CDC20_1_Ser355p__FZR1_APC_1_FBXO5_nTermu_; kPhApcA*_Cyt__CCNB_CDK1_Thr14_Tyr15u_CDKN1A_*_Cyt__APC_FBXO5_FZR1_CDC20_1_Ser355u__FZR1_APC_1_FBXO5_nTermu_*Cyt;
  R114: _Cyt__CCNB_CDK1_Thr14_Tyr15u_CDKN1A_ + _Cyt__APC_FBXO5_1_FZR1_CDC20_2_Ser355u__FBXO5_APC_1_FZR1_3_Ser182u__FZR1_APC_2_FBXO5_3_nTermu_ => _Cyt__CCNB_CDK1_Thr14_Tyr15u_CDKN1A_ + _Cyt__APC_FBXO5_1_FZR1_CDC20_2_Ser355p__FBXO5_APC_1_FZR1_3_Ser182u__FZR1_APC_2_FBXO5_3_nTermu_; kPhApcA*_Cyt__CCNB_CDK1_Thr14_Tyr15u_CDKN1A_*_Cyt__APC_FBXO5_1_FZR1_CDC20_2_Ser355u__FBXO5_APC_1_FZR1_3_Ser182u__FZR1_APC_2_FBXO5_3_nTermu_*Cyt;
  R115: _Nuc__CCNB_CDK1_Thr14_Tyr15u_CDKN1A_ + _Nuc__APC_FBXO5_FZR1_CDC20_Ser355u_ => _Nuc__CCNB_CDK1_Thr14_Tyr15u_CDKN1A_ + _Nuc__APC_FBXO5_FZR1_CDC20_Ser355p_; kPhApcA*_Nuc__CCNB_CDK1_Thr14_Tyr15u_CDKN1A_*_Nuc__APC_FBXO5_FZR1_CDC20_Ser355u_*Nuc;
  R116: _Nuc__CCNB_CDK1_Thr14_Tyr15u_CDKN1A_ + _Nuc__APC_FBXO5_FZR1_CDC20_1_Ser355u__FZR1_APC_1_FBXO5_nTermu_ => _Nuc__CCNB_CDK1_Thr14_Tyr15u_CDKN1A_ + _Nuc__APC_FBXO5_FZR1_CDC20_1_Ser355p__FZR1_APC_1_FBXO5_nTermu_; kPhApcA*_Nuc__CCNB_CDK1_Thr14_Tyr15u_CDKN1A_*_Nuc__APC_FBXO5_FZR1_CDC20_1_Ser355u__FZR1_APC_1_FBXO5_nTermu_*Nuc;
  R117: _Nuc__CCNB_CDK1_Thr14_Tyr15u_CDKN1A_ + _Nuc__APC_FBXO5_1_FZR1_CDC20_2_Ser355u__FBXO5_APC_1_FZR1_3_Ser182u__FZR1_APC_2_FBXO5_3_nTermu_ => _Nuc__CCNB_CDK1_Thr14_Tyr15u_CDKN1A_ + _Nuc__APC_FBXO5_1_FZR1_CDC20_2_Ser355p__FBXO5_APC_1_FZR1_3_Ser182u__FZR1_APC_2_FBXO5_3_nTermu_; kPhApcA*_Nuc__CCNB_CDK1_Thr14_Tyr15u_CDKN1A_*_Nuc__APC_FBXO5_1_FZR1_CDC20_2_Ser355u__FBXO5_APC_1_FZR1_3_Ser182u__FZR1_APC_2_FBXO5_3_nTermu_*Nuc;
  R118: _Cyt__APC_FBXO5_FZR1_CDC20_Ser355p_ => _Cyt__APC_FBXO5_FZR1_CDC20_Ser355u_; kDpApc_1*_Cyt__APC_FBXO5_FZR1_CDC20_Ser355p_*Cyt;
  R119: _Cyt__APC_FBXO5_1_FZR1_CDC20_2_Ser355p__FBXO5_APC_1_FZR1_3_Ser182u__FZR1_APC_2_FBXO5_3_nTermu_ => _Cyt__APC_FBXO5_1_FZR1_CDC20_2_Ser355u__FBXO5_APC_1_FZR1_3_Ser182u__FZR1_APC_2_FBXO5_3_nTermu_; kDpApc_1*_Cyt__APC_FBXO5_1_FZR1_CDC20_2_Ser355p__FBXO5_APC_1_FZR1_3_Ser182u__FZR1_APC_2_FBXO5_3_nTermu_*Cyt;
  R120: _Cyt__APC_FBXO5_FZR1_CDC20_1_Ser355p__FZR1_APC_1_FBXO5_nTermu_ => _Cyt__APC_FBXO5_FZR1_CDC20_1_Ser355u__FZR1_APC_1_FBXO5_nTermu_; kDpApc_1*_Cyt__APC_FBXO5_FZR1_CDC20_1_Ser355p__FZR1_APC_1_FBXO5_nTermu_*Cyt;
  R121: _Nuc__APC_FBXO5_FZR1_CDC20_Ser355p_ => _Nuc__APC_FBXO5_FZR1_CDC20_Ser355u_; kDpApc_1*_Nuc__APC_FBXO5_FZR1_CDC20_Ser355p_*Nuc;
  R122: _Nuc__APC_FBXO5_1_FZR1_CDC20_2_Ser355p__FBXO5_APC_1_FZR1_3_Ser182u__FZR1_APC_2_FBXO5_3_nTermu_ => _Nuc__APC_FBXO5_1_FZR1_CDC20_2_Ser355u__FBXO5_APC_1_FZR1_3_Ser182u__FZR1_APC_2_FBXO5_3_nTermu_; kDpApc_1*_Nuc__APC_FBXO5_1_FZR1_CDC20_2_Ser355p__FBXO5_APC_1_FZR1_3_Ser182u__FZR1_APC_2_FBXO5_3_nTermu_*Nuc;
  R123: _Nuc__APC_FBXO5_FZR1_CDC20_1_Ser355p__FZR1_APC_1_FBXO5_nTermu_ => _Nuc__APC_FBXO5_FZR1_CDC20_1_Ser355u__FZR1_APC_1_FBXO5_nTermu_; kDpApc_1*_Nuc__APC_FBXO5_FZR1_CDC20_1_Ser355p__FZR1_APC_1_FBXO5_nTermu_*Nuc;
  R124: _Cyt__PPP2R2B_ENSA_ARPP19_ + _Cyt__APC_FBXO5_FZR1_CDC20_Ser355p_ => _Cyt__PPP2R2B_ENSA_ARPP19_ + _Cyt__APC_FBXO5_FZR1_CDC20_Ser355u_; kDpApc_2*_Cyt__PPP2R2B_ENSA_ARPP19_*_Cyt__APC_FBXO5_FZR1_CDC20_Ser355p_*Cyt;
  R125: _Cyt__PPP2R2B_ENSA_ARPP19_ + _Cyt__APC_FBXO5_1_FZR1_CDC20_2_Ser355p__FBXO5_APC_1_FZR1_3_Ser182u__FZR1_APC_2_FBXO5_3_nTermu_ => _Cyt__PPP2R2B_ENSA_ARPP19_ + _Cyt__APC_FBXO5_1_FZR1_CDC20_2_Ser355u__FBXO5_APC_1_FZR1_3_Ser182u__FZR1_APC_2_FBXO5_3_nTermu_; kDpApc_2*_Cyt__PPP2R2B_ENSA_ARPP19_*_Cyt__APC_FBXO5_1_FZR1_CDC20_2_Ser355p__FBXO5_APC_1_FZR1_3_Ser182u__FZR1_APC_2_FBXO5_3_nTermu_*Cyt;
  R126: _Cyt__PPP2R2B_ENSA_ARPP19_ + _Cyt__APC_FBXO5_FZR1_CDC20_1_Ser355p__FZR1_APC_1_FBXO5_nTermu_ => _Cyt__PPP2R2B_ENSA_ARPP19_ + _Cyt__APC_FBXO5_FZR1_CDC20_1_Ser355u__FZR1_APC_1_FBXO5_nTermu_; kDpApc_2*_Cyt__PPP2R2B_ENSA_ARPP19_*_Cyt__APC_FBXO5_FZR1_CDC20_1_Ser355p__FZR1_APC_1_FBXO5_nTermu_*Cyt;
  R127: _Nuc__PPP2R2B_ENSA_ARPP19_ + _Nuc__APC_FBXO5_FZR1_CDC20_Ser355p_ => _Nuc__PPP2R2B_ENSA_ARPP19_ + _Nuc__APC_FBXO5_FZR1_CDC20_Ser355u_; kDpApc_2*_Nuc__PPP2R2B_ENSA_ARPP19_*_Nuc__APC_FBXO5_FZR1_CDC20_Ser355p_*Nuc;
  R128: _Nuc__PPP2R2B_ENSA_ARPP19_ + _Nuc__APC_FBXO5_1_FZR1_CDC20_2_Ser355p__FBXO5_APC_1_FZR1_3_Ser182u__FZR1_APC_2_FBXO5_3_nTermu_ => _Nuc__PPP2R2B_ENSA_ARPP19_ + _Nuc__APC_FBXO5_1_FZR1_CDC20_2_Ser355u__FBXO5_APC_1_FZR1_3_Ser182u__FZR1_APC_2_FBXO5_3_nTermu_; kDpApc_2*_Nuc__PPP2R2B_ENSA_ARPP19_*_Nuc__APC_FBXO5_1_FZR1_CDC20_2_Ser355p__FBXO5_APC_1_FZR1_3_Ser182u__FZR1_APC_2_FBXO5_3_nTermu_*Nuc;
  R129: _Nuc__PPP2R2B_ENSA_ARPP19_ + _Nuc__APC_FBXO5_FZR1_CDC20_1_Ser355p__FZR1_APC_1_FBXO5_nTermu_ => _Nuc__PPP2R2B_ENSA_ARPP19_ + _Nuc__APC_FBXO5_FZR1_CDC20_1_Ser355u__FZR1_APC_1_FBXO5_nTermu_; kDpApc_2*_Nuc__PPP2R2B_ENSA_ARPP19_*_Nuc__APC_FBXO5_FZR1_CDC20_1_Ser355p__FZR1_APC_1_FBXO5_nTermu_*Nuc;
  R130: _Cyt__CCNA_CDKN1A_B_ + _Cyt__APC_FBXO5_FZR1_CDC20_1_Ser355u__FZR1_APC_1_FBXO5_nTermu_ => _Cyt__CCNA_CDKN1A_B_ + _Cyt__APC_FBXO5_FZR1_CDC20_Ser355u_ + _Cyt__FZR1_APC_FBXO5_nTermp_; kPhCdhA*_Cyt__CCNA_CDKN1A_B_*_Cyt__APC_FBXO5_FZR1_CDC20_1_Ser355u__FZR1_APC_1_FBXO5_nTermu_*Cyt;
  R131: _Cyt__CCNA_CDKN1A_B_ + _Cyt__APC_FBXO5_FZR1_CDC20_1_Ser355p__FZR1_APC_1_FBXO5_nTermu_ => _Cyt__CCNA_CDKN1A_B_ + _Cyt__APC_FBXO5_FZR1_CDC20_Ser355p_ + _Cyt__FZR1_APC_FBXO5_nTermp_; kPhCdhA*_Cyt__CCNA_CDKN1A_B_*_Cyt__APC_FBXO5_FZR1_CDC20_1_Ser355p__FZR1_APC_1_FBXO5_nTermu_*Cyt;
  R132: _Nuc__CCNA_CDKN1A_B_ + _Nuc__APC_FBXO5_FZR1_CDC20_1_Ser355u__FZR1_APC_1_FBXO5_nTermu_ => _Nuc__CCNA_CDKN1A_B_ + _Nuc__APC_FBXO5_FZR1_CDC20_Ser355u_ + _Nuc__FZR1_APC_FBXO5_nTermp_; kPhCdhA*_Nuc__CCNA_CDKN1A_B_*_Nuc__APC_FBXO5_FZR1_CDC20_1_Ser355u__FZR1_APC_1_FBXO5_nTermu_*Nuc;
  R133: _Nuc__CCNA_CDKN1A_B_ + _Nuc__APC_FBXO5_FZR1_CDC20_1_Ser355p__FZR1_APC_1_FBXO5_nTermu_ => _Nuc__CCNA_CDKN1A_B_ + _Nuc__APC_FBXO5_FZR1_CDC20_Ser355p_ + _Nuc__FZR1_APC_FBXO5_nTermp_; kPhCdhA*_Nuc__CCNA_CDKN1A_B_*_Nuc__APC_FBXO5_FZR1_CDC20_1_Ser355p__FZR1_APC_1_FBXO5_nTermu_*Nuc;
  R134: _Cyt__CCNE_CDKN1A_B_ + _Cyt__APC_FBXO5_1_FZR1_CDC20_2_Ser355u__FBXO5_APC_1_FZR1_3_Ser182u__FZR1_APC_2_FBXO5_3_nTermu_ => _Cyt__CCNE_CDKN1A_B_ + _Cyt__APC_FBXO5_FZR1_CDC20_Ser355u_ + _Cyt__FZR1_APC_FBXO5_nTermp_ + _Cyt__FBXO5_APC_FZR1_Ser182u_; kPhCAEE*_Cyt__CCNE_CDKN1A_B_*_Cyt__APC_FBXO5_1_FZR1_CDC20_2_Ser355u__FBXO5_APC_1_FZR1_3_Ser182u__FZR1_APC_2_FBXO5_3_nTermu_*Cyt;
  R135: _Cyt__CCNE_CDKN1A_B_ + _Cyt__APC_FBXO5_1_FZR1_CDC20_2_Ser355p__FBXO5_APC_1_FZR1_3_Ser182u__FZR1_APC_2_FBXO5_3_nTermu_ => _Cyt__CCNE_CDKN1A_B_ + _Cyt__APC_FBXO5_FZR1_CDC20_Ser355p_ + _Cyt__FZR1_APC_FBXO5_nTermp_ + _Cyt__FBXO5_APC_FZR1_Ser182u_; kPhCAEE*_Cyt__CCNE_CDKN1A_B_*_Cyt__APC_FBXO5_1_FZR1_CDC20_2_Ser355p__FBXO5_APC_1_FZR1_3_Ser182u__FZR1_APC_2_FBXO5_3_nTermu_*Cyt;
  R136: _Nuc__CCNE_CDKN1A_B_ + _Nuc__APC_FBXO5_1_FZR1_CDC20_2_Ser355u__FBXO5_APC_1_FZR1_3_Ser182u__FZR1_APC_2_FBXO5_3_nTermu_ => _Nuc__CCNE_CDKN1A_B_ + _Nuc__APC_FBXO5_FZR1_CDC20_Ser355u_ + _Nuc__FZR1_APC_FBXO5_nTermp_ + _Nuc__FBXO5_APC_FZR1_Ser182u_; kPhCAEE*_Nuc__CCNE_CDKN1A_B_*_Nuc__APC_FBXO5_1_FZR1_CDC20_2_Ser355u__FBXO5_APC_1_FZR1_3_Ser182u__FZR1_APC_2_FBXO5_3_nTermu_*Nuc;
  R137: _Nuc__CCNE_CDKN1A_B_ + _Nuc__APC_FBXO5_1_FZR1_CDC20_2_Ser355p__FBXO5_APC_1_FZR1_3_Ser182u__FZR1_APC_2_FBXO5_3_nTermu_ => _Nuc__CCNE_CDKN1A_B_ + _Nuc__APC_FBXO5_FZR1_CDC20_Ser355p_ + _Nuc__FZR1_APC_FBXO5_nTermp_ + _Nuc__FBXO5_APC_FZR1_Ser182u_; kPhCAEE*_Nuc__CCNE_CDKN1A_B_*_Nuc__APC_FBXO5_1_FZR1_CDC20_2_Ser355p__FBXO5_APC_1_FZR1_3_Ser182u__FZR1_APC_2_FBXO5_3_nTermu_*Nuc;
  R138: _Cyt__CCNA_CDKN1A_B_ + _Cyt__APC_FBXO5_1_FZR1_CDC20_2_Ser355u__FBXO5_APC_1_FZR1_3_Ser182u__FZR1_APC_2_FBXO5_3_nTermu_ => _Cyt__CCNA_CDKN1A_B_ + _Cyt__APC_FBXO5_FZR1_CDC20_Ser355u_ + _Cyt__FZR1_APC_FBXO5_nTermp_ + _Cyt__FBXO5_APC_FZR1_Ser182u_; kPhCAEA*_Cyt__CCNA_CDKN1A_B_*_Cyt__APC_FBXO5_1_FZR1_CDC20_2_Ser355u__FBXO5_APC_1_FZR1_3_Ser182u__FZR1_APC_2_FBXO5_3_nTermu_*Cyt;
  R139: _Cyt__CCNA_CDKN1A_B_ + _Cyt__APC_FBXO5_1_FZR1_CDC20_2_Ser355p__FBXO5_APC_1_FZR1_3_Ser182u__FZR1_APC_2_FBXO5_3_nTermu_ => _Cyt__CCNA_CDKN1A_B_ + _Cyt__APC_FBXO5_FZR1_CDC20_Ser355p_ + _Cyt__FZR1_APC_FBXO5_nTermp_ + _Cyt__FBXO5_APC_FZR1_Ser182u_; kPhCAEA*_Cyt__CCNA_CDKN1A_B_*_Cyt__APC_FBXO5_1_FZR1_CDC20_2_Ser355p__FBXO5_APC_1_FZR1_3_Ser182u__FZR1_APC_2_FBXO5_3_nTermu_*Cyt;
  R140: _Nuc__CCNA_CDKN1A_B_ + _Nuc__APC_FBXO5_1_FZR1_CDC20_2_Ser355u__FBXO5_APC_1_FZR1_3_Ser182u__FZR1_APC_2_FBXO5_3_nTermu_ => _Nuc__CCNA_CDKN1A_B_ + _Nuc__APC_FBXO5_FZR1_CDC20_Ser355u_ + _Nuc__FZR1_APC_FBXO5_nTermp_ + _Nuc__FBXO5_APC_FZR1_Ser182u_; kPhCAEA*_Nuc__CCNA_CDKN1A_B_*_Nuc__APC_FBXO5_1_FZR1_CDC20_2_Ser355u__FBXO5_APC_1_FZR1_3_Ser182u__FZR1_APC_2_FBXO5_3_nTermu_*Nuc;
  R141: _Nuc__CCNA_CDKN1A_B_ + _Nuc__APC_FBXO5_1_FZR1_CDC20_2_Ser355p__FBXO5_APC_1_FZR1_3_Ser182u__FZR1_APC_2_FBXO5_3_nTermu_ => _Nuc__CCNA_CDKN1A_B_ + _Nuc__APC_FBXO5_FZR1_CDC20_Ser355p_ + _Nuc__FZR1_APC_FBXO5_nTermp_ + _Nuc__FBXO5_APC_FZR1_Ser182u_; kPhCAEA*_Nuc__CCNA_CDKN1A_B_*_Nuc__APC_FBXO5_1_FZR1_CDC20_2_Ser355p__FBXO5_APC_1_FZR1_3_Ser182u__FZR1_APC_2_FBXO5_3_nTermu_*Nuc;
  R142: _Cyt__CCNB_CDK1_Thr14_Tyr15u_CDKN1A_ + _Cyt__APC_FBXO5_1_FZR1_CDC20_2_Ser355u__FBXO5_APC_1_FZR1_3_Ser182u__FZR1_APC_2_FBXO5_3_nTermu_ => _Cyt__CCNB_CDK1_Thr14_Tyr15u_CDKN1A_ + _Cyt__APC_FBXO5_FZR1_CDC20_Ser355u_ + _Cyt__FZR1_APC_FBXO5_nTermp_ + _Cyt__FBXO5_APC_FZR1_Ser182u_; kPhCAEB*_Cyt__CCNB_CDK1_Thr14_Tyr15u_CDKN1A_*_Cyt__APC_FBXO5_1_FZR1_CDC20_2_Ser355u__FBXO5_APC_1_FZR1_3_Ser182u__FZR1_APC_2_FBXO5_3_nTermu_*Cyt;
  R143: _Cyt__CCNB_CDK1_Thr14_Tyr15u_CDKN1A_ + _Cyt__APC_FBXO5_1_FZR1_CDC20_2_Ser355p__FBXO5_APC_1_FZR1_3_Ser182u__FZR1_APC_2_FBXO5_3_nTermu_ => _Cyt__CCNB_CDK1_Thr14_Tyr15u_CDKN1A_ + _Cyt__APC_FBXO5_FZR1_CDC20_Ser355p_ + _Cyt__FZR1_APC_FBXO5_nTermp_ + _Cyt__FBXO5_APC_FZR1_Ser182u_; kPhCAEB*_Cyt__CCNB_CDK1_Thr14_Tyr15u_CDKN1A_*_Cyt__APC_FBXO5_1_FZR1_CDC20_2_Ser355p__FBXO5_APC_1_FZR1_3_Ser182u__FZR1_APC_2_FBXO5_3_nTermu_*Cyt;
  R144: _Nuc__CCNB_CDK1_Thr14_Tyr15u_CDKN1A_ + _Nuc__APC_FBXO5_1_FZR1_CDC20_2_Ser355u__FBXO5_APC_1_FZR1_3_Ser182u__FZR1_APC_2_FBXO5_3_nTermu_ => _Nuc__CCNB_CDK1_Thr14_Tyr15u_CDKN1A_ + _Nuc__APC_FBXO5_FZR1_CDC20_Ser355u_ + _Nuc__FZR1_APC_FBXO5_nTermp_ + _Nuc__FBXO5_APC_FZR1_Ser182u_; kPhCAEB*_Nuc__CCNB_CDK1_Thr14_Tyr15u_CDKN1A_*_Nuc__APC_FBXO5_1_FZR1_CDC20_2_Ser355u__FBXO5_APC_1_FZR1_3_Ser182u__FZR1_APC_2_FBXO5_3_nTermu_*Nuc;
  R145: _Nuc__CCNB_CDK1_Thr14_Tyr15u_CDKN1A_ + _Nuc__APC_FBXO5_1_FZR1_CDC20_2_Ser355p__FBXO5_APC_1_FZR1_3_Ser182u__FZR1_APC_2_FBXO5_3_nTermu_ => _Nuc__CCNB_CDK1_Thr14_Tyr15u_CDKN1A_ + _Nuc__APC_FBXO5_FZR1_CDC20_Ser355p_ + _Nuc__FZR1_APC_FBXO5_nTermp_ + _Nuc__FBXO5_APC_FZR1_Ser182u_; kPhCAEB*_Nuc__CCNB_CDK1_Thr14_Tyr15u_CDKN1A_*_Nuc__APC_FBXO5_1_FZR1_CDC20_2_Ser355p__FBXO5_APC_1_FZR1_3_Ser182u__FZR1_APC_2_FBXO5_3_nTermu_*Nuc;
  R146: _Cyt__CCNE_CDKN1A_B_ + _Cyt__APC_FBXO5_FZR1_CDC20_1_Ser355u__FZR1_APC_1_FBXO5_nTermu_ => _Cyt__CCNE_CDKN1A_B_ + _Cyt__APC_FBXO5_FZR1_CDC20_Ser355u_ + _Cyt__FZR1_APC_FBXO5_nTermp_; kPhCdhE*_Cyt__CCNE_CDKN1A_B_*_Cyt__APC_FBXO5_FZR1_CDC20_1_Ser355u__FZR1_APC_1_FBXO5_nTermu_*Cyt;
  R147: _Cyt__CCNE_CDKN1A_B_ + _Cyt__APC_FBXO5_FZR1_CDC20_1_Ser355p__FZR1_APC_1_FBXO5_nTermu_ => _Cyt__CCNE_CDKN1A_B_ + _Cyt__APC_FBXO5_FZR1_CDC20_Ser355p_ + _Cyt__FZR1_APC_FBXO5_nTermp_; kPhCdhE*_Cyt__CCNE_CDKN1A_B_*_Cyt__APC_FBXO5_FZR1_CDC20_1_Ser355p__FZR1_APC_1_FBXO5_nTermu_*Cyt;
  R148: _Nuc__CCNE_CDKN1A_B_ + _Nuc__APC_FBXO5_FZR1_CDC20_1_Ser355u__FZR1_APC_1_FBXO5_nTermu_ => _Nuc__CCNE_CDKN1A_B_ + _Nuc__APC_FBXO5_FZR1_CDC20_Ser355u_ + _Nuc__FZR1_APC_FBXO5_nTermp_; kPhCdhE*_Nuc__CCNE_CDKN1A_B_*_Nuc__APC_FBXO5_FZR1_CDC20_1_Ser355u__FZR1_APC_1_FBXO5_nTermu_*Nuc;
  R149: _Nuc__CCNE_CDKN1A_B_ + _Nuc__APC_FBXO5_FZR1_CDC20_1_Ser355p__FZR1_APC_1_FBXO5_nTermu_ => _Nuc__CCNE_CDKN1A_B_ + _Nuc__APC_FBXO5_FZR1_CDC20_Ser355p_ + _Nuc__FZR1_APC_FBXO5_nTermp_; kPhCdhE*_Nuc__CCNE_CDKN1A_B_*_Nuc__APC_FBXO5_FZR1_CDC20_1_Ser355p__FZR1_APC_1_FBXO5_nTermu_*Nuc;
  R150: _Cyt__APC_FBXO5_1_FZR1_CDC20_2_Ser355u__FBXO5_APC_1_FZR1_3_Ser182u__FZR1_APC_2_FBXO5_3_nTermu_ => _Cyt__APC_FBXO5_FZR1_CDC20_1_Ser355u__FZR1_APC_1_FBXO5_nTermu_; kDeEmi1*_Cyt__APC_FBXO5_1_FZR1_CDC20_2_Ser355u__FBXO5_APC_1_FZR1_3_Ser182u__FZR1_APC_2_FBXO5_3_nTermu_*Cyt;
  R151: _Cyt__FBXO5_APC_FZR1_Ser182u_ => ; kDeEmi1*_Cyt__FBXO5_APC_FZR1_Ser182u_*Cyt;
  R152: _Cyt__APC_FBXO5_1_FZR1_CDC20_2_Ser355p__FBXO5_APC_1_FZR1_3_Ser182u__FZR1_APC_2_FBXO5_3_nTermu_ => _Cyt__APC_FBXO5_FZR1_CDC20_1_Ser355p__FZR1_APC_1_FBXO5_nTermu_; kDeEmi1*_Cyt__APC_FBXO5_1_FZR1_CDC20_2_Ser355p__FBXO5_APC_1_FZR1_3_Ser182u__FZR1_APC_2_FBXO5_3_nTermu_*Cyt;
  R153: _Cyt__FBXO5_APC_FZR1_Ser182p_ => ; kDeEmi1*_Cyt__FBXO5_APC_FZR1_Ser182p_*Cyt;
  R154: _Nuc__APC_FBXO5_1_FZR1_CDC20_2_Ser355u__FBXO5_APC_1_FZR1_3_Ser182u__FZR1_APC_2_FBXO5_3_nTermu_ => _Nuc__APC_FBXO5_FZR1_CDC20_1_Ser355u__FZR1_APC_1_FBXO5_nTermu_; kDeEmi1*_Nuc__APC_FBXO5_1_FZR1_CDC20_2_Ser355u__FBXO5_APC_1_FZR1_3_Ser182u__FZR1_APC_2_FBXO5_3_nTermu_*Nuc;
  R155: _Nuc__FBXO5_APC_FZR1_Ser182u_ => ; kDeEmi1*_Nuc__FBXO5_APC_FZR1_Ser182u_*Nuc;
  R156: _Nuc__APC_FBXO5_1_FZR1_CDC20_2_Ser355p__FBXO5_APC_1_FZR1_3_Ser182u__FZR1_APC_2_FBXO5_3_nTermu_ => _Nuc__APC_FBXO5_FZR1_CDC20_1_Ser355p__FZR1_APC_1_FBXO5_nTermu_; kDeEmi1*_Nuc__APC_FBXO5_1_FZR1_CDC20_2_Ser355p__FBXO5_APC_1_FZR1_3_Ser182u__FZR1_APC_2_FBXO5_3_nTermu_*Nuc;
  R157: _Nuc__FBXO5_APC_FZR1_Ser182p_ => ; kDeEmi1*_Nuc__FBXO5_APC_FZR1_Ser182p_*Nuc;
  R158: _Cyt__APC_FBXO5_1_FZR1_CDC20_2_Ser355u__FBXO5_APC_1_FZR1_3_Ser182u__FZR1_APC_2_FBXO5_3_nTermu_ => _Cyt__APC_FBXO5_FZR1_CDC20_1_Ser355u__FZR1_APC_1_FBXO5_nTermu_; kDeEmi2*_Cyt__APC_FBXO5_1_FZR1_CDC20_2_Ser355u__FBXO5_APC_1_FZR1_3_Ser182u__FZR1_APC_2_FBXO5_3_nTermu_*Cyt;
  R159: _Cyt__APC_FBXO5_1_FZR1_CDC20_2_Ser355p__FBXO5_APC_1_FZR1_3_Ser182u__FZR1_APC_2_FBXO5_3_nTermu_ => _Cyt__APC_FBXO5_FZR1_CDC20_1_Ser355p__FZR1_APC_1_FBXO5_nTermu_; kDeEmi2*_Cyt__APC_FBXO5_1_FZR1_CDC20_2_Ser355p__FBXO5_APC_1_FZR1_3_Ser182u__FZR1_APC_2_FBXO5_3_nTermu_*Cyt;
  R160: _Nuc__APC_FBXO5_1_FZR1_CDC20_2_Ser355u__FBXO5_APC_1_FZR1_3_Ser182u__FZR1_APC_2_FBXO5_3_nTermu_ => _Nuc__APC_FBXO5_FZR1_CDC20_1_Ser355u__FZR1_APC_1_FBXO5_nTermu_; kDeEmi2*_Nuc__APC_FBXO5_1_FZR1_CDC20_2_Ser355u__FBXO5_APC_1_FZR1_3_Ser182u__FZR1_APC_2_FBXO5_3_nTermu_*Nuc;
  R161: _Nuc__APC_FBXO5_1_FZR1_CDC20_2_Ser355p__FBXO5_APC_1_FZR1_3_Ser182u__FZR1_APC_2_FBXO5_3_nTermu_ => _Nuc__APC_FBXO5_FZR1_CDC20_1_Ser355p__FZR1_APC_1_FBXO5_nTermu_; kDeEmi2*_Nuc__APC_FBXO5_1_FZR1_CDC20_2_Ser355p__FBXO5_APC_1_FZR1_3_Ser182u__FZR1_APC_2_FBXO5_3_nTermu_*Nuc;
  R162: _Cyt__CCNA_CDKN1A_B_ + _Cyt__APC_FBXO5_1_FZR1_CDC20_2_Ser355u__FBXO5_APC_1_FZR1_3_Ser182u__FZR1_APC_2_FBXO5_3_nTermu_ => _Cyt__CCNA_CDKN1A_B_ + _Cyt__APC_FBXO5_FZR1_CDC20_1_Ser355u__FZR1_APC_1_FBXO5_nTermu_ + _Cyt__FBXO5_APC_FZR1_Ser182p_; kPhEmiA*_Cyt__CCNA_CDKN1A_B_*_Cyt__APC_FBXO5_1_FZR1_CDC20_2_Ser355u__FBXO5_APC_1_FZR1_3_Ser182u__FZR1_APC_2_FBXO5_3_nTermu_*Cyt;
  R163: _Cyt__CCNA_CDKN1A_B_ + _Cyt__APC_FBXO5_1_FZR1_CDC20_2_Ser355p__FBXO5_APC_1_FZR1_3_Ser182u__FZR1_APC_2_FBXO5_3_nTermu_ => _Cyt__CCNA_CDKN1A_B_ + _Cyt__APC_FBXO5_FZR1_CDC20_1_Ser355p__FZR1_APC_1_FBXO5_nTermu_ + _Cyt__FBXO5_APC_FZR1_Ser182p_; kPhEmiA*_Cyt__CCNA_CDKN1A_B_*_Cyt__APC_FBXO5_1_FZR1_CDC20_2_Ser355p__FBXO5_APC_1_FZR1_3_Ser182u__FZR1_APC_2_FBXO5_3_nTermu_*Cyt;
  R164: _Nuc__CCNA_CDKN1A_B_ + _Nuc__APC_FBXO5_1_FZR1_CDC20_2_Ser355u__FBXO5_APC_1_FZR1_3_Ser182u__FZR1_APC_2_FBXO5_3_nTermu_ => _Nuc__CCNA_CDKN1A_B_ + _Nuc__APC_FBXO5_FZR1_CDC20_1_Ser355u__FZR1_APC_1_FBXO5_nTermu_ + _Nuc__FBXO5_APC_FZR1_Ser182p_; kPhEmiA*_Nuc__CCNA_CDKN1A_B_*_Nuc__APC_FBXO5_1_FZR1_CDC20_2_Ser355u__FBXO5_APC_1_FZR1_3_Ser182u__FZR1_APC_2_FBXO5_3_nTermu_*Nuc;
  R165: _Nuc__CCNA_CDKN1A_B_ + _Nuc__APC_FBXO5_1_FZR1_CDC20_2_Ser355p__FBXO5_APC_1_FZR1_3_Ser182u__FZR1_APC_2_FBXO5_3_nTermu_ => _Nuc__CCNA_CDKN1A_B_ + _Nuc__APC_FBXO5_FZR1_CDC20_1_Ser355p__FZR1_APC_1_FBXO5_nTermu_ + _Nuc__FBXO5_APC_FZR1_Ser182p_; kPhEmiA*_Nuc__CCNA_CDKN1A_B_*_Nuc__APC_FBXO5_1_FZR1_CDC20_2_Ser355p__FBXO5_APC_1_FZR1_3_Ser182u__FZR1_APC_2_FBXO5_3_nTermu_*Nuc;
  R166: _Cyt__CCNB_CDK1_Thr14_Tyr15u_CDKN1A_ + _Cyt__APC_FBXO5_1_FZR1_CDC20_2_Ser355u__FBXO5_APC_1_FZR1_3_Ser182u__FZR1_APC_2_FBXO5_3_nTermu_ => _Cyt__CCNB_CDK1_Thr14_Tyr15u_CDKN1A_ + _Cyt__APC_FBXO5_FZR1_CDC20_1_Ser355u__FZR1_APC_1_FBXO5_nTermu_ + _Cyt__FBXO5_APC_FZR1_Ser182p_; kPhEmiB*_Cyt__CCNB_CDK1_Thr14_Tyr15u_CDKN1A_*_Cyt__APC_FBXO5_1_FZR1_CDC20_2_Ser355u__FBXO5_APC_1_FZR1_3_Ser182u__FZR1_APC_2_FBXO5_3_nTermu_*Cyt;
  R167: _Cyt__CCNB_CDK1_Thr14_Tyr15u_CDKN1A_ + _Cyt__APC_FBXO5_1_FZR1_CDC20_2_Ser355p__FBXO5_APC_1_FZR1_3_Ser182u__FZR1_APC_2_FBXO5_3_nTermu_ => _Cyt__CCNB_CDK1_Thr14_Tyr15u_CDKN1A_ + _Cyt__APC_FBXO5_FZR1_CDC20_1_Ser355p__FZR1_APC_1_FBXO5_nTermu_ + _Cyt__FBXO5_APC_FZR1_Ser182p_; kPhEmiB*_Cyt__CCNB_CDK1_Thr14_Tyr15u_CDKN1A_*_Cyt__APC_FBXO5_1_FZR1_CDC20_2_Ser355p__FBXO5_APC_1_FZR1_3_Ser182u__FZR1_APC_2_FBXO5_3_nTermu_*Cyt;
  R168: _Nuc__CCNB_CDK1_Thr14_Tyr15u_CDKN1A_ + _Nuc__APC_FBXO5_1_FZR1_CDC20_2_Ser355u__FBXO5_APC_1_FZR1_3_Ser182u__FZR1_APC_2_FBXO5_3_nTermu_ => _Nuc__CCNB_CDK1_Thr14_Tyr15u_CDKN1A_ + _Nuc__APC_FBXO5_FZR1_CDC20_1_Ser355u__FZR1_APC_1_FBXO5_nTermu_ + _Nuc__FBXO5_APC_FZR1_Ser182p_; kPhEmiB*_Nuc__CCNB_CDK1_Thr14_Tyr15u_CDKN1A_*_Nuc__APC_FBXO5_1_FZR1_CDC20_2_Ser355u__FBXO5_APC_1_FZR1_3_Ser182u__FZR1_APC_2_FBXO5_3_nTermu_*Nuc;
  R169: _Nuc__CCNB_CDK1_Thr14_Tyr15u_CDKN1A_ + _Nuc__APC_FBXO5_1_FZR1_CDC20_2_Ser355p__FBXO5_APC_1_FZR1_3_Ser182u__FZR1_APC_2_FBXO5_3_nTermu_ => _Nuc__CCNB_CDK1_Thr14_Tyr15u_CDKN1A_ + _Nuc__APC_FBXO5_FZR1_CDC20_1_Ser355p__FZR1_APC_1_FBXO5_nTermu_ + _Nuc__FBXO5_APC_FZR1_Ser182p_; kPhEmiB*_Nuc__CCNB_CDK1_Thr14_Tyr15u_CDKN1A_*_Nuc__APC_FBXO5_1_FZR1_CDC20_2_Ser355p__FBXO5_APC_1_FZR1_3_Ser182u__FZR1_APC_2_FBXO5_3_nTermu_*Nuc;
  R170: _Cyt__CCNA_CDKN1A_B_ + _Cyt__FBXO5_APC_FZR1_Ser182u_ => _Cyt__CCNA_CDKN1A_B_ + _Cyt__FBXO5_APC_FZR1_Ser182p_; kPhEmiA*_Cyt__CCNA_CDKN1A_B_*_Cyt__FBXO5_APC_FZR1_Ser182u_*Cyt;
  R171: _Nuc__CCNA_CDKN1A_B_ + _Nuc__FBXO5_APC_FZR1_Ser182u_ => _Nuc__CCNA_CDKN1A_B_ + _Nuc__FBXO5_APC_FZR1_Ser182p_; kPhEmiA*_Nuc__CCNA_CDKN1A_B_*_Nuc__FBXO5_APC_FZR1_Ser182u_*Nuc;
  R172: _Cyt__CCNB_CDK1_Thr14_Tyr15u_CDKN1A_ + _Cyt__FBXO5_APC_FZR1_Ser182u_ => _Cyt__CCNB_CDK1_Thr14_Tyr15u_CDKN1A_ + _Cyt__FBXO5_APC_FZR1_Ser182p_; kPhEmiB*_Cyt__CCNB_CDK1_Thr14_Tyr15u_CDKN1A_*_Cyt__FBXO5_APC_FZR1_Ser182u_*Cyt;
  R173: _Nuc__CCNB_CDK1_Thr14_Tyr15u_CDKN1A_ + _Nuc__FBXO5_APC_FZR1_Ser182u_ => _Nuc__CCNB_CDK1_Thr14_Tyr15u_CDKN1A_ + _Nuc__FBXO5_APC_FZR1_Ser182p_; kPhEmiB*_Nuc__CCNB_CDK1_Thr14_Tyr15u_CDKN1A_*_Nuc__FBXO5_APC_FZR1_Ser182u_*Nuc;
  R174: _Cyt__FBXO5_APC_FZR1_Ser182p_ => _Cyt__FBXO5_APC_FZR1_Ser182u_; kDpEmi*_Cyt__FBXO5_APC_FZR1_Ser182p_*Cyt;
  R175: _Nuc__FBXO5_APC_FZR1_Ser182p_ => _Nuc__FBXO5_APC_FZR1_Ser182u_; kDpEmi*_Nuc__FBXO5_APC_FZR1_Ser182p_*Nuc;
  R176: _Cyt__FBXO5_APC_FZR1_Ser182p_ => ; kDeEmi3*_Cyt__FBXO5_APC_FZR1_Ser182p_*Cyt;
  R177: _Nuc__FBXO5_APC_FZR1_Ser182p_ => ; kDeEmi3*_Nuc__FBXO5_APC_FZR1_Ser182p_*Nuc;
  R178: => _Cyt__FOXM1_DBD_Thr600u_; kSyFox1*Cyt;
  R179: _Nuc__E2F_DBD_1_RB1_Ser332u__FBXO5_promoter_E2F_1_ => _Cyt__FBXO5_APC_FZR1_Ser182u_ + _Nuc__E2F_DBD_1_RB1_Ser332u__FBXO5_promoter_E2F_1_; kSyEmi2*_Nuc__E2F_DBD_1_RB1_Ser332u__FBXO5_promoter_E2F_1_*Nuc;
  R180: _Nuc__E2F_DBD_1_RB1_Ser332p__FBXO5_promoter_E2F_1_ => _Cyt__FBXO5_APC_FZR1_Ser182u_ + _Nuc__E2F_DBD_1_RB1_Ser332p__FBXO5_promoter_E2F_1_; kSyEmi2*_Nuc__E2F_DBD_1_RB1_Ser332p__FBXO5_promoter_E2F_1_*Nuc;
  R181: _Cyt__CCNE_CDKN1A_B_ + _Cyt__FZR1_APC_FBXO5_nTermu_ => _Cyt__CCNE_CDKN1A_B_ + _Cyt__FZR1_APC_FBXO5_nTermp_; kPhCdhE*_Cyt__CCNE_CDKN1A_B_*_Cyt__FZR1_APC_FBXO5_nTermu_*Cyt;
  R182: _Nuc__CCNE_CDKN1A_B_ + _Nuc__FZR1_APC_FBXO5_nTermu_ => _Nuc__CCNE_CDKN1A_B_ + _Nuc__FZR1_APC_FBXO5_nTermp_; kPhCdhE*_Nuc__CCNE_CDKN1A_B_*_Nuc__FZR1_APC_FBXO5_nTermu_*Nuc;
  R183: _Cyt__CCNA_CDKN1A_B_ + _Cyt__FZR1_APC_FBXO5_nTermu_ => _Cyt__CCNA_CDKN1A_B_ + _Cyt__FZR1_APC_FBXO5_nTermp_; kPhCdhA*_Cyt__CCNA_CDKN1A_B_*_Cyt__FZR1_APC_FBXO5_nTermu_*Cyt;
  R184: _Nuc__CCNA_CDKN1A_B_ + _Nuc__FZR1_APC_FBXO5_nTermu_ => _Nuc__CCNA_CDKN1A_B_ + _Nuc__FZR1_APC_FBXO5_nTermp_; kPhCdhA*_Nuc__CCNA_CDKN1A_B_*_Nuc__FZR1_APC_FBXO5_nTermu_*Nuc;
  R185: _Cyt__CCNB_CDK1_Thr14_Tyr15u_CDKN1A_ + _Cyt__FZR1_APC_FBXO5_nTermu_ => _Cyt__CCNB_CDK1_Thr14_Tyr15u_CDKN1A_ + _Cyt__FZR1_APC_FBXO5_nTermp_; kPhCdhB*_Cyt__CCNB_CDK1_Thr14_Tyr15u_CDKN1A_*_Cyt__FZR1_APC_FBXO5_nTermu_*Cyt;
  R186: _Nuc__CCNB_CDK1_Thr14_Tyr15u_CDKN1A_ + _Nuc__FZR1_APC_FBXO5_nTermu_ => _Nuc__CCNB_CDK1_Thr14_Tyr15u_CDKN1A_ + _Nuc__FZR1_APC_FBXO5_nTermp_; kPhCdhB*_Nuc__CCNB_CDK1_Thr14_Tyr15u_CDKN1A_*_Nuc__FZR1_APC_FBXO5_nTermu_*Nuc;
  R187: _Cyt__FZR1_APC_FBXO5_nTermp_ => _Cyt__FZR1_APC_FBXO5_nTermu_; kDpCdh*_Cyt__FZR1_APC_FBXO5_nTermp_*Cyt;
  R188: _Nuc__FZR1_APC_FBXO5_nTermp_ => _Nuc__FZR1_APC_FBXO5_nTermu_; kDpCdh*_Nuc__FZR1_APC_FBXO5_nTermp_*Nuc;
  R189: => _Cyt__CCNA_CDKN1A_B_; kSyCa1*Cyt;
  R190: _Cyt__CCNA_CDKN1A_B_ => ; kDeCa1*_Cyt__CCNA_CDKN1A_B_*Cyt;
  R191: _Nuc__CCNA_CDKN1A_B_ => ; kDeCa1*_Nuc__CCNA_CDKN1A_B_*Nuc;
  R192: _Cyt__CCNE_CDKN1A_B_ + _Cyt__CCNA_CDKN1A_B_ => _Cyt__CCNA_CDKN1A_B_; kPhCeA*_Cyt__CCNE_CDKN1A_B_*_Cyt__CCNA_CDKN1A_B_*Cyt;
  R193: _Nuc__CCNE_CDKN1A_B_ + _Nuc__CCNA_CDKN1A_B_ => _Nuc__CCNA_CDKN1A_B_; kPhCeA*_Nuc__CCNE_CDKN1A_B_*_Nuc__CCNA_CDKN1A_B_*Nuc;
  R194: _Cyt__CCNA_CDKN1A_B_ + _Cyt__APC_FBXO5_FZR1_CDC20_1_Ser355u__FZR1_APC_1_FBXO5_nTermu_ => _Cyt__APC_FBXO5_FZR1_CDC20_1_Ser355u__FZR1_APC_1_FBXO5_nTermu_; kDeCa2*_Cyt__CCNA_CDKN1A_B_*_Cyt__APC_FBXO5_FZR1_CDC20_1_Ser355u__FZR1_APC_1_FBXO5_nTermu_*Cyt;
  R195: _Cyt__CCNA_CDKN1A_B_ + _Cyt__APC_FBXO5_FZR1_CDC20_1_Ser355p__FZR1_APC_1_FBXO5_nTermu_ => _Cyt__APC_FBXO5_FZR1_CDC20_1_Ser355p__FZR1_APC_1_FBXO5_nTermu_; kDeCa2*_Cyt__CCNA_CDKN1A_B_*_Cyt__APC_FBXO5_FZR1_CDC20_1_Ser355p__FZR1_APC_1_FBXO5_nTermu_*Cyt;
  R196: _Nuc__CCNA_CDKN1A_B_ + _Nuc__APC_FBXO5_FZR1_CDC20_1_Ser355u__FZR1_APC_1_FBXO5_nTermu_ => _Nuc__APC_FBXO5_FZR1_CDC20_1_Ser355u__FZR1_APC_1_FBXO5_nTermu_; kDeCa2*_Nuc__CCNA_CDKN1A_B_*_Nuc__APC_FBXO5_FZR1_CDC20_1_Ser355u__FZR1_APC_1_FBXO5_nTermu_*Nuc;
  R197: _Nuc__CCNA_CDKN1A_B_ + _Nuc__APC_FBXO5_FZR1_CDC20_1_Ser355p__FZR1_APC_1_FBXO5_nTermu_ => _Nuc__APC_FBXO5_FZR1_CDC20_1_Ser355p__FZR1_APC_1_FBXO5_nTermu_; kDeCa2*_Nuc__CCNA_CDKN1A_B_*_Nuc__APC_FBXO5_FZR1_CDC20_1_Ser355p__FZR1_APC_1_FBXO5_nTermu_*Nuc;
  R198: _Cyt__CCNA_CDKN1A_B_ + _Cyt__APC_FBXO5_FZR1_CDC20_1_Ser355p__CDC20_APC_1_ => _Cyt__APC_FBXO5_FZR1_CDC20_1_Ser355p__CDC20_APC_1_; kDeCa3*_Cyt__CCNA_CDKN1A_B_*_Cyt__APC_FBXO5_FZR1_CDC20_1_Ser355p__CDC20_APC_1_*Cyt;
  R199: _Nuc__CCNA_CDKN1A_B_ + _Nuc__APC_FBXO5_FZR1_CDC20_1_Ser355p__CDC20_APC_1_ => _Nuc__APC_FBXO5_FZR1_CDC20_1_Ser355p__CDC20_APC_1_; kDeCa3*_Nuc__CCNA_CDKN1A_B_*_Nuc__APC_FBXO5_FZR1_CDC20_1_Ser355p__CDC20_APC_1_*Nuc;
  R200: _Nuc__E2F_DBD_1_RB1_Ser332u__FOXM1_promoter_E2F_1_ => _Cyt__FOXM1_DBD_Thr600u_ + _Nuc__E2F_DBD_1_RB1_Ser332u__FOXM1_promoter_E2F_1_; kSyFox2*_Nuc__E2F_DBD_1_RB1_Ser332u__FOXM1_promoter_E2F_1_*Nuc;
  R201: _Nuc__E2F_DBD_1_RB1_Ser332p__FOXM1_promoter_E2F_1_ => _Cyt__FOXM1_DBD_Thr600u_ + _Nuc__E2F_DBD_1_RB1_Ser332p__FOXM1_promoter_E2F_1_; kSyFox2*_Nuc__E2F_DBD_1_RB1_Ser332p__FOXM1_promoter_E2F_1_*Nuc;
  R202: _Cyt__FOXM1_DBD_Thr600u_ => ; kDeFox1*_Cyt__FOXM1_DBD_Thr600u_*Cyt;
  R203: _Cyt__FOXM1_DBD_Thr600p_ => ; kDeFox1*_Cyt__FOXM1_DBD_Thr600p_*Cyt;
  R204: _Nuc__FOXM1_DBD_Thr600u_ => ; kDeFox1*_Nuc__FOXM1_DBD_Thr600u_*Nuc;
  R205: _Nuc__FOXM1_DBD_Thr600p_ => ; kDeFox1*_Nuc__FOXM1_DBD_Thr600p_*Nuc;
  R206: _Nuc__CCNB_promoter_FOXM1_1__FOXM1_DBD_1_Thr600p_ => _Nuc__CCNB_promoter_FOXM1_; kDeFox1*_Nuc__CCNB_promoter_FOXM1_1__FOXM1_DBD_1_Thr600p_*Nuc;
  R207: _Nuc__CDC20_promoter_FOXM1_1__FOXM1_DBD_1_Thr600p_ => _Nuc__CDC20_promoter_FOXM1_; kDeFox1*_Nuc__CDC20_promoter_FOXM1_1__FOXM1_DBD_1_Thr600p_*Nuc;
  R208: _Cyt__APC_FBXO5_FZR1_CDC20_1_Ser355u__FZR1_APC_1_FBXO5_nTermu_ + _Cyt__FOXM1_DBD_Thr600u_ => _Cyt__APC_FBXO5_FZR1_CDC20_1_Ser355u__FZR1_APC_1_FBXO5_nTermu_; kDeFox2*_Cyt__APC_FBXO5_FZR1_CDC20_1_Ser355u__FZR1_APC_1_FBXO5_nTermu_*_Cyt__FOXM1_DBD_Thr600u_*Cyt;
  R209: _Cyt__APC_FBXO5_FZR1_CDC20_1_Ser355p__FZR1_APC_1_FBXO5_nTermu_ + _Cyt__FOXM1_DBD_Thr600u_ => _Cyt__APC_FBXO5_FZR1_CDC20_1_Ser355p__FZR1_APC_1_FBXO5_nTermu_; kDeFox2*_Cyt__APC_FBXO5_FZR1_CDC20_1_Ser355p__FZR1_APC_1_FBXO5_nTermu_*_Cyt__FOXM1_DBD_Thr600u_*Cyt;
  R210: _Cyt__APC_FBXO5_FZR1_CDC20_1_Ser355u__FZR1_APC_1_FBXO5_nTermu_ + _Cyt__FOXM1_DBD_Thr600p_ => _Cyt__APC_FBXO5_FZR1_CDC20_1_Ser355u__FZR1_APC_1_FBXO5_nTermu_; kDeFox2*_Cyt__APC_FBXO5_FZR1_CDC20_1_Ser355u__FZR1_APC_1_FBXO5_nTermu_*_Cyt__FOXM1_DBD_Thr600p_*Cyt;
  R211: _Cyt__APC_FBXO5_FZR1_CDC20_1_Ser355p__FZR1_APC_1_FBXO5_nTermu_ + _Cyt__FOXM1_DBD_Thr600p_ => _Cyt__APC_FBXO5_FZR1_CDC20_1_Ser355p__FZR1_APC_1_FBXO5_nTermu_; kDeFox2*_Cyt__APC_FBXO5_FZR1_CDC20_1_Ser355p__FZR1_APC_1_FBXO5_nTermu_*_Cyt__FOXM1_DBD_Thr600p_*Cyt;
  R212: _Nuc__APC_FBXO5_FZR1_CDC20_1_Ser355u__FZR1_APC_1_FBXO5_nTermu_ + _Nuc__FOXM1_DBD_Thr600u_ => _Nuc__APC_FBXO5_FZR1_CDC20_1_Ser355u__FZR1_APC_1_FBXO5_nTermu_; kDeFox2*_Nuc__APC_FBXO5_FZR1_CDC20_1_Ser355u__FZR1_APC_1_FBXO5_nTermu_*_Nuc__FOXM1_DBD_Thr600u_*Nuc;
  R213: _Nuc__APC_FBXO5_FZR1_CDC20_1_Ser355p__FZR1_APC_1_FBXO5_nTermu_ + _Nuc__FOXM1_DBD_Thr600u_ => _Nuc__APC_FBXO5_FZR1_CDC20_1_Ser355p__FZR1_APC_1_FBXO5_nTermu_; kDeFox2*_Nuc__APC_FBXO5_FZR1_CDC20_1_Ser355p__FZR1_APC_1_FBXO5_nTermu_*_Nuc__FOXM1_DBD_Thr600u_*Nuc;
  R214: _Nuc__APC_FBXO5_FZR1_CDC20_1_Ser355u__FZR1_APC_1_FBXO5_nTermu_ + _Nuc__FOXM1_DBD_Thr600p_ => _Nuc__APC_FBXO5_FZR1_CDC20_1_Ser355u__FZR1_APC_1_FBXO5_nTermu_; kDeFox2*_Nuc__APC_FBXO5_FZR1_CDC20_1_Ser355u__FZR1_APC_1_FBXO5_nTermu_*_Nuc__FOXM1_DBD_Thr600p_*Nuc;
  R215: _Nuc__APC_FBXO5_FZR1_CDC20_1_Ser355p__FZR1_APC_1_FBXO5_nTermu_ + _Nuc__FOXM1_DBD_Thr600p_ => _Nuc__APC_FBXO5_FZR1_CDC20_1_Ser355p__FZR1_APC_1_FBXO5_nTermu_; kDeFox2*_Nuc__APC_FBXO5_FZR1_CDC20_1_Ser355p__FZR1_APC_1_FBXO5_nTermu_*_Nuc__FOXM1_DBD_Thr600p_*Nuc;
  R216: _Nuc__APC_FBXO5_FZR1_CDC20_1_Ser355u__FZR1_APC_1_FBXO5_nTermu_ + _Nuc__CCNB_promoter_FOXM1_1__FOXM1_DBD_1_Thr600p_ => _Nuc__APC_FBXO5_FZR1_CDC20_1_Ser355u__FZR1_APC_1_FBXO5_nTermu_ + _Nuc__CCNB_promoter_FOXM1_; kDeFox2*_Nuc__APC_FBXO5_FZR1_CDC20_1_Ser355u__FZR1_APC_1_FBXO5_nTermu_*_Nuc__CCNB_promoter_FOXM1_1__FOXM1_DBD_1_Thr600p_*Nuc;
  R217: _Nuc__APC_FBXO5_FZR1_CDC20_1_Ser355p__FZR1_APC_1_FBXO5_nTermu_ + _Nuc__CCNB_promoter_FOXM1_1__FOXM1_DBD_1_Thr600p_ => _Nuc__APC_FBXO5_FZR1_CDC20_1_Ser355p__FZR1_APC_1_FBXO5_nTermu_ + _Nuc__CCNB_promoter_FOXM1_; kDeFox2*_Nuc__APC_FBXO5_FZR1_CDC20_1_Ser355p__FZR1_APC_1_FBXO5_nTermu_*_Nuc__CCNB_promoter_FOXM1_1__FOXM1_DBD_1_Thr600p_*Nuc;
  R218: _Nuc__APC_FBXO5_FZR1_CDC20_1_Ser355u__FZR1_APC_1_FBXO5_nTermu_ + _Nuc__CDC20_promoter_FOXM1_1__FOXM1_DBD_1_Thr600p_ => _Nuc__APC_FBXO5_FZR1_CDC20_1_Ser355u__FZR1_APC_1_FBXO5_nTermu_ + _Nuc__CDC20_promoter_FOXM1_; kDeFox2*_Nuc__APC_FBXO5_FZR1_CDC20_1_Ser355u__FZR1_APC_1_FBXO5_nTermu_*_Nuc__CDC20_promoter_FOXM1_1__FOXM1_DBD_1_Thr600p_*Nuc;
  R219: _Nuc__APC_FBXO5_FZR1_CDC20_1_Ser355p__FZR1_APC_1_FBXO5_nTermu_ + _Nuc__CDC20_promoter_FOXM1_1__FOXM1_DBD_1_Thr600p_ => _Nuc__APC_FBXO5_FZR1_CDC20_1_Ser355p__FZR1_APC_1_FBXO5_nTermu_ + _Nuc__CDC20_promoter_FOXM1_; kDeFox2*_Nuc__APC_FBXO5_FZR1_CDC20_1_Ser355p__FZR1_APC_1_FBXO5_nTermu_*_Nuc__CDC20_promoter_FOXM1_1__FOXM1_DBD_1_Thr600p_*Nuc;
  R220: _Cyt__CCNE_CDKN1A_B_ + _Cyt__FOXM1_DBD_Thr600u_ => _Cyt__CCNE_CDKN1A_B_ + _Cyt__FOXM1_DBD_Thr600p_; kPhFoxE*_Cyt__CCNE_CDKN1A_B_*_Cyt__FOXM1_DBD_Thr600u_*Cyt;
  R221: _Nuc__CCNE_CDKN1A_B_ + _Nuc__FOXM1_DBD_Thr600u_ => _Nuc__CCNE_CDKN1A_B_ + _Nuc__FOXM1_DBD_Thr600p_; kPhFoxE*_Nuc__CCNE_CDKN1A_B_*_Nuc__FOXM1_DBD_Thr600u_*Nuc;
  R222: _Cyt__CCNA_CDKN1A_B_ + _Cyt__FOXM1_DBD_Thr600u_ => _Cyt__CCNA_CDKN1A_B_ + _Cyt__FOXM1_DBD_Thr600p_; kPhFoxA*_Cyt__CCNA_CDKN1A_B_*_Cyt__FOXM1_DBD_Thr600u_*Cyt;
  R223: _Nuc__CCNA_CDKN1A_B_ + _Nuc__FOXM1_DBD_Thr600u_ => _Nuc__CCNA_CDKN1A_B_ + _Nuc__FOXM1_DBD_Thr600p_; kPhFoxA*_Nuc__CCNA_CDKN1A_B_*_Nuc__FOXM1_DBD_Thr600u_*Nuc;
  R224: _Cyt__CCNB_CDK1_Thr14_Tyr15u_CDKN1A_ + _Cyt__FOXM1_DBD_Thr600u_ => _Cyt__CCNB_CDK1_Thr14_Tyr15u_CDKN1A_ + _Cyt__FOXM1_DBD_Thr600p_; kPhFoxB*_Cyt__CCNB_CDK1_Thr14_Tyr15u_CDKN1A_*_Cyt__FOXM1_DBD_Thr600u_*Cyt;
  R225: _Nuc__CCNB_CDK1_Thr14_Tyr15u_CDKN1A_ + _Nuc__FOXM1_DBD_Thr600u_ => _Nuc__CCNB_CDK1_Thr14_Tyr15u_CDKN1A_ + _Nuc__FOXM1_DBD_Thr600p_; kPhFoxB*_Nuc__CCNB_CDK1_Thr14_Tyr15u_CDKN1A_*_Nuc__FOXM1_DBD_Thr600u_*Nuc;
  R226: _Cyt__FOXM1_DBD_Thr600p_ => _Cyt__FOXM1_DBD_Thr600u_; kDpFox*_Cyt__FOXM1_DBD_Thr600p_*Cyt;
  R227: _Nuc__FOXM1_DBD_Thr600p_ => _Nuc__FOXM1_DBD_Thr600u_; kDpFox*_Nuc__FOXM1_DBD_Thr600p_*Nuc;
  R228: _Nuc__CDC20_promoter_FOXM1_1__FOXM1_DBD_1_Thr600p_ => _Nuc__FOXM1_DBD_Thr600u_ + _Nuc__CDC20_promoter_FOXM1_; kDpFox*_Nuc__CDC20_promoter_FOXM1_1__FOXM1_DBD_1_Thr600p_*Nuc;
  R229: _Nuc__CCNB_promoter_FOXM1_1__FOXM1_DBD_1_Thr600p_ => _Nuc__FOXM1_DBD_Thr600u_ + _Nuc__CCNB_promoter_FOXM1_; kDpFox*_Nuc__CCNB_promoter_FOXM1_1__FOXM1_DBD_1_Thr600p_*Nuc;
  R230: => _Cyt__CCNB_CDK1_Thr14_Tyr15u_CDKN1A_; kSyCb1*Cyt;
  R231: _Nuc__CCNB_promoter_FOXM1_1__FOXM1_DBD_1_Thr600p_ => _Cyt__CCNB_CDK1_Thr14_Tyr15u_CDKN1A_ + _Nuc__CCNB_promoter_FOXM1_1__FOXM1_DBD_1_Thr600p_; kSyCb2*_Nuc__CCNB_promoter_FOXM1_1__FOXM1_DBD_1_Thr600p_*Nuc;
  R232: _Cyt__CCNB_CDK1_Thr14_Tyr15u_CDKN1A_ => ; kDeCb1*_Cyt__CCNB_CDK1_Thr14_Tyr15u_CDKN1A_*Cyt;
  R233: _Cyt__CCNB_CDK1_Thr14_Tyr15p_CDKN1A_ => ; kDeCb1*_Cyt__CCNB_CDK1_Thr14_Tyr15p_CDKN1A_*Cyt;
  R234: _Nuc__CCNB_CDK1_Thr14_Tyr15u_CDKN1A_ => ; kDeCb1*_Nuc__CCNB_CDK1_Thr14_Tyr15u_CDKN1A_*Nuc;
  R235: _Nuc__CCNB_CDK1_Thr14_Tyr15p_CDKN1A_ => ; kDeCb1*_Nuc__CCNB_CDK1_Thr14_Tyr15p_CDKN1A_*Nuc;
  R236: _Cyt__CCNB_CDK1_Thr14_Tyr15u_CDKN1A_ + _Cyt__APC_FBXO5_FZR1_CDC20_1_Ser355u__FZR1_APC_1_FBXO5_nTermu_ => _Cyt__APC_FBXO5_FZR1_CDC20_1_Ser355u__FZR1_APC_1_FBXO5_nTermu_; kDeCb2*_Cyt__CCNB_CDK1_Thr14_Tyr15u_CDKN1A_*_Cyt__APC_FBXO5_FZR1_CDC20_1_Ser355u__FZR1_APC_1_FBXO5_nTermu_*Cyt;
  R237: _Cyt__CCNB_CDK1_Thr14_Tyr15u_CDKN1A_ + _Cyt__APC_FBXO5_FZR1_CDC20_1_Ser355p__FZR1_APC_1_FBXO5_nTermu_ => _Cyt__APC_FBXO5_FZR1_CDC20_1_Ser355p__FZR1_APC_1_FBXO5_nTermu_; kDeCb2*_Cyt__CCNB_CDK1_Thr14_Tyr15u_CDKN1A_*_Cyt__APC_FBXO5_FZR1_CDC20_1_Ser355p__FZR1_APC_1_FBXO5_nTermu_*Cyt;
  R238: _Cyt__APC_FBXO5_FZR1_CDC20_1_Ser355u__FZR1_APC_1_FBXO5_nTermu_ + _Cyt__CCNB_CDK1_Thr14_Tyr15p_CDKN1A_ => _Cyt__APC_FBXO5_FZR1_CDC20_1_Ser355u__FZR1_APC_1_FBXO5_nTermu_; kDeCb2*_Cyt__APC_FBXO5_FZR1_CDC20_1_Ser355u__FZR1_APC_1_FBXO5_nTermu_*_Cyt__CCNB_CDK1_Thr14_Tyr15p_CDKN1A_*Cyt;
  R239: _Cyt__APC_FBXO5_FZR1_CDC20_1_Ser355p__FZR1_APC_1_FBXO5_nTermu_ + _Cyt__CCNB_CDK1_Thr14_Tyr15p_CDKN1A_ => _Cyt__APC_FBXO5_FZR1_CDC20_1_Ser355p__FZR1_APC_1_FBXO5_nTermu_; kDeCb2*_Cyt__APC_FBXO5_FZR1_CDC20_1_Ser355p__FZR1_APC_1_FBXO5_nTermu_*_Cyt__CCNB_CDK1_Thr14_Tyr15p_CDKN1A_*Cyt;
  R240: _Nuc__CCNB_CDK1_Thr14_Tyr15u_CDKN1A_ + _Nuc__APC_FBXO5_FZR1_CDC20_1_Ser355u__FZR1_APC_1_FBXO5_nTermu_ => _Nuc__APC_FBXO5_FZR1_CDC20_1_Ser355u__FZR1_APC_1_FBXO5_nTermu_; kDeCb2*_Nuc__CCNB_CDK1_Thr14_Tyr15u_CDKN1A_*_Nuc__APC_FBXO5_FZR1_CDC20_1_Ser355u__FZR1_APC_1_FBXO5_nTermu_*Nuc;
  R241: _Nuc__CCNB_CDK1_Thr14_Tyr15u_CDKN1A_ + _Nuc__APC_FBXO5_FZR1_CDC20_1_Ser355p__FZR1_APC_1_FBXO5_nTermu_ => _Nuc__APC_FBXO5_FZR1_CDC20_1_Ser355p__FZR1_APC_1_FBXO5_nTermu_; kDeCb2*_Nuc__CCNB_CDK1_Thr14_Tyr15u_CDKN1A_*_Nuc__APC_FBXO5_FZR1_CDC20_1_Ser355p__FZR1_APC_1_FBXO5_nTermu_*Nuc;
  R242: _Nuc__APC_FBXO5_FZR1_CDC20_1_Ser355u__FZR1_APC_1_FBXO5_nTermu_ + _Nuc__CCNB_CDK1_Thr14_Tyr15p_CDKN1A_ => _Nuc__APC_FBXO5_FZR1_CDC20_1_Ser355u__FZR1_APC_1_FBXO5_nTermu_; kDeCb2*_Nuc__APC_FBXO5_FZR1_CDC20_1_Ser355u__FZR1_APC_1_FBXO5_nTermu_*_Nuc__CCNB_CDK1_Thr14_Tyr15p_CDKN1A_*Nuc;
  R243: _Nuc__APC_FBXO5_FZR1_CDC20_1_Ser355p__FZR1_APC_1_FBXO5_nTermu_ + _Nuc__CCNB_CDK1_Thr14_Tyr15p_CDKN1A_ => _Nuc__APC_FBXO5_FZR1_CDC20_1_Ser355p__FZR1_APC_1_FBXO5_nTermu_; kDeCb2*_Nuc__APC_FBXO5_FZR1_CDC20_1_Ser355p__FZR1_APC_1_FBXO5_nTermu_*_Nuc__CCNB_CDK1_Thr14_Tyr15p_CDKN1A_*Nuc;
  R244: _Cyt__CCNB_CDK1_Thr14_Tyr15u_CDKN1A_ + _Cyt__APC_FBXO5_FZR1_CDC20_1_Ser355p__CDC20_APC_1_ => _Cyt__APC_FBXO5_FZR1_CDC20_1_Ser355p__CDC20_APC_1_; kDeCb3*_Cyt__CCNB_CDK1_Thr14_Tyr15u_CDKN1A_*_Cyt__APC_FBXO5_FZR1_CDC20_1_Ser355p__CDC20_APC_1_*Cyt;
  R245: _Cyt__APC_FBXO5_FZR1_CDC20_1_Ser355p__CDC20_APC_1_ + _Cyt__CCNB_CDK1_Thr14_Tyr15p_CDKN1A_ => _Cyt__APC_FBXO5_FZR1_CDC20_1_Ser355p__CDC20_APC_1_; kDeCb3*_Cyt__APC_FBXO5_FZR1_CDC20_1_Ser355p__CDC20_APC_1_*_Cyt__CCNB_CDK1_Thr14_Tyr15p_CDKN1A_*Cyt;
  R246: _Nuc__CCNB_CDK1_Thr14_Tyr15u_CDKN1A_ + _Nuc__APC_FBXO5_FZR1_CDC20_1_Ser355p__CDC20_APC_1_ => _Nuc__APC_FBXO5_FZR1_CDC20_1_Ser355p__CDC20_APC_1_; kDeCb3*_Nuc__CCNB_CDK1_Thr14_Tyr15u_CDKN1A_*_Nuc__APC_FBXO5_FZR1_CDC20_1_Ser355p__CDC20_APC_1_*Nuc;
  R247: _Nuc__APC_FBXO5_FZR1_CDC20_1_Ser355p__CDC20_APC_1_ + _Nuc__CCNB_CDK1_Thr14_Tyr15p_CDKN1A_ => _Nuc__APC_FBXO5_FZR1_CDC20_1_Ser355p__CDC20_APC_1_; kDeCb3*_Nuc__APC_FBXO5_FZR1_CDC20_1_Ser355p__CDC20_APC_1_*_Nuc__CCNB_CDK1_Thr14_Tyr15p_CDKN1A_*Nuc;
  R248: _Cyt__CDC20_APC_ => ; kDeCdc_1*_Cyt__CDC20_APC_*Cyt;
  R249: _Cyt__APC_FBXO5_FZR1_CDC20_1_Ser355p__CDC20_APC_1_ => _Cyt__APC_FBXO5_FZR1_CDC20_Ser355p_; kDeCdc_1*_Cyt__APC_FBXO5_FZR1_CDC20_1_Ser355p__CDC20_APC_1_*Cyt;
  R250: _Nuc__CDC20_APC_ => ; kDeCdc_1*_Nuc__CDC20_APC_*Nuc;
  R251: _Nuc__APC_FBXO5_FZR1_CDC20_1_Ser355p__CDC20_APC_1_ => _Nuc__APC_FBXO5_FZR1_CDC20_Ser355p_; kDeCdc_1*_Nuc__APC_FBXO5_FZR1_CDC20_1_Ser355p__CDC20_APC_1_*Nuc;
  R252: _Cyt__CDC20_APC_ + _Cyt__APC_FBXO5_FZR1_CDC20_1_Ser355u__FZR1_APC_1_FBXO5_nTermu_ => _Cyt__APC_FBXO5_FZR1_CDC20_1_Ser355u__FZR1_APC_1_FBXO5_nTermu_; kDeCdc_2*_Cyt__CDC20_APC_*_Cyt__APC_FBXO5_FZR1_CDC20_1_Ser355u__FZR1_APC_1_FBXO5_nTermu_*Cyt;
  R253: _Cyt__CDC20_APC_ + _Cyt__APC_FBXO5_FZR1_CDC20_1_Ser355p__FZR1_APC_1_FBXO5_nTermu_ => _Cyt__APC_FBXO5_FZR1_CDC20_1_Ser355p__FZR1_APC_1_FBXO5_nTermu_; kDeCdc_2*_Cyt__CDC20_APC_*_Cyt__APC_FBXO5_FZR1_CDC20_1_Ser355p__FZR1_APC_1_FBXO5_nTermu_*Cyt;
  R254: _Cyt__APC_FBXO5_FZR1_CDC20_1_Ser355p__CDC20_APC_1_ + _Cyt__APC_FBXO5_FZR1_CDC20_1_Ser355u__FZR1_APC_1_FBXO5_nTermu_ => _Cyt__APC_FBXO5_FZR1_CDC20_Ser355p_ + _Cyt__APC_FBXO5_FZR1_CDC20_1_Ser355u__FZR1_APC_1_FBXO5_nTermu_; kDeCdc_2*_Cyt__APC_FBXO5_FZR1_CDC20_1_Ser355p__CDC20_APC_1_*_Cyt__APC_FBXO5_FZR1_CDC20_1_Ser355u__FZR1_APC_1_FBXO5_nTermu_*Cyt;
  R255: _Cyt__APC_FBXO5_FZR1_CDC20_1_Ser355p__CDC20_APC_1_ + _Cyt__APC_FBXO5_FZR1_CDC20_1_Ser355p__FZR1_APC_1_FBXO5_nTermu_ => _Cyt__APC_FBXO5_FZR1_CDC20_Ser355p_ + _Cyt__APC_FBXO5_FZR1_CDC20_1_Ser355p__FZR1_APC_1_FBXO5_nTermu_; kDeCdc_2*_Cyt__APC_FBXO5_FZR1_CDC20_1_Ser355p__CDC20_APC_1_*_Cyt__APC_FBXO5_FZR1_CDC20_1_Ser355p__FZR1_APC_1_FBXO5_nTermu_*Cyt;
  R256: _Nuc__CDC20_APC_ + _Nuc__APC_FBXO5_FZR1_CDC20_1_Ser355u__FZR1_APC_1_FBXO5_nTermu_ => _Nuc__APC_FBXO5_FZR1_CDC20_1_Ser355u__FZR1_APC_1_FBXO5_nTermu_; kDeCdc_2*_Nuc__CDC20_APC_*_Nuc__APC_FBXO5_FZR1_CDC20_1_Ser355u__FZR1_APC_1_FBXO5_nTermu_*Nuc;
  R257: _Nuc__CDC20_APC_ + _Nuc__APC_FBXO5_FZR1_CDC20_1_Ser355p__FZR1_APC_1_FBXO5_nTermu_ => _Nuc__APC_FBXO5_FZR1_CDC20_1_Ser355p__FZR1_APC_1_FBXO5_nTermu_; kDeCdc_2*_Nuc__CDC20_APC_*_Nuc__APC_FBXO5_FZR1_CDC20_1_Ser355p__FZR1_APC_1_FBXO5_nTermu_*Nuc;
  R258: _Nuc__APC_FBXO5_FZR1_CDC20_1_Ser355p__CDC20_APC_1_ + _Nuc__APC_FBXO5_FZR1_CDC20_1_Ser355u__FZR1_APC_1_FBXO5_nTermu_ => _Nuc__APC_FBXO5_FZR1_CDC20_Ser355p_ + _Nuc__APC_FBXO5_FZR1_CDC20_1_Ser355u__FZR1_APC_1_FBXO5_nTermu_; kDeCdc_2*_Nuc__APC_FBXO5_FZR1_CDC20_1_Ser355p__CDC20_APC_1_*_Nuc__APC_FBXO5_FZR1_CDC20_1_Ser355u__FZR1_APC_1_FBXO5_nTermu_*Nuc;
  R259: _Nuc__APC_FBXO5_FZR1_CDC20_1_Ser355p__CDC20_APC_1_ + _Nuc__APC_FBXO5_FZR1_CDC20_1_Ser355p__FZR1_APC_1_FBXO5_nTermu_ => _Nuc__APC_FBXO5_FZR1_CDC20_Ser355p_ + _Nuc__APC_FBXO5_FZR1_CDC20_1_Ser355p__FZR1_APC_1_FBXO5_nTermu_; kDeCdc_2*_Nuc__APC_FBXO5_FZR1_CDC20_1_Ser355p__CDC20_APC_1_*_Nuc__APC_FBXO5_FZR1_CDC20_1_Ser355p__FZR1_APC_1_FBXO5_nTermu_*Nuc;
  R260: => _Cyt__CDC20_APC_; kSyCdc_1*Cyt;
  R261: _Nuc__CDC20_promoter_FOXM1_1__FOXM1_DBD_1_Thr600p_ => _Cyt__CDC20_APC_ + _Nuc__CDC20_promoter_FOXM1_1__FOXM1_DBD_1_Thr600p_; kSyCdc_2*_Nuc__CDC20_promoter_FOXM1_1__FOXM1_DBD_1_Thr600p_*Nuc;
  R262: _Nuc__FOXM1_DBD_Thr600p_ + _Nuc__CDC20_promoter_FOXM1_ => _Nuc__CDC20_promoter_FOXM1_1__FOXM1_DBD_1_Thr600p_; kAsFPcdc*_Nuc__FOXM1_DBD_Thr600p_*_Nuc__CDC20_promoter_FOXM1_*Nuc;
  R263: _Nuc__CDC20_promoter_FOXM1_1__FOXM1_DBD_1_Thr600p_ => _Nuc__FOXM1_DBD_Thr600p_ + _Nuc__CDC20_promoter_FOXM1_; kDiFPcdc*_Nuc__CDC20_promoter_FOXM1_1__FOXM1_DBD_1_Thr600p_*Nuc;
  R264: _Cyt__CCNB_CDK1_Thr14_Tyr15u_CDKN1A_ + _Cyt__WEE1_Ser123u_ => _Cyt__WEE1_Ser123u_ + _Cyt__CCNB_CDK1_Thr14_Tyr15p_CDKN1A_; kWee2*_Cyt__CCNB_CDK1_Thr14_Tyr15u_CDKN1A_*_Cyt__WEE1_Ser123u_*Cyt;
  R265: _Nuc__CCNB_CDK1_Thr14_Tyr15u_CDKN1A_ + _Nuc__WEE1_Ser123u_ => _Nuc__WEE1_Ser123u_ + _Nuc__CCNB_CDK1_Thr14_Tyr15p_CDKN1A_; kWee2*_Nuc__CCNB_CDK1_Thr14_Tyr15u_CDKN1A_*_Nuc__WEE1_Ser123u_*Nuc;
  R266: _Cyt__CCNB_CDK1_Thr14_Tyr15u_CDKN1A_ + _Cyt__WEE1_Ser123p_ => _Cyt__CCNB_CDK1_Thr14_Tyr15p_CDKN1A_ + _Cyt__WEE1_Ser123p_; kWee1*_Cyt__CCNB_CDK1_Thr14_Tyr15u_CDKN1A_*_Cyt__WEE1_Ser123p_*Cyt;
  R267: _Nuc__CCNB_CDK1_Thr14_Tyr15u_CDKN1A_ + _Nuc__WEE1_Ser123p_ => _Nuc__CCNB_CDK1_Thr14_Tyr15p_CDKN1A_ + _Nuc__WEE1_Ser123p_; kWee1*_Nuc__CCNB_CDK1_Thr14_Tyr15u_CDKN1A_*_Nuc__WEE1_Ser123p_*Nuc;
  R268: _Cyt__CCNB_CDK1_Thr14_Tyr15p_CDKN1A_ + _Cyt__CDC25_pSitesp_ => _Cyt__CCNB_CDK1_Thr14_Tyr15u_CDKN1A_ + _Cyt__CDC25_pSitesp_; kCdc25_2*_Cyt__CCNB_CDK1_Thr14_Tyr15p_CDKN1A_*_Cyt__CDC25_pSitesp_*Cyt;
  R269: _Nuc__CCNB_CDK1_Thr14_Tyr15p_CDKN1A_ + _Nuc__CDC25_pSitesp_ => _Nuc__CCNB_CDK1_Thr14_Tyr15u_CDKN1A_ + _Nuc__CDC25_pSitesp_; kCdc25_2*_Nuc__CCNB_CDK1_Thr14_Tyr15p_CDKN1A_*_Nuc__CDC25_pSitesp_*Nuc;
  R270: _Cyt__CCNB_CDK1_Thr14_Tyr15p_CDKN1A_ + _Cyt__CDC25_pSitesu_ => _Cyt__CCNB_CDK1_Thr14_Tyr15u_CDKN1A_ + _Cyt__CDC25_pSitesu_; kCdc25_1*_Cyt__CCNB_CDK1_Thr14_Tyr15p_CDKN1A_*_Cyt__CDC25_pSitesu_*Cyt;
  R271: _Nuc__CCNB_CDK1_Thr14_Tyr15p_CDKN1A_ + _Nuc__CDC25_pSitesu_ => _Nuc__CCNB_CDK1_Thr14_Tyr15u_CDKN1A_ + _Nuc__CDC25_pSitesu_; kCdc25_1*_Nuc__CCNB_CDK1_Thr14_Tyr15p_CDKN1A_*_Nuc__CDC25_pSitesu_*Nuc;
  R272: _Cyt__CCNB_CDK1_Thr14_Tyr15u_CDKN1A_ + _Cyt__CDC25_pSitesu_ => _Cyt__CCNB_CDK1_Thr14_Tyr15u_CDKN1A_ + _Cyt__CDC25_pSitesp_; kPhC25B*_Cyt__CCNB_CDK1_Thr14_Tyr15u_CDKN1A_*_Cyt__CDC25_pSitesu_*Cyt;
  R273: _Nuc__CCNB_CDK1_Thr14_Tyr15u_CDKN1A_ + _Nuc__CDC25_pSitesu_ => _Nuc__CCNB_CDK1_Thr14_Tyr15u_CDKN1A_ + _Nuc__CDC25_pSitesp_; kPhC25B*_Nuc__CCNB_CDK1_Thr14_Tyr15u_CDKN1A_*_Nuc__CDC25_pSitesu_*Nuc;
  R274: _Cyt__CCNA_CDKN1A_B_ + _Cyt__CDC25_pSitesu_ => _Cyt__CCNA_CDKN1A_B_ + _Cyt__CDC25_pSitesp_; kPhC25A*_Cyt__CCNA_CDKN1A_B_*_Cyt__CDC25_pSitesu_*Cyt;
  R275: _Nuc__CCNA_CDKN1A_B_ + _Nuc__CDC25_pSitesu_ => _Nuc__CCNA_CDKN1A_B_ + _Nuc__CDC25_pSitesp_; kPhC25A*_Nuc__CCNA_CDKN1A_B_*_Nuc__CDC25_pSitesu_*Nuc;
  R276: _Cyt__PPP2R2B_ENSA_ARPP19_ + _Cyt__CDC25_pSitesp_ => _Cyt__PPP2R2B_ENSA_ARPP19_ + _Cyt__CDC25_pSitesu_; kDpCdc25*_Cyt__PPP2R2B_ENSA_ARPP19_*_Cyt__CDC25_pSitesp_*Cyt;
  R277: _Nuc__PPP2R2B_ENSA_ARPP19_ + _Nuc__CDC25_pSitesp_ => _Nuc__PPP2R2B_ENSA_ARPP19_ + _Nuc__CDC25_pSitesu_; kDpCdc25*_Nuc__PPP2R2B_ENSA_ARPP19_*_Nuc__CDC25_pSitesp_*Nuc;
  R278: _Cyt__PPP2R2B_ENSA_ARPP19_ + _Cyt__WEE1_Ser123p_ => _Cyt__PPP2R2B_ENSA_ARPP19_ + _Cyt__WEE1_Ser123u_; kDpWee*_Cyt__PPP2R2B_ENSA_ARPP19_*_Cyt__WEE1_Ser123p_*Cyt;
  R279: _Nuc__PPP2R2B_ENSA_ARPP19_ + _Nuc__WEE1_Ser123p_ => _Nuc__PPP2R2B_ENSA_ARPP19_ + _Nuc__WEE1_Ser123u_; kDpWee*_Nuc__PPP2R2B_ENSA_ARPP19_*_Nuc__WEE1_Ser123p_*Nuc;
  R280: _Cyt__CCNA_CDKN1A_B_ + _Cyt__WEE1_Ser123u_ => _Cyt__CCNA_CDKN1A_B_ + _Cyt__WEE1_Ser123p_; kPhWeeA*_Cyt__CCNA_CDKN1A_B_*_Cyt__WEE1_Ser123u_*Cyt;
  R281: _Nuc__CCNA_CDKN1A_B_ + _Nuc__WEE1_Ser123u_ => _Nuc__CCNA_CDKN1A_B_ + _Nuc__WEE1_Ser123p_; kPhWeeA*_Nuc__CCNA_CDKN1A_B_*_Nuc__WEE1_Ser123u_*Nuc;
  R282: _Cyt__CCNB_CDK1_Thr14_Tyr15u_CDKN1A_ + _Cyt__WEE1_Ser123u_ => _Cyt__CCNB_CDK1_Thr14_Tyr15u_CDKN1A_ + _Cyt__WEE1_Ser123p_; kPhWeeB*_Cyt__CCNB_CDK1_Thr14_Tyr15u_CDKN1A_*_Cyt__WEE1_Ser123u_*Cyt;
  R283: _Nuc__CCNB_CDK1_Thr14_Tyr15u_CDKN1A_ + _Nuc__WEE1_Ser123u_ => _Nuc__CCNB_CDK1_Thr14_Tyr15u_CDKN1A_ + _Nuc__WEE1_Ser123p_; kPhWeeB*_Nuc__CCNB_CDK1_Thr14_Tyr15u_CDKN1A_*_Nuc__WEE1_Ser123u_*Nuc;
  R284: _Cyt__CCNB_CDK1_Thr14_Tyr15u_CDKN1A_ + _Cyt__MASTL_Thr198u_ => _Cyt__CCNB_CDK1_Thr14_Tyr15u_CDKN1A_ + _Cyt__MASTL_Thr198p_; kPhGw*_Cyt__CCNB_CDK1_Thr14_Tyr15u_CDKN1A_*_Cyt__MASTL_Thr198u_*Cyt;
  R285: _Nuc__CCNB_CDK1_Thr14_Tyr15u_CDKN1A_ + _Nuc__MASTL_Thr198u_ => _Nuc__CCNB_CDK1_Thr14_Tyr15u_CDKN1A_ + _Nuc__MASTL_Thr198p_; kPhGw*_Nuc__CCNB_CDK1_Thr14_Tyr15u_CDKN1A_*_Nuc__MASTL_Thr198u_*Nuc;
  R286: _Cyt__MASTL_Thr198p_ => _Cyt__MASTL_Thr198u_; kDpGw1*_Cyt__MASTL_Thr198p_*Cyt;
  R287: _Nuc__MASTL_Thr198p_ => _Nuc__MASTL_Thr198u_; kDpGw1*_Nuc__MASTL_Thr198p_*Nuc;
  R288: _Cyt__PPP2R2B_ENSA_ARPP19_ + _Cyt__MASTL_Thr198p_ => _Cyt__PPP2R2B_ENSA_ARPP19_ + _Cyt__MASTL_Thr198u_; kDpGw2*_Cyt__PPP2R2B_ENSA_ARPP19_*_Cyt__MASTL_Thr198p_*Cyt;
  R289: _Nuc__PPP2R2B_ENSA_ARPP19_ + _Nuc__MASTL_Thr198p_ => _Nuc__PPP2R2B_ENSA_ARPP19_ + _Nuc__MASTL_Thr198u_; kDpGw2*_Nuc__PPP2R2B_ENSA_ARPP19_*_Nuc__MASTL_Thr198p_*Nuc;
  R290: _Cyt__MASTL_Thr198p_ + _Cyt__ENSA_ARPP19_PPP2R2B_Ser62_Ser67u_ => _Cyt__MASTL_Thr198p_ + _Cyt__ENSA_ARPP19_PPP2R2B_Ser62_Ser67p_; kPhEnsa*_Cyt__MASTL_Thr198p_*_Cyt__ENSA_ARPP19_PPP2R2B_Ser62_Ser67u_*Cyt;
  R291: _Nuc__MASTL_Thr198p_ + _Nuc__ENSA_ARPP19_PPP2R2B_Ser62_Ser67u_ => _Nuc__MASTL_Thr198p_ + _Nuc__ENSA_ARPP19_PPP2R2B_Ser62_Ser67p_; kPhEnsa*_Nuc__MASTL_Thr198p_*_Nuc__ENSA_ARPP19_PPP2R2B_Ser62_Ser67u_*Nuc;
  R292: _Cyt__ENSA_ARPP19_PPP2R2B_1_Ser62_Ser67p__PPP2R2B_ENSA_ARPP19_1_ => _Cyt__PPP2R2B_ENSA_ARPP19_ + _Cyt__ENSA_ARPP19_PPP2R2B_Ser62_Ser67u_; kDpEnsa*_Cyt__ENSA_ARPP19_PPP2R2B_1_Ser62_Ser67p__PPP2R2B_ENSA_ARPP19_1_*Cyt;
  R293: _Nuc__ENSA_ARPP19_PPP2R2B_1_Ser62_Ser67p__PPP2R2B_ENSA_ARPP19_1_ => _Nuc__PPP2R2B_ENSA_ARPP19_ + _Nuc__ENSA_ARPP19_PPP2R2B_Ser62_Ser67u_; kDpEnsa*_Nuc__ENSA_ARPP19_PPP2R2B_1_Ser62_Ser67p__PPP2R2B_ENSA_ARPP19_1_*Nuc;
  R294: => _Cyt__FBXO5_APC_FZR1_Ser182u_; kSyEmi1*Cyt;
  R295: _Nuc__CCNE_promoter_E2F_1__E2F_DBD_1_RB1_Ser332u_ => _Cyt__CCNE_CDKN1A_B_ + _Nuc__CCNE_promoter_E2F_1__E2F_DBD_1_RB1_Ser332u_; kSyCe2*_Nuc__CCNE_promoter_E2F_1__E2F_DBD_1_RB1_Ser332u_*Nuc;
  R296: _Nuc__CCNE_promoter_E2F_1__E2F_DBD_1_RB1_Ser332p_ => _Cyt__CCNE_CDKN1A_B_ + _Nuc__CCNE_promoter_E2F_1__E2F_DBD_1_RB1_Ser332p_; kSyCe2*_Nuc__CCNE_promoter_E2F_1__E2F_DBD_1_RB1_Ser332p_*Nuc;
  R297: _Cyt__CCNB_CDK1_Thr14_Tyr15u_CDKN1A_ + _Cyt__APC_FBXO5_FZR1_CDC20_1_Ser355u__FZR1_APC_1_FBXO5_nTermu_ => _Cyt__CCNB_CDK1_Thr14_Tyr15u_CDKN1A_ + _Cyt__APC_FBXO5_FZR1_CDC20_Ser355u_ + _Cyt__FZR1_APC_FBXO5_nTermp_; kPhCdhB*_Cyt__CCNB_CDK1_Thr14_Tyr15u_CDKN1A_*_Cyt__APC_FBXO5_FZR1_CDC20_1_Ser355u__FZR1_APC_1_FBXO5_nTermu_*Cyt;
  R298: _Cyt__CCNB_CDK1_Thr14_Tyr15u_CDKN1A_ + _Cyt__APC_FBXO5_FZR1_CDC20_1_Ser355p__FZR1_APC_1_FBXO5_nTermu_ => _Cyt__CCNB_CDK1_Thr14_Tyr15u_CDKN1A_ + _Cyt__APC_FBXO5_FZR1_CDC20_Ser355p_ + _Cyt__FZR1_APC_FBXO5_nTermp_; kPhCdhB*_Cyt__CCNB_CDK1_Thr14_Tyr15u_CDKN1A_*_Cyt__APC_FBXO5_FZR1_CDC20_1_Ser355p__FZR1_APC_1_FBXO5_nTermu_*Cyt;
  R299: _Nuc__CCNB_CDK1_Thr14_Tyr15u_CDKN1A_ + _Nuc__APC_FBXO5_FZR1_CDC20_1_Ser355u__FZR1_APC_1_FBXO5_nTermu_ => _Nuc__CCNB_CDK1_Thr14_Tyr15u_CDKN1A_ + _Nuc__APC_FBXO5_FZR1_CDC20_Ser355u_ + _Nuc__FZR1_APC_FBXO5_nTermp_; kPhCdhB*_Nuc__CCNB_CDK1_Thr14_Tyr15u_CDKN1A_*_Nuc__APC_FBXO5_FZR1_CDC20_1_Ser355u__FZR1_APC_1_FBXO5_nTermu_*Nuc;
  R300: _Nuc__CCNB_CDK1_Thr14_Tyr15u_CDKN1A_ + _Nuc__APC_FBXO5_FZR1_CDC20_1_Ser355p__FZR1_APC_1_FBXO5_nTermu_ => _Nuc__CCNB_CDK1_Thr14_Tyr15u_CDKN1A_ + _Nuc__APC_FBXO5_FZR1_CDC20_Ser355p_ + _Nuc__FZR1_APC_FBXO5_nTermp_; kPhCdhB*_Nuc__CCNB_CDK1_Thr14_Tyr15u_CDKN1A_*_Nuc__APC_FBXO5_FZR1_CDC20_1_Ser355p__FZR1_APC_1_FBXO5_nTermu_*Nuc;
  R301: _Cyt__E2F_DBD_RB1_Ser332u_ + _Cyt__RB1_E2F_Ser807_Ser811u_ => _Cyt__E2F_DBD_RB1_1_Ser332u__RB1_E2F_1_Ser807_Ser811u_; kAsE2fRb*_Cyt__E2F_DBD_RB1_Ser332u_*_Cyt__RB1_E2F_Ser807_Ser811u_*Cyt;
  R302: _Cyt__E2F_DBD_RB1_Ser332p_ + _Cyt__RB1_E2F_Ser807_Ser811u_ => _Cyt__E2F_DBD_RB1_1_Ser332p__RB1_E2F_1_Ser807_Ser811u_; kAsE2fRb*_Cyt__E2F_DBD_RB1_Ser332p_*_Cyt__RB1_E2F_Ser807_Ser811u_*Cyt;
  R303: _Nuc__E2F_DBD_RB1_Ser332u_ + _Nuc__RB1_E2F_Ser807_Ser811u_ => _Nuc__E2F_DBD_RB1_1_Ser332u__RB1_E2F_1_Ser807_Ser811u_; kAsE2fRb*_Nuc__E2F_DBD_RB1_Ser332u_*_Nuc__RB1_E2F_Ser807_Ser811u_*Nuc;
  R304: _Nuc__E2F_DBD_RB1_Ser332p_ + _Nuc__RB1_E2F_Ser807_Ser811u_ => _Nuc__E2F_DBD_RB1_1_Ser332p__RB1_E2F_1_Ser807_Ser811u_; kAsE2fRb*_Nuc__E2F_DBD_RB1_Ser332p_*_Nuc__RB1_E2F_Ser807_Ser811u_*Nuc;
  R305: _Cyt__E2F_DBD_RB1_1_Ser332u__RB1_E2F_1_Ser807_Ser811u_ => _Cyt__E2F_DBD_RB1_Ser332u_ + _Cyt__RB1_E2F_Ser807_Ser811u_; kDiE2fRb*_Cyt__E2F_DBD_RB1_1_Ser332u__RB1_E2F_1_Ser807_Ser811u_*Cyt;
  R306: _Cyt__E2F_DBD_RB1_1_Ser332p__RB1_E2F_1_Ser807_Ser811u_ => _Cyt__E2F_DBD_RB1_Ser332p_ + _Cyt__RB1_E2F_Ser807_Ser811u_; kDiE2fRb*_Cyt__E2F_DBD_RB1_1_Ser332p__RB1_E2F_1_Ser807_Ser811u_*Cyt;
  R307: _Nuc__E2F_DBD_RB1_1_Ser332u__RB1_E2F_1_Ser807_Ser811u_ => _Nuc__E2F_DBD_RB1_Ser332u_ + _Nuc__RB1_E2F_Ser807_Ser811u_; kDiE2fRb*_Nuc__E2F_DBD_RB1_1_Ser332u__RB1_E2F_1_Ser807_Ser811u_*Nuc;
  R308: _Nuc__E2F_DBD_RB1_1_Ser332p__RB1_E2F_1_Ser807_Ser811u_ => _Nuc__E2F_DBD_RB1_Ser332p_ + _Nuc__RB1_E2F_Ser807_Ser811u_; kDiE2fRb*_Nuc__E2F_DBD_RB1_1_Ser332p__RB1_E2F_1_Ser807_Ser811u_*Nuc;
  R309: _Cyt__APC_FBXO5_FZR1_CDC20_Ser355u_ + _Cyt__FZR1_APC_FBXO5_nTermu_ => _Cyt__APC_FBXO5_FZR1_CDC20_1_Ser355u__FZR1_APC_1_FBXO5_nTermu_; kAsACdh*_Cyt__APC_FBXO5_FZR1_CDC20_Ser355u_*_Cyt__FZR1_APC_FBXO5_nTermu_*Cyt;
  R310: _Cyt__APC_FBXO5_FZR1_CDC20_Ser355p_ + _Cyt__FZR1_APC_FBXO5_nTermu_ => _Cyt__APC_FBXO5_FZR1_CDC20_1_Ser355p__FZR1_APC_1_FBXO5_nTermu_; kAsACdh*_Cyt__APC_FBXO5_FZR1_CDC20_Ser355p_*_Cyt__FZR1_APC_FBXO5_nTermu_*Cyt;
  R311: _Nuc__APC_FBXO5_FZR1_CDC20_Ser355u_ + _Nuc__FZR1_APC_FBXO5_nTermu_ => _Nuc__APC_FBXO5_FZR1_CDC20_1_Ser355u__FZR1_APC_1_FBXO5_nTermu_; kAsACdh*_Nuc__APC_FBXO5_FZR1_CDC20_Ser355u_*_Nuc__FZR1_APC_FBXO5_nTermu_*Nuc;
  R312: _Nuc__APC_FBXO5_FZR1_CDC20_Ser355p_ + _Nuc__FZR1_APC_FBXO5_nTermu_ => _Nuc__APC_FBXO5_FZR1_CDC20_1_Ser355p__FZR1_APC_1_FBXO5_nTermu_; kAsACdh*_Nuc__APC_FBXO5_FZR1_CDC20_Ser355p_*_Nuc__FZR1_APC_FBXO5_nTermu_*Nuc;
  R313: _Cyt__APC_FBXO5_FZR1_CDC20_1_Ser355u__FZR1_APC_1_FBXO5_nTermu_ => _Cyt__APC_FBXO5_FZR1_CDC20_Ser355u_ + _Cyt__FZR1_APC_FBXO5_nTermu_; kDiACdh*_Cyt__APC_FBXO5_FZR1_CDC20_1_Ser355u__FZR1_APC_1_FBXO5_nTermu_*Cyt;
  R314: _Cyt__APC_FBXO5_FZR1_CDC20_1_Ser355p__FZR1_APC_1_FBXO5_nTermu_ => _Cyt__APC_FBXO5_FZR1_CDC20_Ser355p_ + _Cyt__FZR1_APC_FBXO5_nTermu_; kDiACdh*_Cyt__APC_FBXO5_FZR1_CDC20_1_Ser355p__FZR1_APC_1_FBXO5_nTermu_*Cyt;
  R315: _Nuc__APC_FBXO5_FZR1_CDC20_1_Ser355u__FZR1_APC_1_FBXO5_nTermu_ => _Nuc__APC_FBXO5_FZR1_CDC20_Ser355u_ + _Nuc__FZR1_APC_FBXO5_nTermu_; kDiACdh*_Nuc__APC_FBXO5_FZR1_CDC20_1_Ser355u__FZR1_APC_1_FBXO5_nTermu_*Nuc;
  R316: _Nuc__APC_FBXO5_FZR1_CDC20_1_Ser355p__FZR1_APC_1_FBXO5_nTermu_ => _Nuc__APC_FBXO5_FZR1_CDC20_Ser355p_ + _Nuc__FZR1_APC_FBXO5_nTermu_; kDiACdh*_Nuc__APC_FBXO5_FZR1_CDC20_1_Ser355p__FZR1_APC_1_FBXO5_nTermu_*Nuc;
  R317: _Cyt__APC_FBXO5_FZR1_CDC20_1_Ser355u__FZR1_APC_1_FBXO5_nTermu_ + _Cyt__FBXO5_APC_FZR1_Ser182u_ => _Cyt__APC_FBXO5_1_FZR1_CDC20_2_Ser355u__FBXO5_APC_1_FZR1_3_Ser182u__FZR1_APC_2_FBXO5_3_nTermu_; kAsACE*_Cyt__APC_FBXO5_FZR1_CDC20_1_Ser355u__FZR1_APC_1_FBXO5_nTermu_*_Cyt__FBXO5_APC_FZR1_Ser182u_*Cyt;
  R318: _Cyt__FBXO5_APC_FZR1_Ser182u_ + _Cyt__APC_FBXO5_FZR1_CDC20_1_Ser355p__FZR1_APC_1_FBXO5_nTermu_ => _Cyt__APC_FBXO5_1_FZR1_CDC20_2_Ser355p__FBXO5_APC_1_FZR1_3_Ser182u__FZR1_APC_2_FBXO5_3_nTermu_; kAsACE*_Cyt__FBXO5_APC_FZR1_Ser182u_*_Cyt__APC_FBXO5_FZR1_CDC20_1_Ser355p__FZR1_APC_1_FBXO5_nTermu_*Cyt;
  R319: _Nuc__APC_FBXO5_FZR1_CDC20_1_Ser355u__FZR1_APC_1_FBXO5_nTermu_ + _Nuc__FBXO5_APC_FZR1_Ser182u_ => _Nuc__APC_FBXO5_1_FZR1_CDC20_2_Ser355u__FBXO5_APC_1_FZR1_3_Ser182u__FZR1_APC_2_FBXO5_3_nTermu_; kAsACE*_Nuc__APC_FBXO5_FZR1_CDC20_1_Ser355u__FZR1_APC_1_FBXO5_nTermu_*_Nuc__FBXO5_APC_FZR1_Ser182u_*Nuc;
  R320: _Nuc__FBXO5_APC_FZR1_Ser182u_ + _Nuc__APC_FBXO5_FZR1_CDC20_1_Ser355p__FZR1_APC_1_FBXO5_nTermu_ => _Nuc__APC_FBXO5_1_FZR1_CDC20_2_Ser355p__FBXO5_APC_1_FZR1_3_Ser182u__FZR1_APC_2_FBXO5_3_nTermu_; kAsACE*_Nuc__FBXO5_APC_FZR1_Ser182u_*_Nuc__APC_FBXO5_FZR1_CDC20_1_Ser355p__FZR1_APC_1_FBXO5_nTermu_*Nuc;
  R321: _Cyt__APC_FBXO5_1_FZR1_CDC20_2_Ser355u__FBXO5_APC_1_FZR1_3_Ser182u__FZR1_APC_2_FBXO5_3_nTermu_ => _Cyt__APC_FBXO5_FZR1_CDC20_1_Ser355u__FZR1_APC_1_FBXO5_nTermu_ + _Cyt__FBXO5_APC_FZR1_Ser182u_; kDiACE*_Cyt__APC_FBXO5_1_FZR1_CDC20_2_Ser355u__FBXO5_APC_1_FZR1_3_Ser182u__FZR1_APC_2_FBXO5_3_nTermu_*Cyt;
  R322: _Cyt__APC_FBXO5_1_FZR1_CDC20_2_Ser355p__FBXO5_APC_1_FZR1_3_Ser182u__FZR1_APC_2_FBXO5_3_nTermu_ => _Cyt__FBXO5_APC_FZR1_Ser182u_ + _Cyt__APC_FBXO5_FZR1_CDC20_1_Ser355p__FZR1_APC_1_FBXO5_nTermu_; kDiACE*_Cyt__APC_FBXO5_1_FZR1_CDC20_2_Ser355p__FBXO5_APC_1_FZR1_3_Ser182u__FZR1_APC_2_FBXO5_3_nTermu_*Cyt;
  R323: _Nuc__APC_FBXO5_1_FZR1_CDC20_2_Ser355u__FBXO5_APC_1_FZR1_3_Ser182u__FZR1_APC_2_FBXO5_3_nTermu_ => _Nuc__APC_FBXO5_FZR1_CDC20_1_Ser355u__FZR1_APC_1_FBXO5_nTermu_ + _Nuc__FBXO5_APC_FZR1_Ser182u_; kDiACE*_Nuc__APC_FBXO5_1_FZR1_CDC20_2_Ser355u__FBXO5_APC_1_FZR1_3_Ser182u__FZR1_APC_2_FBXO5_3_nTermu_*Nuc;
  R324: _Nuc__APC_FBXO5_1_FZR1_CDC20_2_Ser355p__FBXO5_APC_1_FZR1_3_Ser182u__FZR1_APC_2_FBXO5_3_nTermu_ => _Nuc__FBXO5_APC_FZR1_Ser182u_ + _Nuc__APC_FBXO5_FZR1_CDC20_1_Ser355p__FZR1_APC_1_FBXO5_nTermu_; kDiACE*_Nuc__APC_FBXO5_1_FZR1_CDC20_2_Ser355p__FBXO5_APC_1_FZR1_3_Ser182u__FZR1_APC_2_FBXO5_3_nTermu_*Nuc;
  R325: _Cyt__CDC20_APC_ + _Cyt__APC_FBXO5_FZR1_CDC20_Ser355p_ => _Cyt__APC_FBXO5_FZR1_CDC20_1_Ser355p__CDC20_APC_1_; kAspACdc*_Cyt__CDC20_APC_*_Cyt__APC_FBXO5_FZR1_CDC20_Ser355p_*Cyt;
  R326: _Nuc__CDC20_APC_ + _Nuc__APC_FBXO5_FZR1_CDC20_Ser355p_ => _Nuc__APC_FBXO5_FZR1_CDC20_1_Ser355p__CDC20_APC_1_; kAspACdc*_Nuc__CDC20_APC_*_Nuc__APC_FBXO5_FZR1_CDC20_Ser355p_*Nuc;
  R327: _Cyt__APC_FBXO5_FZR1_CDC20_1_Ser355p__CDC20_APC_1_ => _Cyt__CDC20_APC_ + _Cyt__APC_FBXO5_FZR1_CDC20_Ser355p_; kDipACdc*_Cyt__APC_FBXO5_FZR1_CDC20_1_Ser355p__CDC20_APC_1_*Cyt;
  R328: _Nuc__APC_FBXO5_FZR1_CDC20_1_Ser355p__CDC20_APC_1_ => _Nuc__CDC20_APC_ + _Nuc__APC_FBXO5_FZR1_CDC20_Ser355p_; kDipACdc*_Nuc__APC_FBXO5_FZR1_CDC20_1_Ser355p__CDC20_APC_1_*Nuc;
  R329: _Cyt__PPP2R2B_ENSA_ARPP19_ + _Cyt__ENSA_ARPP19_PPP2R2B_Ser62_Ser67p_ => _Cyt__ENSA_ARPP19_PPP2R2B_1_Ser62_Ser67p__PPP2R2B_ENSA_ARPP19_1_; kAspEB55*_Cyt__PPP2R2B_ENSA_ARPP19_*_Cyt__ENSA_ARPP19_PPP2R2B_Ser62_Ser67p_*Cyt;
  R330: _Nuc__PPP2R2B_ENSA_ARPP19_ + _Nuc__ENSA_ARPP19_PPP2R2B_Ser62_Ser67p_ => _Nuc__ENSA_ARPP19_PPP2R2B_1_Ser62_Ser67p__PPP2R2B_ENSA_ARPP19_1_; kAspEB55*_Nuc__PPP2R2B_ENSA_ARPP19_*_Nuc__ENSA_ARPP19_PPP2R2B_Ser62_Ser67p_*Nuc;
  R331: _Cyt__ENSA_ARPP19_PPP2R2B_1_Ser62_Ser67p__PPP2R2B_ENSA_ARPP19_1_ => _Cyt__PPP2R2B_ENSA_ARPP19_ + _Cyt__ENSA_ARPP19_PPP2R2B_Ser62_Ser67p_; kDipEB55*_Cyt__ENSA_ARPP19_PPP2R2B_1_Ser62_Ser67p__PPP2R2B_ENSA_ARPP19_1_*Cyt;
  R332: _Nuc__ENSA_ARPP19_PPP2R2B_1_Ser62_Ser67p__PPP2R2B_ENSA_ARPP19_1_ => _Nuc__PPP2R2B_ENSA_ARPP19_ + _Nuc__ENSA_ARPP19_PPP2R2B_Ser62_Ser67p_; kDipEB55*_Nuc__ENSA_ARPP19_PPP2R2B_1_Ser62_Ser67p__PPP2R2B_ENSA_ARPP19_1_*Nuc;
  R333: _Nuc__E2F_DBD_RB1_Ser332u_ + _Nuc__CCNE_promoter_E2F_ => _Nuc__CCNE_promoter_E2F_1__E2F_DBD_1_RB1_Ser332u_; kAsEPx*_Nuc__E2F_DBD_RB1_Ser332u_*_Nuc__CCNE_promoter_E2F_*Nuc;
  R334: _Nuc__E2F_DBD_RB1_Ser332p_ + _Nuc__CCNE_promoter_E2F_ => _Nuc__CCNE_promoter_E2F_1__E2F_DBD_1_RB1_Ser332p_; kAsEPx*_Nuc__E2F_DBD_RB1_Ser332p_*_Nuc__CCNE_promoter_E2F_*Nuc;
  R335: _Nuc__CCNE_promoter_E2F_1__E2F_DBD_1_RB1_Ser332u_ => _Nuc__E2F_DBD_RB1_Ser332u_ + _Nuc__CCNE_promoter_E2F_; kDiEPx*_Nuc__CCNE_promoter_E2F_1__E2F_DBD_1_RB1_Ser332u_*Nuc;
  R336: _Nuc__CCNE_promoter_E2F_1__E2F_DBD_1_RB1_Ser332p_ => _Nuc__E2F_DBD_RB1_Ser332p_ + _Nuc__CCNE_promoter_E2F_; kDiEPx*_Nuc__CCNE_promoter_E2F_1__E2F_DBD_1_RB1_Ser332p_*Nuc;
  R337: _Nuc__E2F_DBD_RB1_Ser332u_ + _Nuc__CCNA_promoter_E2F_ => _Nuc__CCNA_promoter_E2F_1__E2F_DBD_1_RB1_Ser332u_; kAsEPx*_Nuc__E2F_DBD_RB1_Ser332u_*_Nuc__CCNA_promoter_E2F_*Nuc;
  R338: _Nuc__E2F_DBD_RB1_Ser332p_ + _Nuc__CCNA_promoter_E2F_ => _Nuc__CCNA_promoter_E2F_1__E2F_DBD_1_RB1_Ser332p_; kAsEPx*_Nuc__E2F_DBD_RB1_Ser332p_*_Nuc__CCNA_promoter_E2F_*Nuc;
  R339: _Nuc__CCNA_promoter_E2F_1__E2F_DBD_1_RB1_Ser332u_ => _Nuc__E2F_DBD_RB1_Ser332u_ + _Nuc__CCNA_promoter_E2F_; kDiEPx*_Nuc__CCNA_promoter_E2F_1__E2F_DBD_1_RB1_Ser332u_*Nuc;
  R340: _Nuc__CCNA_promoter_E2F_1__E2F_DBD_1_RB1_Ser332p_ => _Nuc__E2F_DBD_RB1_Ser332p_ + _Nuc__CCNA_promoter_E2F_; kDiEPx*_Nuc__CCNA_promoter_E2F_1__E2F_DBD_1_RB1_Ser332p_*Nuc;
  R341: _Nuc__E2F_DBD_RB1_Ser332u_ + _Nuc__E2F_promoter_E2F_ => _Nuc__E2F_DBD_1_RB1_Ser332u__E2F_promoter_E2F_1_; kAsEPx*_Nuc__E2F_DBD_RB1_Ser332u_*_Nuc__E2F_promoter_E2F_*Nuc;
  R342: _Nuc__E2F_DBD_RB1_Ser332p_ + _Nuc__E2F_promoter_E2F_ => _Nuc__E2F_DBD_1_RB1_Ser332p__E2F_promoter_E2F_1_; kAsEPx*_Nuc__E2F_DBD_RB1_Ser332p_*_Nuc__E2F_promoter_E2F_*Nuc;
  R343: _Nuc__E2F_DBD_1_RB1_Ser332u__E2F_promoter_E2F_1_ => _Nuc__E2F_DBD_RB1_Ser332u_ + _Nuc__E2F_promoter_E2F_; kDiEPx*_Nuc__E2F_DBD_1_RB1_Ser332u__E2F_promoter_E2F_1_*Nuc;
  R344: _Nuc__E2F_DBD_1_RB1_Ser332p__E2F_promoter_E2F_1_ => _Nuc__E2F_DBD_RB1_Ser332p_ + _Nuc__E2F_promoter_E2F_; kDiEPx*_Nuc__E2F_DBD_1_RB1_Ser332p__E2F_promoter_E2F_1_*Nuc;
  R345: _Nuc__E2F_DBD_RB1_Ser332u_ + _Nuc__FBXO5_promoter_E2F_ => _Nuc__E2F_DBD_1_RB1_Ser332u__FBXO5_promoter_E2F_1_; kAsEPx*_Nuc__E2F_DBD_RB1_Ser332u_*_Nuc__FBXO5_promoter_E2F_*Nuc;
  R346: _Nuc__E2F_DBD_RB1_Ser332p_ + _Nuc__FBXO5_promoter_E2F_ => _Nuc__E2F_DBD_1_RB1_Ser332p__FBXO5_promoter_E2F_1_; kAsEPx*_Nuc__E2F_DBD_RB1_Ser332p_*_Nuc__FBXO5_promoter_E2F_*Nuc;
  R347: _Nuc__E2F_DBD_1_RB1_Ser332u__FBXO5_promoter_E2F_1_ => _Nuc__E2F_DBD_RB1_Ser332u_ + _Nuc__FBXO5_promoter_E2F_; kDiEPx*_Nuc__E2F_DBD_1_RB1_Ser332u__FBXO5_promoter_E2F_1_*Nuc;
  R348: _Nuc__E2F_DBD_1_RB1_Ser332p__FBXO5_promoter_E2F_1_ => _Nuc__E2F_DBD_RB1_Ser332p_ + _Nuc__FBXO5_promoter_E2F_; kDiEPx*_Nuc__E2F_DBD_1_RB1_Ser332p__FBXO5_promoter_E2F_1_*Nuc;
  R349: _Nuc__E2F_DBD_RB1_Ser332u_ + _Nuc__FOXM1_promoter_E2F_ => _Nuc__E2F_DBD_1_RB1_Ser332u__FOXM1_promoter_E2F_1_; kAsEPx*_Nuc__E2F_DBD_RB1_Ser332u_*_Nuc__FOXM1_promoter_E2F_*Nuc;
  R350: _Nuc__E2F_DBD_RB1_Ser332p_ + _Nuc__FOXM1_promoter_E2F_ => _Nuc__E2F_DBD_1_RB1_Ser332p__FOXM1_promoter_E2F_1_; kAsEPx*_Nuc__E2F_DBD_RB1_Ser332p_*_Nuc__FOXM1_promoter_E2F_*Nuc;
  R351: _Nuc__E2F_DBD_1_RB1_Ser332u__FOXM1_promoter_E2F_1_ => _Nuc__E2F_DBD_RB1_Ser332u_ + _Nuc__FOXM1_promoter_E2F_; kDiEPx*_Nuc__E2F_DBD_1_RB1_Ser332u__FOXM1_promoter_E2F_1_*Nuc;
  R352: _Nuc__E2F_DBD_1_RB1_Ser332p__FOXM1_promoter_E2F_1_ => _Nuc__E2F_DBD_RB1_Ser332p_ + _Nuc__FOXM1_promoter_E2F_; kDiEPx*_Nuc__E2F_DBD_1_RB1_Ser332p__FOXM1_promoter_E2F_1_*Nuc;
  R353: => _Cyt__SKP2; kSySkp2*Cyt;
  R354: _Cyt__SKP2 => ; kDeSkp2_1*_Cyt__SKP2*Cyt;
  R355: _Nuc__SKP2 => ; kDeSkp2_1*_Nuc__SKP2*Nuc;
  R356: _Cyt__APC_FBXO5_FZR1_CDC20_1_Ser355u__FZR1_APC_1_FBXO5_nTermu_ + _Cyt__SKP2 => _Cyt__APC_FBXO5_FZR1_CDC20_1_Ser355u__FZR1_APC_1_FBXO5_nTermu_; kDeSkp2_2*_Cyt__APC_FBXO5_FZR1_CDC20_1_Ser355u__FZR1_APC_1_FBXO5_nTermu_*_Cyt__SKP2*Cyt;
  R357: _Cyt__APC_FBXO5_FZR1_CDC20_1_Ser355p__FZR1_APC_1_FBXO5_nTermu_ + _Cyt__SKP2 => _Cyt__APC_FBXO5_FZR1_CDC20_1_Ser355p__FZR1_APC_1_FBXO5_nTermu_; kDeSkp2_2*_Cyt__APC_FBXO5_FZR1_CDC20_1_Ser355p__FZR1_APC_1_FBXO5_nTermu_*_Cyt__SKP2*Cyt;
  R358: _Nuc__APC_FBXO5_FZR1_CDC20_1_Ser355u__FZR1_APC_1_FBXO5_nTermu_ + _Nuc__SKP2 => _Nuc__APC_FBXO5_FZR1_CDC20_1_Ser355u__FZR1_APC_1_FBXO5_nTermu_; kDeSkp2_2*_Nuc__APC_FBXO5_FZR1_CDC20_1_Ser355u__FZR1_APC_1_FBXO5_nTermu_*_Nuc__SKP2*Nuc;
  R359: _Nuc__APC_FBXO5_FZR1_CDC20_1_Ser355p__FZR1_APC_1_FBXO5_nTermu_ + _Nuc__SKP2 => _Nuc__APC_FBXO5_FZR1_CDC20_1_Ser355p__FZR1_APC_1_FBXO5_nTermu_; kDeSkp2_2*_Nuc__APC_FBXO5_FZR1_CDC20_1_Ser355p__FZR1_APC_1_FBXO5_nTermu_*_Nuc__SKP2*Nuc;
  R360: _Nuc__TP53_DBD_Ser15p_ + _Nuc__CDKN1A_promoter_TP53_ => _Nuc__CDKN1A_promoter_TP53_1__TP53_DBD_1_Ser15p_; kAsTP53PCDKN1A*_Nuc__TP53_DBD_Ser15p_*_Nuc__CDKN1A_promoter_TP53_*Nuc;
  R361: => _Cyt__CDKN1A_CCNE_A_B_Ser130u_; kSyCDKN1A_1*Cyt;
  R362: _Nuc__FOXO_DBD_ + _Nuc__CDKN1B_promoter_FOXO_ => _Nuc__CDKN1B_promoter_FOXO_1__FOXO_DBD_1_; kAsFOXOPCDKN1B*_Nuc__FOXO_DBD_*_Nuc__CDKN1B_promoter_FOXO_*Nuc;
  R363: => _Cyt__CDKN1B_CCNE_A_Thr187u_; kSyCDKN1B_1*Cyt;
  R364: _Cyt__CCND + _Num__NUP_pSitesu_ => _Num__NUP_pSitesu_ + _Nuc__CCND; kImImCCND_1*_Cyt__CCND*_Num__NUP_pSitesu_*Num;
  R365: _Num__NUP_pSitesu_ + _Nuc__CCND => _Cyt__CCND + _Num__NUP_pSitesu_; kExImCCND_1*_Num__NUP_pSitesu_*_Nuc__CCND*Num;
  R366: _Cyt__CCNE_CDKN1A_B_ + _Num__NUP_pSitesu_ => _Num__NUP_pSitesu_ + _Nuc__CCNE_CDKN1A_B_; kImImCCNE_CDKN1A_B__1*_Cyt__CCNE_CDKN1A_B_*_Num__NUP_pSitesu_*Num;
  R367: _Num__NUP_pSitesu_ + _Nuc__CCNE_CDKN1A_B_ => _Cyt__CCNE_CDKN1A_B_ + _Num__NUP_pSitesu_; kExImCCNE_CDKN1A_B__1*_Num__NUP_pSitesu_*_Nuc__CCNE_CDKN1A_B_*Num;
  R368: _Cyt__E2F_DBD_RB1_Ser332u_ + _Num__NUP_pSitesu_ => _Num__NUP_pSitesu_ + _Nuc__E2F_DBD_RB1_Ser332u_; kImImE2F_DBD_RB1_Ser332u__1*_Cyt__E2F_DBD_RB1_Ser332u_*_Num__NUP_pSitesu_*Num;
  R369: _Num__NUP_pSitesu_ + _Nuc__E2F_DBD_RB1_Ser332u_ => _Cyt__E2F_DBD_RB1_Ser332u_ + _Num__NUP_pSitesu_; kExImE2F_DBD_RB1_Ser332u__1*_Num__NUP_pSitesu_*_Nuc__E2F_DBD_RB1_Ser332u_*Num;
  R370: _Cyt__E2F_DBD_RB1_Ser332p_ + _Num__NUP_pSitesu_ => _Num__NUP_pSitesu_ + _Nuc__E2F_DBD_RB1_Ser332p_; kImImE2F_DBD_RB1_Ser332p__1*_Cyt__E2F_DBD_RB1_Ser332p_*_Num__NUP_pSitesu_*Num;
  R371: _Num__NUP_pSitesu_ + _Nuc__E2F_DBD_RB1_Ser332p_ => _Cyt__E2F_DBD_RB1_Ser332p_ + _Num__NUP_pSitesu_; kExImE2F_DBD_RB1_Ser332p__1*_Num__NUP_pSitesu_*_Nuc__E2F_DBD_RB1_Ser332p_*Num;
  R372: _Cyt__CCNA_CDKN1A_B_ + _Num__NUP_pSitesu_ => _Num__NUP_pSitesu_ + _Nuc__CCNA_CDKN1A_B_; kImImCCNA_CDKN1A_B__1*_Cyt__CCNA_CDKN1A_B_*_Num__NUP_pSitesu_*Num;
  R373: _Num__NUP_pSitesu_ + _Nuc__CCNA_CDKN1A_B_ => _Cyt__CCNA_CDKN1A_B_ + _Num__NUP_pSitesu_; kExImCCNA_CDKN1A_B__1*_Num__NUP_pSitesu_*_Nuc__CCNA_CDKN1A_B_*Num;
  R374: _Cyt__CCNB_CDK1_Thr14_Tyr15u_CDKN1A_ + _Num__NUP_pSitesu_ => _Num__NUP_pSitesu_ + _Nuc__CCNB_CDK1_Thr14_Tyr15u_CDKN1A_; kImImCCNB_CDK1_Thr14_Tyr15u_CDKN1A__1*_Cyt__CCNB_CDK1_Thr14_Tyr15u_CDKN1A_*_Num__NUP_pSitesu_*Num;
  R375: _Num__NUP_pSitesu_ + _Nuc__CCNB_CDK1_Thr14_Tyr15u_CDKN1A_ => _Cyt__CCNB_CDK1_Thr14_Tyr15u_CDKN1A_ + _Num__NUP_pSitesu_; kExImCCNB_CDK1_Thr14_Tyr15u_CDKN1A__1*_Num__NUP_pSitesu_*_Nuc__CCNB_CDK1_Thr14_Tyr15u_CDKN1A_*Num;
  R376: _Cyt__E2F_DBD_RB1_1_Ser332u__RB1_E2F_1_Ser807_Ser811u_ + _Num__NUP_pSitesu_ => _Num__NUP_pSitesu_ + _Nuc__E2F_DBD_RB1_1_Ser332u__RB1_E2F_1_Ser807_Ser811u_; kImImE2F_DBD_RB11_Ser332u__RB1_E2F1_Ser807_Ser811u__1*_Cyt__E2F_DBD_RB1_1_Ser332u__RB1_E2F_1_Ser807_Ser811u_*_Num__NUP_pSitesu_*Num;
  R377: _Num__NUP_pSitesu_ + _Nuc__E2F_DBD_RB1_1_Ser332u__RB1_E2F_1_Ser807_Ser811u_ => _Cyt__E2F_DBD_RB1_1_Ser332u__RB1_E2F_1_Ser807_Ser811u_ + _Num__NUP_pSitesu_; kExImE2F_DBD_RB11_Ser332u__RB1_E2F1_Ser807_Ser811u__1*_Num__NUP_pSitesu_*_Nuc__E2F_DBD_RB1_1_Ser332u__RB1_E2F_1_Ser807_Ser811u_*Num;
  R378: _Cyt__E2F_DBD_RB1_1_Ser332p__RB1_E2F_1_Ser807_Ser811u_ + _Num__NUP_pSitesu_ => _Num__NUP_pSitesu_ + _Nuc__E2F_DBD_RB1_1_Ser332p__RB1_E2F_1_Ser807_Ser811u_; kImImE2F_DBD_RB11_Ser332p__RB1_E2F1_Ser807_Ser811u__1*_Cyt__E2F_DBD_RB1_1_Ser332p__RB1_E2F_1_Ser807_Ser811u_*_Num__NUP_pSitesu_*Num;
  R379: _Num__NUP_pSitesu_ + _Nuc__E2F_DBD_RB1_1_Ser332p__RB1_E2F_1_Ser807_Ser811u_ => _Cyt__E2F_DBD_RB1_1_Ser332p__RB1_E2F_1_Ser807_Ser811u_ + _Num__NUP_pSitesu_; kExImE2F_DBD_RB11_Ser332p__RB1_E2F1_Ser807_Ser811u__1*_Num__NUP_pSitesu_*_Nuc__E2F_DBD_RB1_1_Ser332p__RB1_E2F_1_Ser807_Ser811u_*Num;
  R380: _Cyt__RB1_E2F_Ser807_Ser811u_ + _Num__NUP_pSitesu_ => _Num__NUP_pSitesu_ + _Nuc__RB1_E2F_Ser807_Ser811u_; kImImRB1_E2F_Ser807_Ser811u__1*_Cyt__RB1_E2F_Ser807_Ser811u_*_Num__NUP_pSitesu_*Num;
  R381: _Num__NUP_pSitesu_ + _Nuc__RB1_E2F_Ser807_Ser811u_ => _Cyt__RB1_E2F_Ser807_Ser811u_ + _Num__NUP_pSitesu_; kExImRB1_E2F_Ser807_Ser811u__1*_Num__NUP_pSitesu_*_Nuc__RB1_E2F_Ser807_Ser811u_*Num;
  R382: _Cyt__RB1_E2F_Ser807_Ser811p_ + _Num__NUP_pSitesu_ => _Num__NUP_pSitesu_ + _Nuc__RB1_E2F_Ser807_Ser811p_; kImImRB1_E2F_Ser807_Ser811p__1*_Cyt__RB1_E2F_Ser807_Ser811p_*_Num__NUP_pSitesu_*Num;
  R383: _Num__NUP_pSitesu_ + _Nuc__RB1_E2F_Ser807_Ser811p_ => _Cyt__RB1_E2F_Ser807_Ser811p_ + _Num__NUP_pSitesu_; kExImRB1_E2F_Ser807_Ser811p__1*_Num__NUP_pSitesu_*_Nuc__RB1_E2F_Ser807_Ser811p_*Num;
  R384: _Cyt__PPP2R2B_ENSA_ARPP19_ + _Num__NUP_pSitesu_ => _Num__NUP_pSitesu_ + _Nuc__PPP2R2B_ENSA_ARPP19_; kImImPPP2R2B_ENSA_ARPP19__1*_Cyt__PPP2R2B_ENSA_ARPP19_*_Num__NUP_pSitesu_*Num;
  R385: _Num__NUP_pSitesu_ + _Nuc__PPP2R2B_ENSA_ARPP19_ => _Cyt__PPP2R2B_ENSA_ARPP19_ + _Num__NUP_pSitesu_; kExImPPP2R2B_ENSA_ARPP19__1*_Num__NUP_pSitesu_*_Nuc__PPP2R2B_ENSA_ARPP19_*Num;
  R386: _Cyt__APC_FBXO5_FZR1_CDC20_Ser355u_ + _Num__NUP_pSitesu_ => _Num__NUP_pSitesu_ + _Nuc__APC_FBXO5_FZR1_CDC20_Ser355u_; kImImAPC_FBXO5_FZR1_CDC20_Ser355u__1*_Cyt__APC_FBXO5_FZR1_CDC20_Ser355u_*_Num__NUP_pSitesu_*Num;
  R387: _Num__NUP_pSitesu_ + _Nuc__APC_FBXO5_FZR1_CDC20_Ser355u_ => _Cyt__APC_FBXO5_FZR1_CDC20_Ser355u_ + _Num__NUP_pSitesu_; kExImAPC_FBXO5_FZR1_CDC20_Ser355u__1*_Num__NUP_pSitesu_*_Nuc__APC_FBXO5_FZR1_CDC20_Ser355u_*Num;
  R388: _Cyt__CDC20_APC_ + _Num__NUP_pSitesu_ => _Num__NUP_pSitesu_ + _Nuc__CDC20_APC_; kImImCDC20_APC__1*_Cyt__CDC20_APC_*_Num__NUP_pSitesu_*Num;
  R389: _Num__NUP_pSitesu_ + _Nuc__CDC20_APC_ => _Cyt__CDC20_APC_ + _Num__NUP_pSitesu_; kExImCDC20_APC__1*_Num__NUP_pSitesu_*_Nuc__CDC20_APC_*Num;
  R390: _Cyt__APC_FBXO5_FZR1_CDC20_1_Ser355p__CDC20_APC_1_ + _Num__NUP_pSitesu_ => _Num__NUP_pSitesu_ + _Nuc__APC_FBXO5_FZR1_CDC20_1_Ser355p__CDC20_APC_1_; kImImAPC_FBXO5_FZR1_CDC201_Ser355p__CDC20_APC1__1*_Cyt__APC_FBXO5_FZR1_CDC20_1_Ser355p__CDC20_APC_1_*_Num__NUP_pSitesu_*Num;
  R391: _Num__NUP_pSitesu_ + _Nuc__APC_FBXO5_FZR1_CDC20_1_Ser355p__CDC20_APC_1_ => _Cyt__APC_FBXO5_FZR1_CDC20_1_Ser355p__CDC20_APC_1_ + _Num__NUP_pSitesu_; kExImAPC_FBXO5_FZR1_CDC201_Ser355p__CDC20_APC1__1*_Num__NUP_pSitesu_*_Nuc__APC_FBXO5_FZR1_CDC20_1_Ser355p__CDC20_APC_1_*Num;
  R392: _Cyt__APC_FBXO5_FZR1_CDC20_Ser355p_ + _Num__NUP_pSitesu_ => _Num__NUP_pSitesu_ + _Nuc__APC_FBXO5_FZR1_CDC20_Ser355p_; kImImAPC_FBXO5_FZR1_CDC20_Ser355p__1*_Cyt__APC_FBXO5_FZR1_CDC20_Ser355p_*_Num__NUP_pSitesu_*Num;
  R393: _Num__NUP_pSitesu_ + _Nuc__APC_FBXO5_FZR1_CDC20_Ser355p_ => _Cyt__APC_FBXO5_FZR1_CDC20_Ser355p_ + _Num__NUP_pSitesu_; kExImAPC_FBXO5_FZR1_CDC20_Ser355p__1*_Num__NUP_pSitesu_*_Nuc__APC_FBXO5_FZR1_CDC20_Ser355p_*Num;
  R394: _Cyt__APC_FBXO5_FZR1_CDC20_1_Ser355u__FZR1_APC_1_FBXO5_nTermu_ + _Num__NUP_pSitesu_ => _Num__NUP_pSitesu_ + _Nuc__APC_FBXO5_FZR1_CDC20_1_Ser355u__FZR1_APC_1_FBXO5_nTermu_; kImImAPC_FBXO5_FZR1_CDC201_Ser355u__FZR1_APC1_FBXO5_nTermu__1*_Cyt__APC_FBXO5_FZR1_CDC20_1_Ser355u__FZR1_APC_1_FBXO5_nTermu_*_Num__NUP_pSitesu_*Num;
  R395: _Num__NUP_pSitesu_ + _Nuc__APC_FBXO5_FZR1_CDC20_1_Ser355u__FZR1_APC_1_FBXO5_nTermu_ => _Cyt__APC_FBXO5_FZR1_CDC20_1_Ser355u__FZR1_APC_1_FBXO5_nTermu_ + _Num__NUP_pSitesu_; kExImAPC_FBXO5_FZR1_CDC201_Ser355u__FZR1_APC1_FBXO5_nTermu__1*_Num__NUP_pSitesu_*_Nuc__APC_FBXO5_FZR1_CDC20_1_Ser355u__FZR1_APC_1_FBXO5_nTermu_*Num;
  R396: _Cyt__FZR1_APC_FBXO5_nTermu_ + _Num__NUP_pSitesu_ => _Num__NUP_pSitesu_ + _Nuc__FZR1_APC_FBXO5_nTermu_; kImImFZR1_APC_FBXO5_nTermu__1*_Cyt__FZR1_APC_FBXO5_nTermu_*_Num__NUP_pSitesu_*Num;
  R397: _Num__NUP_pSitesu_ + _Nuc__FZR1_APC_FBXO5_nTermu_ => _Cyt__FZR1_APC_FBXO5_nTermu_ + _Num__NUP_pSitesu_; kExImFZR1_APC_FBXO5_nTermu__1*_Num__NUP_pSitesu_*_Nuc__FZR1_APC_FBXO5_nTermu_*Num;
  R398: _Cyt__FZR1_APC_FBXO5_nTermp_ + _Num__NUP_pSitesu_ => _Num__NUP_pSitesu_ + _Nuc__FZR1_APC_FBXO5_nTermp_; kImImFZR1_APC_FBXO5_nTermp__1*_Cyt__FZR1_APC_FBXO5_nTermp_*_Num__NUP_pSitesu_*Num;
  R399: _Num__NUP_pSitesu_ + _Nuc__FZR1_APC_FBXO5_nTermp_ => _Cyt__FZR1_APC_FBXO5_nTermp_ + _Num__NUP_pSitesu_; kExImFZR1_APC_FBXO5_nTermp__1*_Num__NUP_pSitesu_*_Nuc__FZR1_APC_FBXO5_nTermp_*Num;
  R400: _Cyt__APC_FBXO5_1_FZR1_CDC20_2_Ser355u__FBXO5_APC_1_FZR1_3_Ser182u__FZR1_APC_2_FBXO5_3_nTermu_ + _Num__NUP_pSitesu_ => _Num__NUP_pSitesu_ + _Nuc__APC_FBXO5_1_FZR1_CDC20_2_Ser355u__FBXO5_APC_1_FZR1_3_Ser182u__FZR1_APC_2_FBXO5_3_nTermu_; kImImAPC_FBXO51_FZR1_CDC202_Ser355u__FBXO5_APC1_FZR13_Ser182u__FZR1_APC2_FBXO53_nTermu__1*_Cyt__APC_FBXO5_1_FZR1_CDC20_2_Ser355u__FBXO5_APC_1_FZR1_3_Ser182u__FZR1_APC_2_FBXO5_3_nTermu_*_Num__NUP_pSitesu_*Num;
  R401: _Num__NUP_pSitesu_ + _Nuc__APC_FBXO5_1_FZR1_CDC20_2_Ser355u__FBXO5_APC_1_FZR1_3_Ser182u__FZR1_APC_2_FBXO5_3_nTermu_ => _Cyt__APC_FBXO5_1_FZR1_CDC20_2_Ser355u__FBXO5_APC_1_FZR1_3_Ser182u__FZR1_APC_2_FBXO5_3_nTermu_ + _Num__NUP_pSitesu_; kExImAPC_FBXO51_FZR1_CDC202_Ser355u__FBXO5_APC1_FZR13_Ser182u__FZR1_APC2_FBXO53_nTermu__1*_Num__NUP_pSitesu_*_Nuc__APC_FBXO5_1_FZR1_CDC20_2_Ser355u__FBXO5_APC_1_FZR1_3_Ser182u__FZR1_APC_2_FBXO5_3_nTermu_*Num;
  R402: _Cyt__FBXO5_APC_FZR1_Ser182u_ + _Num__NUP_pSitesu_ => _Num__NUP_pSitesu_ + _Nuc__FBXO5_APC_FZR1_Ser182u_; kImImFBXO5_APC_FZR1_Ser182u__1*_Cyt__FBXO5_APC_FZR1_Ser182u_*_Num__NUP_pSitesu_*Num;
  R403: _Num__NUP_pSitesu_ + _Nuc__FBXO5_APC_FZR1_Ser182u_ => _Cyt__FBXO5_APC_FZR1_Ser182u_ + _Num__NUP_pSitesu_; kExImFBXO5_APC_FZR1_Ser182u__1*_Num__NUP_pSitesu_*_Nuc__FBXO5_APC_FZR1_Ser182u_*Num;
  R404: _Cyt__APC_FBXO5_1_FZR1_CDC20_2_Ser355p__FBXO5_APC_1_FZR1_3_Ser182u__FZR1_APC_2_FBXO5_3_nTermu_ + _Num__NUP_pSitesu_ => _Num__NUP_pSitesu_ + _Nuc__APC_FBXO5_1_FZR1_CDC20_2_Ser355p__FBXO5_APC_1_FZR1_3_Ser182u__FZR1_APC_2_FBXO5_3_nTermu_; kImImAPC_FBXO51_FZR1_CDC202_Ser355p__FBXO5_APC1_FZR13_Ser182u__FZR1_APC2_FBXO53_nTermu__1*_Cyt__APC_FBXO5_1_FZR1_CDC20_2_Ser355p__FBXO5_APC_1_FZR1_3_Ser182u__FZR1_APC_2_FBXO5_3_nTermu_*_Num__NUP_pSitesu_*Num;
  R405: _Num__NUP_pSitesu_ + _Nuc__APC_FBXO5_1_FZR1_CDC20_2_Ser355p__FBXO5_APC_1_FZR1_3_Ser182u__FZR1_APC_2_FBXO5_3_nTermu_ => _Cyt__APC_FBXO5_1_FZR1_CDC20_2_Ser355p__FBXO5_APC_1_FZR1_3_Ser182u__FZR1_APC_2_FBXO5_3_nTermu_ + _Num__NUP_pSitesu_; kExImAPC_FBXO51_FZR1_CDC202_Ser355p__FBXO5_APC1_FZR13_Ser182u__FZR1_APC2_FBXO53_nTermu__1*_Num__NUP_pSitesu_*_Nuc__APC_FBXO5_1_FZR1_CDC20_2_Ser355p__FBXO5_APC_1_FZR1_3_Ser182u__FZR1_APC_2_FBXO5_3_nTermu_*Num;
  R406: _Cyt__APC_FBXO5_FZR1_CDC20_1_Ser355p__FZR1_APC_1_FBXO5_nTermu_ + _Num__NUP_pSitesu_ => _Num__NUP_pSitesu_ + _Nuc__APC_FBXO5_FZR1_CDC20_1_Ser355p__FZR1_APC_1_FBXO5_nTermu_; kImImAPC_FBXO5_FZR1_CDC201_Ser355p__FZR1_APC1_FBXO5_nTermu__1*_Cyt__APC_FBXO5_FZR1_CDC20_1_Ser355p__FZR1_APC_1_FBXO5_nTermu_*_Num__NUP_pSitesu_*Num;
  R407: _Num__NUP_pSitesu_ + _Nuc__APC_FBXO5_FZR1_CDC20_1_Ser355p__FZR1_APC_1_FBXO5_nTermu_ => _Cyt__APC_FBXO5_FZR1_CDC20_1_Ser355p__FZR1_APC_1_FBXO5_nTermu_ + _Num__NUP_pSitesu_; kExImAPC_FBXO5_FZR1_CDC201_Ser355p__FZR1_APC1_FBXO5_nTermu__1*_Num__NUP_pSitesu_*_Nuc__APC_FBXO5_FZR1_CDC20_1_Ser355p__FZR1_APC_1_FBXO5_nTermu_*Num;
  R408: _Cyt__FBXO5_APC_FZR1_Ser182p_ + _Num__NUP_pSitesu_ => _Num__NUP_pSitesu_ + _Nuc__FBXO5_APC_FZR1_Ser182p_; kImImFBXO5_APC_FZR1_Ser182p__1*_Cyt__FBXO5_APC_FZR1_Ser182p_*_Num__NUP_pSitesu_*Num;
  R409: _Num__NUP_pSitesu_ + _Nuc__FBXO5_APC_FZR1_Ser182p_ => _Cyt__FBXO5_APC_FZR1_Ser182p_ + _Num__NUP_pSitesu_; kExImFBXO5_APC_FZR1_Ser182p__1*_Num__NUP_pSitesu_*_Nuc__FBXO5_APC_FZR1_Ser182p_*Num;
  R410: _Cyt__FOXM1_DBD_Thr600u_ + _Num__NUP_pSitesu_ => _Num__NUP_pSitesu_ + _Nuc__FOXM1_DBD_Thr600u_; kImImFOXM1_DBD_Thr600u__1*_Cyt__FOXM1_DBD_Thr600u_*_Num__NUP_pSitesu_*Num;
  R411: _Num__NUP_pSitesu_ + _Nuc__FOXM1_DBD_Thr600u_ => _Cyt__FOXM1_DBD_Thr600u_ + _Num__NUP_pSitesu_; kExImFOXM1_DBD_Thr600u__1*_Num__NUP_pSitesu_*_Nuc__FOXM1_DBD_Thr600u_*Num;
  R412: _Cyt__FOXM1_DBD_Thr600p_ + _Num__NUP_pSitesu_ => _Num__NUP_pSitesu_ + _Nuc__FOXM1_DBD_Thr600p_; kImImFOXM1_DBD_Thr600p__1*_Cyt__FOXM1_DBD_Thr600p_*_Num__NUP_pSitesu_*Num;
  R413: _Num__NUP_pSitesu_ + _Nuc__FOXM1_DBD_Thr600p_ => _Cyt__FOXM1_DBD_Thr600p_ + _Num__NUP_pSitesu_; kExImFOXM1_DBD_Thr600p__1*_Num__NUP_pSitesu_*_Nuc__FOXM1_DBD_Thr600p_*Num;
  R414: _Cyt__WEE1_Ser123u_ + _Num__NUP_pSitesu_ => _Num__NUP_pSitesu_ + _Nuc__WEE1_Ser123u_; kImImWEE1_Ser123u__1*_Cyt__WEE1_Ser123u_*_Num__NUP_pSitesu_*Num;
  R415: _Num__NUP_pSitesu_ + _Nuc__WEE1_Ser123u_ => _Cyt__WEE1_Ser123u_ + _Num__NUP_pSitesu_; kExImWEE1_Ser123u__1*_Num__NUP_pSitesu_*_Nuc__WEE1_Ser123u_*Num;
  R416: _Cyt__CCNB_CDK1_Thr14_Tyr15p_CDKN1A_ + _Num__NUP_pSitesu_ => _Num__NUP_pSitesu_ + _Nuc__CCNB_CDK1_Thr14_Tyr15p_CDKN1A_; kImImCCNB_CDK1_Thr14_Tyr15p_CDKN1A__1*_Cyt__CCNB_CDK1_Thr14_Tyr15p_CDKN1A_*_Num__NUP_pSitesu_*Num;
  R417: _Num__NUP_pSitesu_ + _Nuc__CCNB_CDK1_Thr14_Tyr15p_CDKN1A_ => _Cyt__CCNB_CDK1_Thr14_Tyr15p_CDKN1A_ + _Num__NUP_pSitesu_; kExImCCNB_CDK1_Thr14_Tyr15p_CDKN1A__1*_Num__NUP_pSitesu_*_Nuc__CCNB_CDK1_Thr14_Tyr15p_CDKN1A_*Num;
  R418: _Cyt__WEE1_Ser123p_ + _Num__NUP_pSitesu_ => _Num__NUP_pSitesu_ + _Nuc__WEE1_Ser123p_; kImImWEE1_Ser123p__1*_Cyt__WEE1_Ser123p_*_Num__NUP_pSitesu_*Num;
  R419: _Num__NUP_pSitesu_ + _Nuc__WEE1_Ser123p_ => _Cyt__WEE1_Ser123p_ + _Num__NUP_pSitesu_; kExImWEE1_Ser123p__1*_Num__NUP_pSitesu_*_Nuc__WEE1_Ser123p_*Num;
  R420: _Cyt__CDC25_pSitesp_ + _Num__NUP_pSitesu_ => _Num__NUP_pSitesu_ + _Nuc__CDC25_pSitesp_; kImImCDC25_pSitesp__1*_Cyt__CDC25_pSitesp_*_Num__NUP_pSitesu_*Num;
  R421: _Num__NUP_pSitesu_ + _Nuc__CDC25_pSitesp_ => _Cyt__CDC25_pSitesp_ + _Num__NUP_pSitesu_; kExImCDC25_pSitesp__1*_Num__NUP_pSitesu_*_Nuc__CDC25_pSitesp_*Num;
  R422: _Cyt__CDC25_pSitesu_ + _Num__NUP_pSitesu_ => _Num__NUP_pSitesu_ + _Nuc__CDC25_pSitesu_; kImImCDC25_pSitesu__1*_Cyt__CDC25_pSitesu_*_Num__NUP_pSitesu_*Num;
  R423: _Num__NUP_pSitesu_ + _Nuc__CDC25_pSitesu_ => _Cyt__CDC25_pSitesu_ + _Num__NUP_pSitesu_; kExImCDC25_pSitesu__1*_Num__NUP_pSitesu_*_Nuc__CDC25_pSitesu_*Num;
  R424: _Cyt__MASTL_Thr198u_ + _Num__NUP_pSitesu_ => _Num__NUP_pSitesu_ + _Nuc__MASTL_Thr198u_; kImImMASTL_Thr198u__1*_Cyt__MASTL_Thr198u_*_Num__NUP_pSitesu_*Num;
  R425: _Num__NUP_pSitesu_ + _Nuc__MASTL_Thr198u_ => _Cyt__MASTL_Thr198u_ + _Num__NUP_pSitesu_; kExImMASTL_Thr198u__1*_Num__NUP_pSitesu_*_Nuc__MASTL_Thr198u_*Num;
  R426: _Cyt__MASTL_Thr198p_ + _Num__NUP_pSitesu_ => _Num__NUP_pSitesu_ + _Nuc__MASTL_Thr198p_; kImImMASTL_Thr198p__1*_Cyt__MASTL_Thr198p_*_Num__NUP_pSitesu_*Num;
  R427: _Num__NUP_pSitesu_ + _Nuc__MASTL_Thr198p_ => _Cyt__MASTL_Thr198p_ + _Num__NUP_pSitesu_; kExImMASTL_Thr198p__1*_Num__NUP_pSitesu_*_Nuc__MASTL_Thr198p_*Num;
  R428: _Cyt__ENSA_ARPP19_PPP2R2B_Ser62_Ser67u_ + _Num__NUP_pSitesu_ => _Num__NUP_pSitesu_ + _Nuc__ENSA_ARPP19_PPP2R2B_Ser62_Ser67u_; kImImENSA_ARPP19_PPP2R2B_Ser62_Ser67u__1*_Cyt__ENSA_ARPP19_PPP2R2B_Ser62_Ser67u_*_Num__NUP_pSitesu_*Num;
  R429: _Num__NUP_pSitesu_ + _Nuc__ENSA_ARPP19_PPP2R2B_Ser62_Ser67u_ => _Cyt__ENSA_ARPP19_PPP2R2B_Ser62_Ser67u_ + _Num__NUP_pSitesu_; kExImENSA_ARPP19_PPP2R2B_Ser62_Ser67u__1*_Num__NUP_pSitesu_*_Nuc__ENSA_ARPP19_PPP2R2B_Ser62_Ser67u_*Num;
  R430: _Cyt__ENSA_ARPP19_PPP2R2B_Ser62_Ser67p_ + _Num__NUP_pSitesu_ => _Num__NUP_pSitesu_ + _Nuc__ENSA_ARPP19_PPP2R2B_Ser62_Ser67p_; kImImENSA_ARPP19_PPP2R2B_Ser62_Ser67p__1*_Cyt__ENSA_ARPP19_PPP2R2B_Ser62_Ser67p_*_Num__NUP_pSitesu_*Num;
  R431: _Num__NUP_pSitesu_ + _Nuc__ENSA_ARPP19_PPP2R2B_Ser62_Ser67p_ => _Cyt__ENSA_ARPP19_PPP2R2B_Ser62_Ser67p_ + _Num__NUP_pSitesu_; kExImENSA_ARPP19_PPP2R2B_Ser62_Ser67p__1*_Num__NUP_pSitesu_*_Nuc__ENSA_ARPP19_PPP2R2B_Ser62_Ser67p_*Num;
  R432: _Cyt__ENSA_ARPP19_PPP2R2B_1_Ser62_Ser67p__PPP2R2B_ENSA_ARPP19_1_ + _Num__NUP_pSitesu_ => _Num__NUP_pSitesu_ + _Nuc__ENSA_ARPP19_PPP2R2B_1_Ser62_Ser67p__PPP2R2B_ENSA_ARPP19_1_; kImImENSA_ARPP19_PPP2R2B1_Ser62_Ser67p__PPP2R2B_ENSA_ARPP191__1*_Cyt__ENSA_ARPP19_PPP2R2B_1_Ser62_Ser67p__PPP2R2B_ENSA_ARPP19_1_*_Num__NUP_pSitesu_*Num;
  R433: _Num__NUP_pSitesu_ + _Nuc__ENSA_ARPP19_PPP2R2B_1_Ser62_Ser67p__PPP2R2B_ENSA_ARPP19_1_ => _Cyt__ENSA_ARPP19_PPP2R2B_1_Ser62_Ser67p__PPP2R2B_ENSA_ARPP19_1_ + _Num__NUP_pSitesu_; kExImENSA_ARPP19_PPP2R2B1_Ser62_Ser67p__PPP2R2B_ENSA_ARPP191__1*_Num__NUP_pSitesu_*_Nuc__ENSA_ARPP19_PPP2R2B_1_Ser62_Ser67p__PPP2R2B_ENSA_ARPP19_1_*Num;
  R434: _Cyt__SKP2 + _Num__NUP_pSitesu_ => _Num__NUP_pSitesu_ + _Nuc__SKP2; kImImSKP2_1*_Cyt__SKP2*_Num__NUP_pSitesu_*Num;
  R435: _Num__NUP_pSitesu_ + _Nuc__SKP2 => _Cyt__SKP2 + _Num__NUP_pSitesu_; kExImSKP2_1*_Num__NUP_pSitesu_*_Nuc__SKP2*Num;
  R436: _Cyt__TP53_DBD_Ser15p_ + _Num__NUP_pSitesu_ => _Num__NUP_pSitesu_ + _Nuc__TP53_DBD_Ser15p_; kImImTP53_DBD_Ser15p__1*_Cyt__TP53_DBD_Ser15p_*_Num__NUP_pSitesu_*Num;
  R437: _Num__NUP_pSitesu_ + _Nuc__TP53_DBD_Ser15p_ => _Cyt__TP53_DBD_Ser15p_ + _Num__NUP_pSitesu_; kExImTP53_DBD_Ser15p__1*_Num__NUP_pSitesu_*_Nuc__TP53_DBD_Ser15p_*Num;
  R438: _Cyt__FOXO_DBD_ + _Num__NUP_pSitesu_ => _Num__NUP_pSitesu_ + _Nuc__FOXO_DBD_; kImImFOXO_DBD__1*_Cyt__FOXO_DBD_*_Num__NUP_pSitesu_*Num;
  R439: _Num__NUP_pSitesu_ + _Nuc__FOXO_DBD_ => _Cyt__FOXO_DBD_ + _Num__NUP_pSitesu_; kExImFOXO_DBD__1*_Num__NUP_pSitesu_*_Nuc__FOXO_DBD_*Num;
  R440: _Nuc__CDKN1A_promoter_TP53_1__TP53_DBD_1_Ser15p_ => _Nuc__TP53_DBD_Ser15p_ + _Nuc__CDKN1A_promoter_TP53_; kDiTP53PCDKN1A*_Nuc__CDKN1A_promoter_TP53_1__TP53_DBD_1_Ser15p_*Nuc;
  R441: _Nuc__CDKN1A_promoter_TP53_1__TP53_DBD_1_Ser15p_ => _Nuc__CDKN1A_promoter_TP53_1__TP53_DBD_1_Ser15p_ + _Cyt__CDKN1A_CCNE_A_B_Ser130u_; kSyCDKN1A_2*_Nuc__CDKN1A_promoter_TP53_1__TP53_DBD_1_Ser15p_*Nuc;
  R442: _Cyt__CDKN1A_CCNE_A_B_Ser130u_ => ; kDeCDKN1A_1*_Cyt__CDKN1A_CCNE_A_B_Ser130u_*Cyt;
  R443: _Cyt__SKP2 + _Cyt__CDKN1A_CCNE_A_B_Ser130u_ => _Cyt__SKP2; kDeCDKN1A_2*_Cyt__SKP2*_Cyt__CDKN1A_CCNE_A_B_Ser130u_*Cyt;
  R444: _Cyt__CCNA_CDKN1A_B_ + _Cyt__CDKN1A_CCNE_A_B_Ser130u_ => _Cyt__CCNA_CDKN1A_B_1__CDKN1A_CCNE_A_B_1_Ser130u_; kAsCdkn1aC*_Cyt__CCNA_CDKN1A_B_*_Cyt__CDKN1A_CCNE_A_B_Ser130u_*Cyt;
  R445: _Cyt__CCNE_CDKN1A_B_ + _Cyt__CDKN1A_CCNE_A_B_Ser130u_ => _Cyt__CCNE_CDKN1A_B_1__CDKN1A_CCNE_A_B_1_Ser130u_; kAsCdkn1aC*_Cyt__CCNE_CDKN1A_B_*_Cyt__CDKN1A_CCNE_A_B_Ser130u_*Cyt;
  R446: _Cyt__CCNB_CDK1_Thr14_Tyr15u_CDKN1A_ + _Cyt__CDKN1A_CCNE_A_B_Ser130u_ => _Cyt__CCNB_CDK1_Thr14_Tyr15u_CDKN1A_1__CDKN1A_CCNE_A_B_1_Ser130u_; kAsCdkn1aC*_Cyt__CCNB_CDK1_Thr14_Tyr15u_CDKN1A_*_Cyt__CDKN1A_CCNE_A_B_Ser130u_*Cyt;
  R447: _Cyt__CCNB_CDK1_Thr14_Tyr15p_CDKN1A_ + _Cyt__CDKN1A_CCNE_A_B_Ser130u_ => _Cyt__CCNB_CDK1_Thr14_Tyr15p_CDKN1A_1__CDKN1A_CCNE_A_B_1_Ser130u_; kAsCdkn1aC*_Cyt__CCNB_CDK1_Thr14_Tyr15p_CDKN1A_*_Cyt__CDKN1A_CCNE_A_B_Ser130u_*Cyt;
  R448: _Cyt__CCNE_CDKN1A_B_ + _Cyt__CDKN1A_CCNE_A_B_Ser130u_ => _Cyt__CCNE_CDKN1A_B_ + _Cyt__CDKN1A_CCNE_A_B_Ser130p_; kPhCDKN1AByCe*_Cyt__CCNE_CDKN1A_B_*_Cyt__CDKN1A_CCNE_A_B_Ser130u_*Cyt;
  R449: _Cyt__CCNA_CDKN1A_B_ + _Cyt__CDKN1A_CCNE_A_B_Ser130u_ => _Cyt__CCNA_CDKN1A_B_ + _Cyt__CDKN1A_CCNE_A_B_Ser130p_; kPhCDKN1AByCa*_Cyt__CCNA_CDKN1A_B_*_Cyt__CDKN1A_CCNE_A_B_Ser130u_*Cyt;
  R450: _Cyt__CCNB_CDK1_Thr14_Tyr15u_CDKN1A_ + _Cyt__CDKN1A_CCNE_A_B_Ser130u_ => _Cyt__CCNB_CDK1_Thr14_Tyr15u_CDKN1A_ + _Cyt__CDKN1A_CCNE_A_B_Ser130p_; kPhCDKN1AByCb*_Cyt__CCNB_CDK1_Thr14_Tyr15u_CDKN1A_*_Cyt__CDKN1A_CCNE_A_B_Ser130u_*Cyt;
  R451: _Nuc__CDKN1B_promoter_FOXO_1__FOXO_DBD_1_ => _Nuc__FOXO_DBD_ + _Nuc__CDKN1B_promoter_FOXO_; kDiFOXOPCDKN1B*_Nuc__CDKN1B_promoter_FOXO_1__FOXO_DBD_1_*Nuc;
  R452: _Nuc__CDKN1B_promoter_FOXO_1__FOXO_DBD_1_ => _Nuc__CDKN1B_promoter_FOXO_1__FOXO_DBD_1_ + _Cyt__CDKN1B_CCNE_A_Thr187u_; kSyCDKN1B_2*_Nuc__CDKN1B_promoter_FOXO_1__FOXO_DBD_1_*Nuc;
  R453: _Cyt__CDKN1B_CCNE_A_Thr187u_ => ; kDeCDKN1B_1*_Cyt__CDKN1B_CCNE_A_Thr187u_*Cyt;
  R454: _Cyt__SKP2 + _Cyt__CDKN1B_CCNE_A_Thr187u_ => _Cyt__SKP2; _rateLaw1*_Cyt__SKP2*_Cyt__CDKN1B_CCNE_A_Thr187u_*Cyt;
  R455: _Cyt__CCNA_CDKN1A_B_ + _Cyt__CDKN1B_CCNE_A_Thr187u_ => _Cyt__CCNA_CDKN1A_B_1__CDKN1B_CCNE_A_1_Thr187u_; kAsCdkn1bC*_Cyt__CCNA_CDKN1A_B_*_Cyt__CDKN1B_CCNE_A_Thr187u_*Cyt;
  R456: _Cyt__CCNE_CDKN1A_B_ + _Cyt__CDKN1B_CCNE_A_Thr187u_ => _Cyt__CCNE_CDKN1A_B_1__CDKN1B_CCNE_A_1_Thr187u_; kAsCdkn1bC*_Cyt__CCNE_CDKN1A_B_*_Cyt__CDKN1B_CCNE_A_Thr187u_*Cyt;
  R457: _Cyt__CCNE_CDKN1A_B_ + _Cyt__CDKN1B_CCNE_A_Thr187u_ => _Cyt__CCNE_CDKN1A_B_ + _Cyt__CDKN1B_CCNE_A_Thr187p_; kPhCDKN1BByCe*_Cyt__CCNE_CDKN1A_B_*_Cyt__CDKN1B_CCNE_A_Thr187u_*Cyt;
  R458: _Cyt__CCNA_CDKN1A_B_ + _Cyt__CDKN1B_CCNE_A_Thr187u_ => _Cyt__CCNA_CDKN1A_B_ + _Cyt__CDKN1B_CCNE_A_Thr187p_; kPhCDKN1BByCa*_Cyt__CCNA_CDKN1A_B_*_Cyt__CDKN1B_CCNE_A_Thr187u_*Cyt;
  R459: _Cyt__CCNB_CDK1_Thr14_Tyr15u_CDKN1A_ + _Cyt__CDKN1B_CCNE_A_Thr187u_ => _Cyt__CCNB_CDK1_Thr14_Tyr15u_CDKN1A_ + _Cyt__CDKN1B_CCNE_A_Thr187p_; kPhCDKN1BByCb*_Cyt__CCNB_CDK1_Thr14_Tyr15u_CDKN1A_*_Cyt__CDKN1B_CCNE_A_Thr187u_*Cyt;
  R460: _Num__NUP_pSitesu_ + _Cyt__CDKN1A_CCNE_A_B_Ser130u_ => _Num__NUP_pSitesu_ + _Nuc__CDKN1A_CCNE_A_B_Ser130u_; kImImCDKN1A_CCNE_A_B_Ser130u__1*_Num__NUP_pSitesu_*_Cyt__CDKN1A_CCNE_A_B_Ser130u_*Num;
  R461: _Num__NUP_pSitesu_ + _Cyt__CDKN1B_CCNE_A_Thr187u_ => _Num__NUP_pSitesu_ + _Nuc__CDKN1B_CCNE_A_Thr187u_; kImImCDKN1B_CCNE_A_Thr187u__1*_Num__NUP_pSitesu_*_Cyt__CDKN1B_CCNE_A_Thr187u_*Num;
  R462: _Cyt__CCNE_CDKN1A_B_1__CDKN1A_CCNE_A_B_1_Ser130u_ => _Cyt__CDKN1A_CCNE_A_B_Ser130u_; kDeCe*_Cyt__CCNE_CDKN1A_B_1__CDKN1A_CCNE_A_B_1_Ser130u_*Cyt;
  R463: _Cyt__CCNE_CDKN1A_B_1__CDKN1B_CCNE_A_1_Thr187u_ => _Cyt__CDKN1B_CCNE_A_Thr187u_; kDeCe*_Cyt__CCNE_CDKN1A_B_1__CDKN1B_CCNE_A_1_Thr187u_*Cyt;
  R464: _Cyt__CCNE_CDKN1A_B_ + _Cyt__CCNE_CDKN1A_B_1__CDKN1A_CCNE_A_B_1_Ser130u_ => _Cyt__CCNE_CDKN1A_B_ + _Cyt__CDKN1A_CCNE_A_B_Ser130u_; kPhCeE*_Cyt__CCNE_CDKN1A_B_*_Cyt__CCNE_CDKN1A_B_1__CDKN1A_CCNE_A_B_1_Ser130u_*Cyt;
  R465: _Cyt__CCNE_CDKN1A_B_ + _Cyt__CCNE_CDKN1A_B_1__CDKN1B_CCNE_A_1_Thr187u_ => _Cyt__CCNE_CDKN1A_B_ + _Cyt__CDKN1B_CCNE_A_Thr187u_; kPhCeE*_Cyt__CCNE_CDKN1A_B_*_Cyt__CCNE_CDKN1A_B_1__CDKN1B_CCNE_A_1_Thr187u_*Cyt;
  R466: _Cyt__CCNA_CDKN1A_B_1__CDKN1A_CCNE_A_B_1_Ser130u_ => _Cyt__CDKN1A_CCNE_A_B_Ser130u_; kDeCa1*_Cyt__CCNA_CDKN1A_B_1__CDKN1A_CCNE_A_B_1_Ser130u_*Cyt;
  R467: _Cyt__CCNA_CDKN1A_B_1__CDKN1B_CCNE_A_1_Thr187u_ => _Cyt__CDKN1B_CCNE_A_Thr187u_; kDeCa1*_Cyt__CCNA_CDKN1A_B_1__CDKN1B_CCNE_A_1_Thr187u_*Cyt;
  R468: _Cyt__CCNA_CDKN1A_B_ + _Cyt__CCNE_CDKN1A_B_1__CDKN1A_CCNE_A_B_1_Ser130u_ => _Cyt__CCNA_CDKN1A_B_ + _Cyt__CDKN1A_CCNE_A_B_Ser130u_; kPhCeA*_Cyt__CCNA_CDKN1A_B_*_Cyt__CCNE_CDKN1A_B_1__CDKN1A_CCNE_A_B_1_Ser130u_*Cyt;
  R469: _Cyt__CCNA_CDKN1A_B_ + _Cyt__CCNE_CDKN1A_B_1__CDKN1B_CCNE_A_1_Thr187u_ => _Cyt__CCNA_CDKN1A_B_ + _Cyt__CDKN1B_CCNE_A_Thr187u_; kPhCeA*_Cyt__CCNA_CDKN1A_B_*_Cyt__CCNE_CDKN1A_B_1__CDKN1B_CCNE_A_1_Thr187u_*Cyt;
  R470: _Cyt__APC_FBXO5_FZR1_CDC20_1_Ser355u__FZR1_APC_1_FBXO5_nTermu_ + _Cyt__CCNA_CDKN1A_B_1__CDKN1A_CCNE_A_B_1_Ser130u_ => _Cyt__APC_FBXO5_FZR1_CDC20_1_Ser355u__FZR1_APC_1_FBXO5_nTermu_ + _Cyt__CDKN1A_CCNE_A_B_Ser130u_; kDeCa2*_Cyt__APC_FBXO5_FZR1_CDC20_1_Ser355u__FZR1_APC_1_FBXO5_nTermu_*_Cyt__CCNA_CDKN1A_B_1__CDKN1A_CCNE_A_B_1_Ser130u_*Cyt;
  R471: _Cyt__APC_FBXO5_FZR1_CDC20_1_Ser355p__FZR1_APC_1_FBXO5_nTermu_ + _Cyt__CCNA_CDKN1A_B_1__CDKN1A_CCNE_A_B_1_Ser130u_ => _Cyt__APC_FBXO5_FZR1_CDC20_1_Ser355p__FZR1_APC_1_FBXO5_nTermu_ + _Cyt__CDKN1A_CCNE_A_B_Ser130u_; kDeCa2*_Cyt__APC_FBXO5_FZR1_CDC20_1_Ser355p__FZR1_APC_1_FBXO5_nTermu_*_Cyt__CCNA_CDKN1A_B_1__CDKN1A_CCNE_A_B_1_Ser130u_*Cyt;
  R472: _Cyt__APC_FBXO5_FZR1_CDC20_1_Ser355u__FZR1_APC_1_FBXO5_nTermu_ + _Cyt__CCNA_CDKN1A_B_1__CDKN1B_CCNE_A_1_Thr187u_ => _Cyt__APC_FBXO5_FZR1_CDC20_1_Ser355u__FZR1_APC_1_FBXO5_nTermu_ + _Cyt__CDKN1B_CCNE_A_Thr187u_; kDeCa2*_Cyt__APC_FBXO5_FZR1_CDC20_1_Ser355u__FZR1_APC_1_FBXO5_nTermu_*_Cyt__CCNA_CDKN1A_B_1__CDKN1B_CCNE_A_1_Thr187u_*Cyt;
  R473: _Cyt__APC_FBXO5_FZR1_CDC20_1_Ser355p__FZR1_APC_1_FBXO5_nTermu_ + _Cyt__CCNA_CDKN1A_B_1__CDKN1B_CCNE_A_1_Thr187u_ => _Cyt__APC_FBXO5_FZR1_CDC20_1_Ser355p__FZR1_APC_1_FBXO5_nTermu_ + _Cyt__CDKN1B_CCNE_A_Thr187u_; kDeCa2*_Cyt__APC_FBXO5_FZR1_CDC20_1_Ser355p__FZR1_APC_1_FBXO5_nTermu_*_Cyt__CCNA_CDKN1A_B_1__CDKN1B_CCNE_A_1_Thr187u_*Cyt;
  R474: _Cyt__APC_FBXO5_FZR1_CDC20_1_Ser355p__CDC20_APC_1_ + _Cyt__CCNA_CDKN1A_B_1__CDKN1A_CCNE_A_B_1_Ser130u_ => _Cyt__APC_FBXO5_FZR1_CDC20_1_Ser355p__CDC20_APC_1_ + _Cyt__CDKN1A_CCNE_A_B_Ser130u_; kDeCa3*_Cyt__APC_FBXO5_FZR1_CDC20_1_Ser355p__CDC20_APC_1_*_Cyt__CCNA_CDKN1A_B_1__CDKN1A_CCNE_A_B_1_Ser130u_*Cyt;
  R475: _Cyt__APC_FBXO5_FZR1_CDC20_1_Ser355p__CDC20_APC_1_ + _Cyt__CCNA_CDKN1A_B_1__CDKN1B_CCNE_A_1_Thr187u_ => _Cyt__APC_FBXO5_FZR1_CDC20_1_Ser355p__CDC20_APC_1_ + _Cyt__CDKN1B_CCNE_A_Thr187u_; kDeCa3*_Cyt__APC_FBXO5_FZR1_CDC20_1_Ser355p__CDC20_APC_1_*_Cyt__CCNA_CDKN1A_B_1__CDKN1B_CCNE_A_1_Thr187u_*Cyt;
  R476: _Cyt__CCNB_CDK1_Thr14_Tyr15u_CDKN1A_1__CDKN1A_CCNE_A_B_1_Ser130u_ => _Cyt__CDKN1A_CCNE_A_B_Ser130u_; kDeCb1*_Cyt__CCNB_CDK1_Thr14_Tyr15u_CDKN1A_1__CDKN1A_CCNE_A_B_1_Ser130u_*Cyt;
  R477: _Cyt__CCNB_CDK1_Thr14_Tyr15p_CDKN1A_1__CDKN1A_CCNE_A_B_1_Ser130u_ => _Cyt__CDKN1A_CCNE_A_B_Ser130u_; kDeCb1*_Cyt__CCNB_CDK1_Thr14_Tyr15p_CDKN1A_1__CDKN1A_CCNE_A_B_1_Ser130u_*Cyt;
  R478: _Cyt__APC_FBXO5_FZR1_CDC20_1_Ser355u__FZR1_APC_1_FBXO5_nTermu_ + _Cyt__CCNB_CDK1_Thr14_Tyr15u_CDKN1A_1__CDKN1A_CCNE_A_B_1_Ser130u_ => _Cyt__APC_FBXO5_FZR1_CDC20_1_Ser355u__FZR1_APC_1_FBXO5_nTermu_ + _Cyt__CDKN1A_CCNE_A_B_Ser130u_; kDeCb2*_Cyt__APC_FBXO5_FZR1_CDC20_1_Ser355u__FZR1_APC_1_FBXO5_nTermu_*_Cyt__CCNB_CDK1_Thr14_Tyr15u_CDKN1A_1__CDKN1A_CCNE_A_B_1_Ser130u_*Cyt;
  R479: _Cyt__APC_FBXO5_FZR1_CDC20_1_Ser355p__FZR1_APC_1_FBXO5_nTermu_ + _Cyt__CCNB_CDK1_Thr14_Tyr15u_CDKN1A_1__CDKN1A_CCNE_A_B_1_Ser130u_ => _Cyt__APC_FBXO5_FZR1_CDC20_1_Ser355p__FZR1_APC_1_FBXO5_nTermu_ + _Cyt__CDKN1A_CCNE_A_B_Ser130u_; kDeCb2*_Cyt__APC_FBXO5_FZR1_CDC20_1_Ser355p__FZR1_APC_1_FBXO5_nTermu_*_Cyt__CCNB_CDK1_Thr14_Tyr15u_CDKN1A_1__CDKN1A_CCNE_A_B_1_Ser130u_*Cyt;
  R480: _Cyt__APC_FBXO5_FZR1_CDC20_1_Ser355u__FZR1_APC_1_FBXO5_nTermu_ + _Cyt__CCNB_CDK1_Thr14_Tyr15p_CDKN1A_1__CDKN1A_CCNE_A_B_1_Ser130u_ => _Cyt__APC_FBXO5_FZR1_CDC20_1_Ser355u__FZR1_APC_1_FBXO5_nTermu_ + _Cyt__CDKN1A_CCNE_A_B_Ser130u_; kDeCb2*_Cyt__APC_FBXO5_FZR1_CDC20_1_Ser355u__FZR1_APC_1_FBXO5_nTermu_*_Cyt__CCNB_CDK1_Thr14_Tyr15p_CDKN1A_1__CDKN1A_CCNE_A_B_1_Ser130u_*Cyt;
  R481: _Cyt__APC_FBXO5_FZR1_CDC20_1_Ser355p__FZR1_APC_1_FBXO5_nTermu_ + _Cyt__CCNB_CDK1_Thr14_Tyr15p_CDKN1A_1__CDKN1A_CCNE_A_B_1_Ser130u_ => _Cyt__APC_FBXO5_FZR1_CDC20_1_Ser355p__FZR1_APC_1_FBXO5_nTermu_ + _Cyt__CDKN1A_CCNE_A_B_Ser130u_; kDeCb2*_Cyt__APC_FBXO5_FZR1_CDC20_1_Ser355p__FZR1_APC_1_FBXO5_nTermu_*_Cyt__CCNB_CDK1_Thr14_Tyr15p_CDKN1A_1__CDKN1A_CCNE_A_B_1_Ser130u_*Cyt;
  R482: _Cyt__APC_FBXO5_FZR1_CDC20_1_Ser355p__CDC20_APC_1_ + _Cyt__CCNB_CDK1_Thr14_Tyr15u_CDKN1A_1__CDKN1A_CCNE_A_B_1_Ser130u_ => _Cyt__APC_FBXO5_FZR1_CDC20_1_Ser355p__CDC20_APC_1_ + _Cyt__CDKN1A_CCNE_A_B_Ser130u_; kDeCb3*_Cyt__APC_FBXO5_FZR1_CDC20_1_Ser355p__CDC20_APC_1_*_Cyt__CCNB_CDK1_Thr14_Tyr15u_CDKN1A_1__CDKN1A_CCNE_A_B_1_Ser130u_*Cyt;
  R483: _Cyt__APC_FBXO5_FZR1_CDC20_1_Ser355p__CDC20_APC_1_ + _Cyt__CCNB_CDK1_Thr14_Tyr15p_CDKN1A_1__CDKN1A_CCNE_A_B_1_Ser130u_ => _Cyt__APC_FBXO5_FZR1_CDC20_1_Ser355p__CDC20_APC_1_ + _Cyt__CDKN1A_CCNE_A_B_Ser130u_; kDeCb3*_Cyt__APC_FBXO5_FZR1_CDC20_1_Ser355p__CDC20_APC_1_*_Cyt__CCNB_CDK1_Thr14_Tyr15p_CDKN1A_1__CDKN1A_CCNE_A_B_1_Ser130u_*Cyt;
  R484: _Cyt__WEE1_Ser123u_ + _Cyt__CCNB_CDK1_Thr14_Tyr15u_CDKN1A_1__CDKN1A_CCNE_A_B_1_Ser130u_ => _Cyt__WEE1_Ser123u_ + _Cyt__CCNB_CDK1_Thr14_Tyr15p_CDKN1A_1__CDKN1A_CCNE_A_B_1_Ser130u_; kWee2*_Cyt__WEE1_Ser123u_*_Cyt__CCNB_CDK1_Thr14_Tyr15u_CDKN1A_1__CDKN1A_CCNE_A_B_1_Ser130u_*Cyt;
  R485: _Cyt__WEE1_Ser123p_ + _Cyt__CCNB_CDK1_Thr14_Tyr15u_CDKN1A_1__CDKN1A_CCNE_A_B_1_Ser130u_ => _Cyt__WEE1_Ser123p_ + _Cyt__CCNB_CDK1_Thr14_Tyr15p_CDKN1A_1__CDKN1A_CCNE_A_B_1_Ser130u_; kWee1*_Cyt__WEE1_Ser123p_*_Cyt__CCNB_CDK1_Thr14_Tyr15u_CDKN1A_1__CDKN1A_CCNE_A_B_1_Ser130u_*Cyt;
  R486: _Cyt__CDC25_pSitesp_ + _Cyt__CCNB_CDK1_Thr14_Tyr15p_CDKN1A_1__CDKN1A_CCNE_A_B_1_Ser130u_ => _Cyt__CDC25_pSitesp_ + _Cyt__CCNB_CDK1_Thr14_Tyr15u_CDKN1A_1__CDKN1A_CCNE_A_B_1_Ser130u_; kCdc25_2*_Cyt__CDC25_pSitesp_*_Cyt__CCNB_CDK1_Thr14_Tyr15p_CDKN1A_1__CDKN1A_CCNE_A_B_1_Ser130u_*Cyt;
  R487: _Cyt__CDC25_pSitesu_ + _Cyt__CCNB_CDK1_Thr14_Tyr15p_CDKN1A_1__CDKN1A_CCNE_A_B_1_Ser130u_ => _Cyt__CDC25_pSitesu_ + _Cyt__CCNB_CDK1_Thr14_Tyr15u_CDKN1A_1__CDKN1A_CCNE_A_B_1_Ser130u_; kCdc25_1*_Cyt__CDC25_pSitesu_*_Cyt__CCNB_CDK1_Thr14_Tyr15p_CDKN1A_1__CDKN1A_CCNE_A_B_1_Ser130u_*Cyt;
  R488: _Cyt__CCNA_CDKN1A_B_1__CDKN1A_CCNE_A_B_1_Ser130u_ => _Cyt__CCNA_CDKN1A_B_; kDeCDKN1A_1*_Cyt__CCNA_CDKN1A_B_1__CDKN1A_CCNE_A_B_1_Ser130u_*Cyt;
  R489: _Cyt__CCNE_CDKN1A_B_1__CDKN1A_CCNE_A_B_1_Ser130u_ => _Cyt__CCNE_CDKN1A_B_; kDeCDKN1A_1*_Cyt__CCNE_CDKN1A_B_1__CDKN1A_CCNE_A_B_1_Ser130u_*Cyt;
  R490: _Cyt__CCNB_CDK1_Thr14_Tyr15u_CDKN1A_1__CDKN1A_CCNE_A_B_1_Ser130u_ => _Cyt__CCNB_CDK1_Thr14_Tyr15u_CDKN1A_; kDeCDKN1A_1*_Cyt__CCNB_CDK1_Thr14_Tyr15u_CDKN1A_1__CDKN1A_CCNE_A_B_1_Ser130u_*Cyt;
  R491: _Cyt__CCNB_CDK1_Thr14_Tyr15p_CDKN1A_1__CDKN1A_CCNE_A_B_1_Ser130u_ => _Cyt__CCNB_CDK1_Thr14_Tyr15p_CDKN1A_; kDeCDKN1A_1*_Cyt__CCNB_CDK1_Thr14_Tyr15p_CDKN1A_1__CDKN1A_CCNE_A_B_1_Ser130u_*Cyt;
  R492: _Cyt__CDKN1A_CCNE_A_B_Ser130p_ => ; kDeCDKN1A_1*_Cyt__CDKN1A_CCNE_A_B_Ser130p_*Cyt;
  R493: _Nuc__CDKN1A_CCNE_A_B_Ser130u_ => ; kDeCDKN1A_1*_Nuc__CDKN1A_CCNE_A_B_Ser130u_*Nuc;
  R494: _Cyt__SKP2 + _Cyt__CDKN1A_CCNE_A_B_Ser130p_ => _Cyt__SKP2; kDeCDKN1A_2*_Cyt__SKP2*_Cyt__CDKN1A_CCNE_A_B_Ser130p_*Cyt;
  R495: _Cyt__SKP2 + _Cyt__CCNA_CDKN1A_B_1__CDKN1A_CCNE_A_B_1_Ser130u_ => _Cyt__CCNA_CDKN1A_B_ + _Cyt__SKP2; kDeCDKN1A_2*_Cyt__SKP2*_Cyt__CCNA_CDKN1A_B_1__CDKN1A_CCNE_A_B_1_Ser130u_*Cyt;
  R496: _Cyt__SKP2 + _Cyt__CCNE_CDKN1A_B_1__CDKN1A_CCNE_A_B_1_Ser130u_ => _Cyt__CCNE_CDKN1A_B_ + _Cyt__SKP2; kDeCDKN1A_2*_Cyt__SKP2*_Cyt__CCNE_CDKN1A_B_1__CDKN1A_CCNE_A_B_1_Ser130u_*Cyt;
  R497: _Cyt__SKP2 + _Cyt__CCNB_CDK1_Thr14_Tyr15u_CDKN1A_1__CDKN1A_CCNE_A_B_1_Ser130u_ => _Cyt__CCNB_CDK1_Thr14_Tyr15u_CDKN1A_ + _Cyt__SKP2; kDeCDKN1A_2*_Cyt__SKP2*_Cyt__CCNB_CDK1_Thr14_Tyr15u_CDKN1A_1__CDKN1A_CCNE_A_B_1_Ser130u_*Cyt;
  R498: _Cyt__SKP2 + _Cyt__CCNB_CDK1_Thr14_Tyr15p_CDKN1A_1__CDKN1A_CCNE_A_B_1_Ser130u_ => _Cyt__CCNB_CDK1_Thr14_Tyr15p_CDKN1A_ + _Cyt__SKP2; kDeCDKN1A_2*_Cyt__SKP2*_Cyt__CCNB_CDK1_Thr14_Tyr15p_CDKN1A_1__CDKN1A_CCNE_A_B_1_Ser130u_*Cyt;
  R499: _Nuc__SKP2 + _Nuc__CDKN1A_CCNE_A_B_Ser130u_ => _Nuc__SKP2; kDeCDKN1A_2*_Nuc__SKP2*_Nuc__CDKN1A_CCNE_A_B_Ser130u_*Nuc;
  R500: _Nuc__CCNA_CDKN1A_B_ + _Nuc__CDKN1A_CCNE_A_B_Ser130u_ => _Nuc__CCNA_CDKN1A_B_1__CDKN1A_CCNE_A_B_1_Ser130u_; kAsCdkn1aC*_Nuc__CCNA_CDKN1A_B_*_Nuc__CDKN1A_CCNE_A_B_Ser130u_*Nuc;
  R501: _Cyt__CCNA_CDKN1A_B_1__CDKN1A_CCNE_A_B_1_Ser130u_ => _Cyt__CCNA_CDKN1A_B_ + _Cyt__CDKN1A_CCNE_A_B_Ser130u_; kDiCdkn1aC*_Cyt__CCNA_CDKN1A_B_1__CDKN1A_CCNE_A_B_1_Ser130u_*Cyt;
  R502: _Nuc__CCNE_CDKN1A_B_ + _Nuc__CDKN1A_CCNE_A_B_Ser130u_ => _Nuc__CCNE_CDKN1A_B_1__CDKN1A_CCNE_A_B_1_Ser130u_; kAsCdkn1aC*_Nuc__CCNE_CDKN1A_B_*_Nuc__CDKN1A_CCNE_A_B_Ser130u_*Nuc;
  R503: _Cyt__CCNE_CDKN1A_B_1__CDKN1A_CCNE_A_B_1_Ser130u_ => _Cyt__CCNE_CDKN1A_B_ + _Cyt__CDKN1A_CCNE_A_B_Ser130u_; kDiCdkn1aC*_Cyt__CCNE_CDKN1A_B_1__CDKN1A_CCNE_A_B_1_Ser130u_*Cyt;
  R504: _Nuc__CCNB_CDK1_Thr14_Tyr15u_CDKN1A_ + _Nuc__CDKN1A_CCNE_A_B_Ser130u_ => _Nuc__CCNB_CDK1_Thr14_Tyr15u_CDKN1A_1__CDKN1A_CCNE_A_B_1_Ser130u_; kAsCdkn1aC*_Nuc__CCNB_CDK1_Thr14_Tyr15u_CDKN1A_*_Nuc__CDKN1A_CCNE_A_B_Ser130u_*Nuc;
  R505: _Nuc__CCNB_CDK1_Thr14_Tyr15p_CDKN1A_ + _Nuc__CDKN1A_CCNE_A_B_Ser130u_ => _Nuc__CCNB_CDK1_Thr14_Tyr15p_CDKN1A_1__CDKN1A_CCNE_A_B_1_Ser130u_; kAsCdkn1aC*_Nuc__CCNB_CDK1_Thr14_Tyr15p_CDKN1A_*_Nuc__CDKN1A_CCNE_A_B_Ser130u_*Nuc;
  R506: _Cyt__CCNB_CDK1_Thr14_Tyr15u_CDKN1A_1__CDKN1A_CCNE_A_B_1_Ser130u_ => _Cyt__CCNB_CDK1_Thr14_Tyr15u_CDKN1A_ + _Cyt__CDKN1A_CCNE_A_B_Ser130u_; kDiCdkn1aC*_Cyt__CCNB_CDK1_Thr14_Tyr15u_CDKN1A_1__CDKN1A_CCNE_A_B_1_Ser130u_*Cyt;
  R507: _Cyt__CCNB_CDK1_Thr14_Tyr15p_CDKN1A_1__CDKN1A_CCNE_A_B_1_Ser130u_ => _Cyt__CCNB_CDK1_Thr14_Tyr15p_CDKN1A_ + _Cyt__CDKN1A_CCNE_A_B_Ser130u_; kDiCdkn1aC*_Cyt__CCNB_CDK1_Thr14_Tyr15p_CDKN1A_1__CDKN1A_CCNE_A_B_1_Ser130u_*Cyt;
  R508: _Nuc__CCNE_CDKN1A_B_ + _Nuc__CDKN1A_CCNE_A_B_Ser130u_ => _Nuc__CCNE_CDKN1A_B_ + _Nuc__CDKN1A_CCNE_A_B_Ser130p_; kPhCDKN1AByCe*_Nuc__CCNE_CDKN1A_B_*_Nuc__CDKN1A_CCNE_A_B_Ser130u_*Nuc;
  R509: _Cyt__CCNE_CDKN1A_B_ + _Cyt__CCNA_CDKN1A_B_1__CDKN1A_CCNE_A_B_1_Ser130u_ => _Cyt__CCNE_CDKN1A_B_ + _Cyt__CCNA_CDKN1A_B_ + _Cyt__CDKN1A_CCNE_A_B_Ser130p_; kPhCDKN1AByCe*_Cyt__CCNE_CDKN1A_B_*_Cyt__CCNA_CDKN1A_B_1__CDKN1A_CCNE_A_B_1_Ser130u_*Cyt;
  R510: _Cyt__CCNE_CDKN1A_B_ + _Cyt__CCNE_CDKN1A_B_1__CDKN1A_CCNE_A_B_1_Ser130u_ => _Cyt__CCNE_CDKN1A_B_ + _Cyt__CCNE_CDKN1A_B_ + _Cyt__CDKN1A_CCNE_A_B_Ser130p_; kPhCDKN1AByCe*_Cyt__CCNE_CDKN1A_B_*_Cyt__CCNE_CDKN1A_B_1__CDKN1A_CCNE_A_B_1_Ser130u_*Cyt;
  R511: _Cyt__CCNE_CDKN1A_B_ + _Cyt__CCNB_CDK1_Thr14_Tyr15u_CDKN1A_1__CDKN1A_CCNE_A_B_1_Ser130u_ => _Cyt__CCNE_CDKN1A_B_ + _Cyt__CCNB_CDK1_Thr14_Tyr15u_CDKN1A_ + _Cyt__CDKN1A_CCNE_A_B_Ser130p_; kPhCDKN1AByCe*_Cyt__CCNE_CDKN1A_B_*_Cyt__CCNB_CDK1_Thr14_Tyr15u_CDKN1A_1__CDKN1A_CCNE_A_B_1_Ser130u_*Cyt;
  R512: _Cyt__CCNE_CDKN1A_B_ + _Cyt__CCNB_CDK1_Thr14_Tyr15p_CDKN1A_1__CDKN1A_CCNE_A_B_1_Ser130u_ => _Cyt__CCNE_CDKN1A_B_ + _Cyt__CCNB_CDK1_Thr14_Tyr15p_CDKN1A_ + _Cyt__CDKN1A_CCNE_A_B_Ser130p_; kPhCDKN1AByCe*_Cyt__CCNE_CDKN1A_B_*_Cyt__CCNB_CDK1_Thr14_Tyr15p_CDKN1A_1__CDKN1A_CCNE_A_B_1_Ser130u_*Cyt;
  R513: _Nuc__CCNA_CDKN1A_B_ + _Nuc__CDKN1A_CCNE_A_B_Ser130u_ => _Nuc__CCNA_CDKN1A_B_ + _Nuc__CDKN1A_CCNE_A_B_Ser130p_; kPhCDKN1AByCa*_Nuc__CCNA_CDKN1A_B_*_Nuc__CDKN1A_CCNE_A_B_Ser130u_*Nuc;
  R514: _Cyt__CCNA_CDKN1A_B_ + _Cyt__CCNA_CDKN1A_B_1__CDKN1A_CCNE_A_B_1_Ser130u_ => _Cyt__CCNA_CDKN1A_B_ + _Cyt__CCNA_CDKN1A_B_ + _Cyt__CDKN1A_CCNE_A_B_Ser130p_; kPhCDKN1AByCa*_Cyt__CCNA_CDKN1A_B_*_Cyt__CCNA_CDKN1A_B_1__CDKN1A_CCNE_A_B_1_Ser130u_*Cyt;
  R515: _Cyt__CCNA_CDKN1A_B_ + _Cyt__CCNE_CDKN1A_B_1__CDKN1A_CCNE_A_B_1_Ser130u_ => _Cyt__CCNE_CDKN1A_B_ + _Cyt__CCNA_CDKN1A_B_ + _Cyt__CDKN1A_CCNE_A_B_Ser130p_; kPhCDKN1AByCa*_Cyt__CCNA_CDKN1A_B_*_Cyt__CCNE_CDKN1A_B_1__CDKN1A_CCNE_A_B_1_Ser130u_*Cyt;
  R516: _Cyt__CCNA_CDKN1A_B_ + _Cyt__CCNB_CDK1_Thr14_Tyr15u_CDKN1A_1__CDKN1A_CCNE_A_B_1_Ser130u_ => _Cyt__CCNA_CDKN1A_B_ + _Cyt__CCNB_CDK1_Thr14_Tyr15u_CDKN1A_ + _Cyt__CDKN1A_CCNE_A_B_Ser130p_; kPhCDKN1AByCa*_Cyt__CCNA_CDKN1A_B_*_Cyt__CCNB_CDK1_Thr14_Tyr15u_CDKN1A_1__CDKN1A_CCNE_A_B_1_Ser130u_*Cyt;
  R517: _Cyt__CCNA_CDKN1A_B_ + _Cyt__CCNB_CDK1_Thr14_Tyr15p_CDKN1A_1__CDKN1A_CCNE_A_B_1_Ser130u_ => _Cyt__CCNA_CDKN1A_B_ + _Cyt__CCNB_CDK1_Thr14_Tyr15p_CDKN1A_ + _Cyt__CDKN1A_CCNE_A_B_Ser130p_; kPhCDKN1AByCa*_Cyt__CCNA_CDKN1A_B_*_Cyt__CCNB_CDK1_Thr14_Tyr15p_CDKN1A_1__CDKN1A_CCNE_A_B_1_Ser130u_*Cyt;
  R518: _Nuc__CCNB_CDK1_Thr14_Tyr15u_CDKN1A_ + _Nuc__CDKN1A_CCNE_A_B_Ser130u_ => _Nuc__CCNB_CDK1_Thr14_Tyr15u_CDKN1A_ + _Nuc__CDKN1A_CCNE_A_B_Ser130p_; kPhCDKN1AByCb*_Nuc__CCNB_CDK1_Thr14_Tyr15u_CDKN1A_*_Nuc__CDKN1A_CCNE_A_B_Ser130u_*Nuc;
  R519: _Cyt__CCNB_CDK1_Thr14_Tyr15u_CDKN1A_ + _Cyt__CCNA_CDKN1A_B_1__CDKN1A_CCNE_A_B_1_Ser130u_ => _Cyt__CCNA_CDKN1A_B_ + _Cyt__CCNB_CDK1_Thr14_Tyr15u_CDKN1A_ + _Cyt__CDKN1A_CCNE_A_B_Ser130p_; kPhCDKN1AByCb*_Cyt__CCNB_CDK1_Thr14_Tyr15u_CDKN1A_*_Cyt__CCNA_CDKN1A_B_1__CDKN1A_CCNE_A_B_1_Ser130u_*Cyt;
  R520: _Cyt__CCNB_CDK1_Thr14_Tyr15u_CDKN1A_ + _Cyt__CCNE_CDKN1A_B_1__CDKN1A_CCNE_A_B_1_Ser130u_ => _Cyt__CCNE_CDKN1A_B_ + _Cyt__CCNB_CDK1_Thr14_Tyr15u_CDKN1A_ + _Cyt__CDKN1A_CCNE_A_B_Ser130p_; kPhCDKN1AByCb*_Cyt__CCNB_CDK1_Thr14_Tyr15u_CDKN1A_*_Cyt__CCNE_CDKN1A_B_1__CDKN1A_CCNE_A_B_1_Ser130u_*Cyt;
  R521: _Cyt__CCNB_CDK1_Thr14_Tyr15u_CDKN1A_ + _Cyt__CCNB_CDK1_Thr14_Tyr15u_CDKN1A_1__CDKN1A_CCNE_A_B_1_Ser130u_ => _Cyt__CCNB_CDK1_Thr14_Tyr15u_CDKN1A_ + _Cyt__CCNB_CDK1_Thr14_Tyr15u_CDKN1A_ + _Cyt__CDKN1A_CCNE_A_B_Ser130p_; kPhCDKN1AByCb*_Cyt__CCNB_CDK1_Thr14_Tyr15u_CDKN1A_*_Cyt__CCNB_CDK1_Thr14_Tyr15u_CDKN1A_1__CDKN1A_CCNE_A_B_1_Ser130u_*Cyt;
  R522: _Cyt__CCNB_CDK1_Thr14_Tyr15u_CDKN1A_ + _Cyt__CCNB_CDK1_Thr14_Tyr15p_CDKN1A_1__CDKN1A_CCNE_A_B_1_Ser130u_ => _Cyt__CCNB_CDK1_Thr14_Tyr15u_CDKN1A_ + _Cyt__CCNB_CDK1_Thr14_Tyr15p_CDKN1A_ + _Cyt__CDKN1A_CCNE_A_B_Ser130p_; kPhCDKN1AByCb*_Cyt__CCNB_CDK1_Thr14_Tyr15u_CDKN1A_*_Cyt__CCNB_CDK1_Thr14_Tyr15p_CDKN1A_1__CDKN1A_CCNE_A_B_1_Ser130u_*Cyt;
  R523: _Cyt__CDKN1A_CCNE_A_B_Ser130p_ => _Cyt__CDKN1A_CCNE_A_B_Ser130u_; kDpCDKN1A*_Cyt__CDKN1A_CCNE_A_B_Ser130p_*Cyt;
  R524: _Cyt__CCNA_CDKN1A_B_1__CDKN1B_CCNE_A_1_Thr187u_ => _Cyt__CCNA_CDKN1A_B_; kDeCDKN1B_1*_Cyt__CCNA_CDKN1A_B_1__CDKN1B_CCNE_A_1_Thr187u_*Cyt;
  R525: _Cyt__CCNE_CDKN1A_B_1__CDKN1B_CCNE_A_1_Thr187u_ => _Cyt__CCNE_CDKN1A_B_; kDeCDKN1B_1*_Cyt__CCNE_CDKN1A_B_1__CDKN1B_CCNE_A_1_Thr187u_*Cyt;
  R526: _Cyt__CDKN1B_CCNE_A_Thr187p_ => ; kDeCDKN1B_1*_Cyt__CDKN1B_CCNE_A_Thr187p_*Cyt;
  R527: _Nuc__CDKN1B_CCNE_A_Thr187u_ => ; kDeCDKN1B_1*_Nuc__CDKN1B_CCNE_A_Thr187u_*Nuc;
  R528: _Cyt__SKP2 + _Cyt__CDKN1B_CCNE_A_Thr187p_ => _Cyt__SKP2; kDeCDKN1B_2*_Cyt__SKP2*_Cyt__CDKN1B_CCNE_A_Thr187p_*Cyt;
  R529: _Cyt__SKP2 + _Cyt__CCNA_CDKN1A_B_1__CDKN1B_CCNE_A_1_Thr187u_ => _Cyt__CCNA_CDKN1A_B_ + _Cyt__SKP2; _rateLaw1*_Cyt__SKP2*_Cyt__CCNA_CDKN1A_B_1__CDKN1B_CCNE_A_1_Thr187u_*Cyt;
  R530: _Cyt__SKP2 + _Cyt__CCNE_CDKN1A_B_1__CDKN1B_CCNE_A_1_Thr187u_ => _Cyt__CCNE_CDKN1A_B_ + _Cyt__SKP2; _rateLaw1*_Cyt__SKP2*_Cyt__CCNE_CDKN1A_B_1__CDKN1B_CCNE_A_1_Thr187u_*Cyt;
  R531: _Nuc__SKP2 + _Nuc__CDKN1B_CCNE_A_Thr187u_ => _Nuc__SKP2; _rateLaw1*_Nuc__SKP2*_Nuc__CDKN1B_CCNE_A_Thr187u_*Nuc;
  R532: _Cyt__CCNA_CDKN1A_B_ + _Cyt__CDKN1B_CCNE_A_Thr187p_ => _Cyt__CCNA_CDKN1A_B_1__CDKN1B_CCNE_A_1_Thr187p_; kAsCdkn1bC*_Cyt__CCNA_CDKN1A_B_*_Cyt__CDKN1B_CCNE_A_Thr187p_*Cyt;
  R533: _Nuc__CCNA_CDKN1A_B_ + _Nuc__CDKN1B_CCNE_A_Thr187u_ => _Nuc__CCNA_CDKN1A_B_1__CDKN1B_CCNE_A_1_Thr187u_; kAsCdkn1bC*_Nuc__CCNA_CDKN1A_B_*_Nuc__CDKN1B_CCNE_A_Thr187u_*Nuc;
  R534: _Cyt__CCNA_CDKN1A_B_1__CDKN1B_CCNE_A_1_Thr187u_ => _Cyt__CCNA_CDKN1A_B_ + _Cyt__CDKN1B_CCNE_A_Thr187u_; kDiCdkn1bC*_Cyt__CCNA_CDKN1A_B_1__CDKN1B_CCNE_A_1_Thr187u_*Cyt;
  R535: _Cyt__CCNE_CDKN1A_B_ + _Cyt__CDKN1B_CCNE_A_Thr187p_ => _Cyt__CCNE_CDKN1A_B_1__CDKN1B_CCNE_A_1_Thr187p_; kAsCdkn1bC*_Cyt__CCNE_CDKN1A_B_*_Cyt__CDKN1B_CCNE_A_Thr187p_*Cyt;
  R536: _Nuc__CCNE_CDKN1A_B_ + _Nuc__CDKN1B_CCNE_A_Thr187u_ => _Nuc__CCNE_CDKN1A_B_1__CDKN1B_CCNE_A_1_Thr187u_; kAsCdkn1bC*_Nuc__CCNE_CDKN1A_B_*_Nuc__CDKN1B_CCNE_A_Thr187u_*Nuc;
  R537: _Cyt__CCNE_CDKN1A_B_1__CDKN1B_CCNE_A_1_Thr187u_ => _Cyt__CCNE_CDKN1A_B_ + _Cyt__CDKN1B_CCNE_A_Thr187u_; kDiCdkn1bC*_Cyt__CCNE_CDKN1A_B_1__CDKN1B_CCNE_A_1_Thr187u_*Cyt;
  R538: _Cyt__CCNE_CDKN1A_B_ + _Cyt__CCNA_CDKN1A_B_1__CDKN1B_CCNE_A_1_Thr187u_ => _Cyt__CCNE_CDKN1A_B_ + _Cyt__CCNA_CDKN1A_B_1__CDKN1B_CCNE_A_1_Thr187p_; kPhCDKN1BByCe*_Cyt__CCNE_CDKN1A_B_*_Cyt__CCNA_CDKN1A_B_1__CDKN1B_CCNE_A_1_Thr187u_*Cyt;
  R539: _Cyt__CCNE_CDKN1A_B_ + _Cyt__CCNE_CDKN1A_B_1__CDKN1B_CCNE_A_1_Thr187u_ => _Cyt__CCNE_CDKN1A_B_ + _Cyt__CCNE_CDKN1A_B_1__CDKN1B_CCNE_A_1_Thr187p_; kPhCDKN1BByCe*_Cyt__CCNE_CDKN1A_B_*_Cyt__CCNE_CDKN1A_B_1__CDKN1B_CCNE_A_1_Thr187u_*Cyt;
  R540: _Nuc__CCNE_CDKN1A_B_ + _Nuc__CDKN1B_CCNE_A_Thr187u_ => _Nuc__CCNE_CDKN1A_B_ + _Nuc__CDKN1B_CCNE_A_Thr187p_; kPhCDKN1BByCe*_Nuc__CCNE_CDKN1A_B_*_Nuc__CDKN1B_CCNE_A_Thr187u_*Nuc;
  R541: _Cyt__CCNA_CDKN1A_B_ + _Cyt__CCNA_CDKN1A_B_1__CDKN1B_CCNE_A_1_Thr187u_ => _Cyt__CCNA_CDKN1A_B_ + _Cyt__CCNA_CDKN1A_B_1__CDKN1B_CCNE_A_1_Thr187p_; kPhCDKN1BByCa*_Cyt__CCNA_CDKN1A_B_*_Cyt__CCNA_CDKN1A_B_1__CDKN1B_CCNE_A_1_Thr187u_*Cyt;
  R542: _Cyt__CCNA_CDKN1A_B_ + _Cyt__CCNE_CDKN1A_B_1__CDKN1B_CCNE_A_1_Thr187u_ => _Cyt__CCNA_CDKN1A_B_ + _Cyt__CCNE_CDKN1A_B_1__CDKN1B_CCNE_A_1_Thr187p_; kPhCDKN1BByCa*_Cyt__CCNA_CDKN1A_B_*_Cyt__CCNE_CDKN1A_B_1__CDKN1B_CCNE_A_1_Thr187u_*Cyt;
  R543: _Nuc__CCNA_CDKN1A_B_ + _Nuc__CDKN1B_CCNE_A_Thr187u_ => _Nuc__CCNA_CDKN1A_B_ + _Nuc__CDKN1B_CCNE_A_Thr187p_; kPhCDKN1BByCa*_Nuc__CCNA_CDKN1A_B_*_Nuc__CDKN1B_CCNE_A_Thr187u_*Nuc;
  R544: _Cyt__CCNB_CDK1_Thr14_Tyr15u_CDKN1A_ + _Cyt__CCNA_CDKN1A_B_1__CDKN1B_CCNE_A_1_Thr187u_ => _Cyt__CCNB_CDK1_Thr14_Tyr15u_CDKN1A_ + _Cyt__CCNA_CDKN1A_B_1__CDKN1B_CCNE_A_1_Thr187p_; kPhCDKN1BByCb*_Cyt__CCNB_CDK1_Thr14_Tyr15u_CDKN1A_*_Cyt__CCNA_CDKN1A_B_1__CDKN1B_CCNE_A_1_Thr187u_*Cyt;
  R545: _Cyt__CCNB_CDK1_Thr14_Tyr15u_CDKN1A_ + _Cyt__CCNE_CDKN1A_B_1__CDKN1B_CCNE_A_1_Thr187u_ => _Cyt__CCNB_CDK1_Thr14_Tyr15u_CDKN1A_ + _Cyt__CCNE_CDKN1A_B_1__CDKN1B_CCNE_A_1_Thr187p_; kPhCDKN1BByCb*_Cyt__CCNB_CDK1_Thr14_Tyr15u_CDKN1A_*_Cyt__CCNE_CDKN1A_B_1__CDKN1B_CCNE_A_1_Thr187u_*Cyt;
  R546: _Nuc__CCNB_CDK1_Thr14_Tyr15u_CDKN1A_ + _Nuc__CDKN1B_CCNE_A_Thr187u_ => _Nuc__CCNB_CDK1_Thr14_Tyr15u_CDKN1A_ + _Nuc__CDKN1B_CCNE_A_Thr187p_; kPhCDKN1BByCb*_Nuc__CCNB_CDK1_Thr14_Tyr15u_CDKN1A_*_Nuc__CDKN1B_CCNE_A_Thr187u_*Nuc;
  R547: _Cyt__CDKN1B_CCNE_A_Thr187p_ => _Cyt__CDKN1B_CCNE_A_Thr187u_; kDpCDKN1B*_Cyt__CDKN1B_CCNE_A_Thr187p_*Cyt;
  R548: _Num__NUP_pSitesu_ + _Nuc__CDKN1A_CCNE_A_B_Ser130u_ => _Num__NUP_pSitesu_ + _Cyt__CDKN1A_CCNE_A_B_Ser130u_; kExImCDKN1A_CCNE_A_B_Ser130u__1*_Num__NUP_pSitesu_*_Nuc__CDKN1A_CCNE_A_B_Ser130u_*Num;
  R549: _Num__NUP_pSitesu_ + _Nuc__CDKN1B_CCNE_A_Thr187u_ => _Num__NUP_pSitesu_ + _Cyt__CDKN1B_CCNE_A_Thr187u_; kExImCDKN1B_CCNE_A_Thr187u__1*_Num__NUP_pSitesu_*_Nuc__CDKN1B_CCNE_A_Thr187u_*Num;
  R550: _Num__NUP_pSitesu_ + _Cyt__CCNA_CDKN1A_B_1__CDKN1A_CCNE_A_B_1_Ser130u_ => _Num__NUP_pSitesu_ + _Nuc__CCNA_CDKN1A_B_1__CDKN1A_CCNE_A_B_1_Ser130u_; kImImCCNA_CDKN1A_B1__CDKN1A_CCNE_A_B1_Ser130u__1*_Num__NUP_pSitesu_*_Cyt__CCNA_CDKN1A_B_1__CDKN1A_CCNE_A_B_1_Ser130u_*Num;
  R551: _Num__NUP_pSitesu_ + _Cyt__CCNE_CDKN1A_B_1__CDKN1A_CCNE_A_B_1_Ser130u_ => _Num__NUP_pSitesu_ + _Nuc__CCNE_CDKN1A_B_1__CDKN1A_CCNE_A_B_1_Ser130u_; kImImCCNE_CDKN1A_B1__CDKN1A_CCNE_A_B1_Ser130u__1*_Num__NUP_pSitesu_*_Cyt__CCNE_CDKN1A_B_1__CDKN1A_CCNE_A_B_1_Ser130u_*Num;
  R552: _Num__NUP_pSitesu_ + _Cyt__CCNB_CDK1_Thr14_Tyr15u_CDKN1A_1__CDKN1A_CCNE_A_B_1_Ser130u_ => _Num__NUP_pSitesu_ + _Nuc__CCNB_CDK1_Thr14_Tyr15u_CDKN1A_1__CDKN1A_CCNE_A_B_1_Ser130u_; kImImCCNB_CDK1_Thr14_Tyr15u_CDKN1A1__CDKN1A_CCNE_A_B1_Ser130u__1*_Num__NUP_pSitesu_*_Cyt__CCNB_CDK1_Thr14_Tyr15u_CDKN1A_1__CDKN1A_CCNE_A_B_1_Ser130u_*Num;
  R553: _Num__NUP_pSitesu_ + _Cyt__CCNB_CDK1_Thr14_Tyr15p_CDKN1A_1__CDKN1A_CCNE_A_B_1_Ser130u_ => _Num__NUP_pSitesu_ + _Nuc__CCNB_CDK1_Thr14_Tyr15p_CDKN1A_1__CDKN1A_CCNE_A_B_1_Ser130u_; kImImCCNB_CDK1_Thr14_Tyr15p_CDKN1A1__CDKN1A_CCNE_A_B1_Ser130u__1*_Num__NUP_pSitesu_*_Cyt__CCNB_CDK1_Thr14_Tyr15p_CDKN1A_1__CDKN1A_CCNE_A_B_1_Ser130u_*Num;
  R554: _Num__NUP_pSitesu_ + _Cyt__CDKN1A_CCNE_A_B_Ser130p_ => _Num__NUP_pSitesu_ + _Nuc__CDKN1A_CCNE_A_B_Ser130p_; kImImCDKN1A_CCNE_A_B_Ser130p__1*_Num__NUP_pSitesu_*_Cyt__CDKN1A_CCNE_A_B_Ser130p_*Num;
  R555: _Num__NUP_pSitesu_ + _Cyt__CCNA_CDKN1A_B_1__CDKN1B_CCNE_A_1_Thr187u_ => _Num__NUP_pSitesu_ + _Nuc__CCNA_CDKN1A_B_1__CDKN1B_CCNE_A_1_Thr187u_; kImImCCNA_CDKN1A_B1__CDKN1B_CCNE_A1_Thr187u__1*_Num__NUP_pSitesu_*_Cyt__CCNA_CDKN1A_B_1__CDKN1B_CCNE_A_1_Thr187u_*Num;
  R556: _Num__NUP_pSitesu_ + _Cyt__CCNE_CDKN1A_B_1__CDKN1B_CCNE_A_1_Thr187u_ => _Num__NUP_pSitesu_ + _Nuc__CCNE_CDKN1A_B_1__CDKN1B_CCNE_A_1_Thr187u_; kImImCCNE_CDKN1A_B1__CDKN1B_CCNE_A1_Thr187u__1*_Num__NUP_pSitesu_*_Cyt__CCNE_CDKN1A_B_1__CDKN1B_CCNE_A_1_Thr187u_*Num;
  R557: _Num__NUP_pSitesu_ + _Cyt__CDKN1B_CCNE_A_Thr187p_ => _Num__NUP_pSitesu_ + _Nuc__CDKN1B_CCNE_A_Thr187p_; kImImCDKN1B_CCNE_A_Thr187p__1*_Num__NUP_pSitesu_*_Cyt__CDKN1B_CCNE_A_Thr187p_*Num;
  R558: _Nuc__CCNE_CDKN1A_B_1__CDKN1A_CCNE_A_B_1_Ser130u_ => _Nuc__CDKN1A_CCNE_A_B_Ser130u_; kDeCe*_Nuc__CCNE_CDKN1A_B_1__CDKN1A_CCNE_A_B_1_Ser130u_*Nuc;
  R559: _Cyt__CCNE_CDKN1A_B_1__CDKN1B_CCNE_A_1_Thr187p_ => _Cyt__CDKN1B_CCNE_A_Thr187p_; kDeCe*_Cyt__CCNE_CDKN1A_B_1__CDKN1B_CCNE_A_1_Thr187p_*Cyt;
  R560: _Nuc__CCNE_CDKN1A_B_1__CDKN1B_CCNE_A_1_Thr187u_ => _Nuc__CDKN1B_CCNE_A_Thr187u_; kDeCe*_Nuc__CCNE_CDKN1A_B_1__CDKN1B_CCNE_A_1_Thr187u_*Nuc;
  R561: _Cyt__CCNE_CDKN1A_B_ + _Cyt__CCNE_CDKN1A_B_1__CDKN1B_CCNE_A_1_Thr187p_ => _Cyt__CCNE_CDKN1A_B_ + _Cyt__CDKN1B_CCNE_A_Thr187p_; kPhCeE*_Cyt__CCNE_CDKN1A_B_*_Cyt__CCNE_CDKN1A_B_1__CDKN1B_CCNE_A_1_Thr187p_*Cyt;
  R562: _Nuc__CCNE_CDKN1A_B_ + _Nuc__CCNE_CDKN1A_B_1__CDKN1A_CCNE_A_B_1_Ser130u_ => _Nuc__CCNE_CDKN1A_B_ + _Nuc__CDKN1A_CCNE_A_B_Ser130u_; kPhCeE*_Nuc__CCNE_CDKN1A_B_*_Nuc__CCNE_CDKN1A_B_1__CDKN1A_CCNE_A_B_1_Ser130u_*Nuc;
  R563: _Nuc__CCNE_CDKN1A_B_ + _Nuc__CCNE_CDKN1A_B_1__CDKN1B_CCNE_A_1_Thr187u_ => _Nuc__CCNE_CDKN1A_B_ + _Nuc__CDKN1B_CCNE_A_Thr187u_; kPhCeE*_Nuc__CCNE_CDKN1A_B_*_Nuc__CCNE_CDKN1A_B_1__CDKN1B_CCNE_A_1_Thr187u_*Nuc;
  R564: _Nuc__CCNA_CDKN1A_B_1__CDKN1A_CCNE_A_B_1_Ser130u_ => _Nuc__CDKN1A_CCNE_A_B_Ser130u_; kDeCa1*_Nuc__CCNA_CDKN1A_B_1__CDKN1A_CCNE_A_B_1_Ser130u_*Nuc;
  R565: _Cyt__CCNA_CDKN1A_B_1__CDKN1B_CCNE_A_1_Thr187p_ => _Cyt__CDKN1B_CCNE_A_Thr187p_; kDeCa1*_Cyt__CCNA_CDKN1A_B_1__CDKN1B_CCNE_A_1_Thr187p_*Cyt;
  R566: _Nuc__CCNA_CDKN1A_B_1__CDKN1B_CCNE_A_1_Thr187u_ => _Nuc__CDKN1B_CCNE_A_Thr187u_; kDeCa1*_Nuc__CCNA_CDKN1A_B_1__CDKN1B_CCNE_A_1_Thr187u_*Nuc;
  R567: _Nuc__CCNA_CDKN1A_B_ + _Nuc__CCNE_CDKN1A_B_1__CDKN1A_CCNE_A_B_1_Ser130u_ => _Nuc__CCNA_CDKN1A_B_ + _Nuc__CDKN1A_CCNE_A_B_Ser130u_; kPhCeA*_Nuc__CCNA_CDKN1A_B_*_Nuc__CCNE_CDKN1A_B_1__CDKN1A_CCNE_A_B_1_Ser130u_*Nuc;
  R568: _Cyt__CCNA_CDKN1A_B_ + _Cyt__CCNE_CDKN1A_B_1__CDKN1B_CCNE_A_1_Thr187p_ => _Cyt__CCNA_CDKN1A_B_ + _Cyt__CDKN1B_CCNE_A_Thr187p_; kPhCeA*_Cyt__CCNA_CDKN1A_B_*_Cyt__CCNE_CDKN1A_B_1__CDKN1B_CCNE_A_1_Thr187p_*Cyt;
  R569: _Nuc__CCNA_CDKN1A_B_ + _Nuc__CCNE_CDKN1A_B_1__CDKN1B_CCNE_A_1_Thr187u_ => _Nuc__CCNA_CDKN1A_B_ + _Nuc__CDKN1B_CCNE_A_Thr187u_; kPhCeA*_Nuc__CCNA_CDKN1A_B_*_Nuc__CCNE_CDKN1A_B_1__CDKN1B_CCNE_A_1_Thr187u_*Nuc;
  R570: _Nuc__APC_FBXO5_FZR1_CDC20_1_Ser355u__FZR1_APC_1_FBXO5_nTermu_ + _Nuc__CCNA_CDKN1A_B_1__CDKN1A_CCNE_A_B_1_Ser130u_ => _Nuc__APC_FBXO5_FZR1_CDC20_1_Ser355u__FZR1_APC_1_FBXO5_nTermu_ + _Nuc__CDKN1A_CCNE_A_B_Ser130u_; kDeCa2*_Nuc__APC_FBXO5_FZR1_CDC20_1_Ser355u__FZR1_APC_1_FBXO5_nTermu_*_Nuc__CCNA_CDKN1A_B_1__CDKN1A_CCNE_A_B_1_Ser130u_*Nuc;
  R571: _Nuc__APC_FBXO5_FZR1_CDC20_1_Ser355p__FZR1_APC_1_FBXO5_nTermu_ + _Nuc__CCNA_CDKN1A_B_1__CDKN1A_CCNE_A_B_1_Ser130u_ => _Nuc__APC_FBXO5_FZR1_CDC20_1_Ser355p__FZR1_APC_1_FBXO5_nTermu_ + _Nuc__CDKN1A_CCNE_A_B_Ser130u_; kDeCa2*_Nuc__APC_FBXO5_FZR1_CDC20_1_Ser355p__FZR1_APC_1_FBXO5_nTermu_*_Nuc__CCNA_CDKN1A_B_1__CDKN1A_CCNE_A_B_1_Ser130u_*Nuc;
  R572: _Cyt__APC_FBXO5_FZR1_CDC20_1_Ser355u__FZR1_APC_1_FBXO5_nTermu_ + _Cyt__CCNA_CDKN1A_B_1__CDKN1B_CCNE_A_1_Thr187p_ => _Cyt__APC_FBXO5_FZR1_CDC20_1_Ser355u__FZR1_APC_1_FBXO5_nTermu_ + _Cyt__CDKN1B_CCNE_A_Thr187p_; kDeCa2*_Cyt__APC_FBXO5_FZR1_CDC20_1_Ser355u__FZR1_APC_1_FBXO5_nTermu_*_Cyt__CCNA_CDKN1A_B_1__CDKN1B_CCNE_A_1_Thr187p_*Cyt;
  R573: _Cyt__APC_FBXO5_FZR1_CDC20_1_Ser355p__FZR1_APC_1_FBXO5_nTermu_ + _Cyt__CCNA_CDKN1A_B_1__CDKN1B_CCNE_A_1_Thr187p_ => _Cyt__APC_FBXO5_FZR1_CDC20_1_Ser355p__FZR1_APC_1_FBXO5_nTermu_ + _Cyt__CDKN1B_CCNE_A_Thr187p_; kDeCa2*_Cyt__APC_FBXO5_FZR1_CDC20_1_Ser355p__FZR1_APC_1_FBXO5_nTermu_*_Cyt__CCNA_CDKN1A_B_1__CDKN1B_CCNE_A_1_Thr187p_*Cyt;
  R574: _Nuc__APC_FBXO5_FZR1_CDC20_1_Ser355u__FZR1_APC_1_FBXO5_nTermu_ + _Nuc__CCNA_CDKN1A_B_1__CDKN1B_CCNE_A_1_Thr187u_ => _Nuc__APC_FBXO5_FZR1_CDC20_1_Ser355u__FZR1_APC_1_FBXO5_nTermu_ + _Nuc__CDKN1B_CCNE_A_Thr187u_; kDeCa2*_Nuc__APC_FBXO5_FZR1_CDC20_1_Ser355u__FZR1_APC_1_FBXO5_nTermu_*_Nuc__CCNA_CDKN1A_B_1__CDKN1B_CCNE_A_1_Thr187u_*Nuc;
  R575: _Nuc__APC_FBXO5_FZR1_CDC20_1_Ser355p__FZR1_APC_1_FBXO5_nTermu_ + _Nuc__CCNA_CDKN1A_B_1__CDKN1B_CCNE_A_1_Thr187u_ => _Nuc__APC_FBXO5_FZR1_CDC20_1_Ser355p__FZR1_APC_1_FBXO5_nTermu_ + _Nuc__CDKN1B_CCNE_A_Thr187u_; kDeCa2*_Nuc__APC_FBXO5_FZR1_CDC20_1_Ser355p__FZR1_APC_1_FBXO5_nTermu_*_Nuc__CCNA_CDKN1A_B_1__CDKN1B_CCNE_A_1_Thr187u_*Nuc;
  R576: _Nuc__APC_FBXO5_FZR1_CDC20_1_Ser355p__CDC20_APC_1_ + _Nuc__CCNA_CDKN1A_B_1__CDKN1A_CCNE_A_B_1_Ser130u_ => _Nuc__APC_FBXO5_FZR1_CDC20_1_Ser355p__CDC20_APC_1_ + _Nuc__CDKN1A_CCNE_A_B_Ser130u_; kDeCa3*_Nuc__APC_FBXO5_FZR1_CDC20_1_Ser355p__CDC20_APC_1_*_Nuc__CCNA_CDKN1A_B_1__CDKN1A_CCNE_A_B_1_Ser130u_*Nuc;
  R577: _Cyt__APC_FBXO5_FZR1_CDC20_1_Ser355p__CDC20_APC_1_ + _Cyt__CCNA_CDKN1A_B_1__CDKN1B_CCNE_A_1_Thr187p_ => _Cyt__APC_FBXO5_FZR1_CDC20_1_Ser355p__CDC20_APC_1_ + _Cyt__CDKN1B_CCNE_A_Thr187p_; kDeCa3*_Cyt__APC_FBXO5_FZR1_CDC20_1_Ser355p__CDC20_APC_1_*_Cyt__CCNA_CDKN1A_B_1__CDKN1B_CCNE_A_1_Thr187p_*Cyt;
  R578: _Nuc__APC_FBXO5_FZR1_CDC20_1_Ser355p__CDC20_APC_1_ + _Nuc__CCNA_CDKN1A_B_1__CDKN1B_CCNE_A_1_Thr187u_ => _Nuc__APC_FBXO5_FZR1_CDC20_1_Ser355p__CDC20_APC_1_ + _Nuc__CDKN1B_CCNE_A_Thr187u_; kDeCa3*_Nuc__APC_FBXO5_FZR1_CDC20_1_Ser355p__CDC20_APC_1_*_Nuc__CCNA_CDKN1A_B_1__CDKN1B_CCNE_A_1_Thr187u_*Nuc;
  R579: _Nuc__CCNB_CDK1_Thr14_Tyr15u_CDKN1A_1__CDKN1A_CCNE_A_B_1_Ser130u_ => _Nuc__CDKN1A_CCNE_A_B_Ser130u_; kDeCb1*_Nuc__CCNB_CDK1_Thr14_Tyr15u_CDKN1A_1__CDKN1A_CCNE_A_B_1_Ser130u_*Nuc;
  R580: _Nuc__CCNB_CDK1_Thr14_Tyr15p_CDKN1A_1__CDKN1A_CCNE_A_B_1_Ser130u_ => _Nuc__CDKN1A_CCNE_A_B_Ser130u_; kDeCb1*_Nuc__CCNB_CDK1_Thr14_Tyr15p_CDKN1A_1__CDKN1A_CCNE_A_B_1_Ser130u_*Nuc;
  R581: _Nuc__APC_FBXO5_FZR1_CDC20_1_Ser355u__FZR1_APC_1_FBXO5_nTermu_ + _Nuc__CCNB_CDK1_Thr14_Tyr15u_CDKN1A_1__CDKN1A_CCNE_A_B_1_Ser130u_ => _Nuc__APC_FBXO5_FZR1_CDC20_1_Ser355u__FZR1_APC_1_FBXO5_nTermu_ + _Nuc__CDKN1A_CCNE_A_B_Ser130u_; kDeCb2*_Nuc__APC_FBXO5_FZR1_CDC20_1_Ser355u__FZR1_APC_1_FBXO5_nTermu_*_Nuc__CCNB_CDK1_Thr14_Tyr15u_CDKN1A_1__CDKN1A_CCNE_A_B_1_Ser130u_*Nuc;
  R582: _Nuc__APC_FBXO5_FZR1_CDC20_1_Ser355p__FZR1_APC_1_FBXO5_nTermu_ + _Nuc__CCNB_CDK1_Thr14_Tyr15u_CDKN1A_1__CDKN1A_CCNE_A_B_1_Ser130u_ => _Nuc__APC_FBXO5_FZR1_CDC20_1_Ser355p__FZR1_APC_1_FBXO5_nTermu_ + _Nuc__CDKN1A_CCNE_A_B_Ser130u_; kDeCb2*_Nuc__APC_FBXO5_FZR1_CDC20_1_Ser355p__FZR1_APC_1_FBXO5_nTermu_*_Nuc__CCNB_CDK1_Thr14_Tyr15u_CDKN1A_1__CDKN1A_CCNE_A_B_1_Ser130u_*Nuc;
  R583: _Nuc__APC_FBXO5_FZR1_CDC20_1_Ser355u__FZR1_APC_1_FBXO5_nTermu_ + _Nuc__CCNB_CDK1_Thr14_Tyr15p_CDKN1A_1__CDKN1A_CCNE_A_B_1_Ser130u_ => _Nuc__APC_FBXO5_FZR1_CDC20_1_Ser355u__FZR1_APC_1_FBXO5_nTermu_ + _Nuc__CDKN1A_CCNE_A_B_Ser130u_; kDeCb2*_Nuc__APC_FBXO5_FZR1_CDC20_1_Ser355u__FZR1_APC_1_FBXO5_nTermu_*_Nuc__CCNB_CDK1_Thr14_Tyr15p_CDKN1A_1__CDKN1A_CCNE_A_B_1_Ser130u_*Nuc;
  R584: _Nuc__APC_FBXO5_FZR1_CDC20_1_Ser355p__FZR1_APC_1_FBXO5_nTermu_ + _Nuc__CCNB_CDK1_Thr14_Tyr15p_CDKN1A_1__CDKN1A_CCNE_A_B_1_Ser130u_ => _Nuc__APC_FBXO5_FZR1_CDC20_1_Ser355p__FZR1_APC_1_FBXO5_nTermu_ + _Nuc__CDKN1A_CCNE_A_B_Ser130u_; kDeCb2*_Nuc__APC_FBXO5_FZR1_CDC20_1_Ser355p__FZR1_APC_1_FBXO5_nTermu_*_Nuc__CCNB_CDK1_Thr14_Tyr15p_CDKN1A_1__CDKN1A_CCNE_A_B_1_Ser130u_*Nuc;
  R585: _Nuc__APC_FBXO5_FZR1_CDC20_1_Ser355p__CDC20_APC_1_ + _Nuc__CCNB_CDK1_Thr14_Tyr15u_CDKN1A_1__CDKN1A_CCNE_A_B_1_Ser130u_ => _Nuc__APC_FBXO5_FZR1_CDC20_1_Ser355p__CDC20_APC_1_ + _Nuc__CDKN1A_CCNE_A_B_Ser130u_; kDeCb3*_Nuc__APC_FBXO5_FZR1_CDC20_1_Ser355p__CDC20_APC_1_*_Nuc__CCNB_CDK1_Thr14_Tyr15u_CDKN1A_1__CDKN1A_CCNE_A_B_1_Ser130u_*Nuc;
  R586: _Nuc__APC_FBXO5_FZR1_CDC20_1_Ser355p__CDC20_APC_1_ + _Nuc__CCNB_CDK1_Thr14_Tyr15p_CDKN1A_1__CDKN1A_CCNE_A_B_1_Ser130u_ => _Nuc__APC_FBXO5_FZR1_CDC20_1_Ser355p__CDC20_APC_1_ + _Nuc__CDKN1A_CCNE_A_B_Ser130u_; kDeCb3*_Nuc__APC_FBXO5_FZR1_CDC20_1_Ser355p__CDC20_APC_1_*_Nuc__CCNB_CDK1_Thr14_Tyr15p_CDKN1A_1__CDKN1A_CCNE_A_B_1_Ser130u_*Nuc;
  R587: _Nuc__WEE1_Ser123u_ + _Nuc__CCNB_CDK1_Thr14_Tyr15u_CDKN1A_1__CDKN1A_CCNE_A_B_1_Ser130u_ => _Nuc__WEE1_Ser123u_ + _Nuc__CCNB_CDK1_Thr14_Tyr15p_CDKN1A_1__CDKN1A_CCNE_A_B_1_Ser130u_; kWee2*_Nuc__WEE1_Ser123u_*_Nuc__CCNB_CDK1_Thr14_Tyr15u_CDKN1A_1__CDKN1A_CCNE_A_B_1_Ser130u_*Nuc;
  R588: _Nuc__WEE1_Ser123p_ + _Nuc__CCNB_CDK1_Thr14_Tyr15u_CDKN1A_1__CDKN1A_CCNE_A_B_1_Ser130u_ => _Nuc__WEE1_Ser123p_ + _Nuc__CCNB_CDK1_Thr14_Tyr15p_CDKN1A_1__CDKN1A_CCNE_A_B_1_Ser130u_; kWee1*_Nuc__WEE1_Ser123p_*_Nuc__CCNB_CDK1_Thr14_Tyr15u_CDKN1A_1__CDKN1A_CCNE_A_B_1_Ser130u_*Nuc;
  R589: _Nuc__CDC25_pSitesp_ + _Nuc__CCNB_CDK1_Thr14_Tyr15p_CDKN1A_1__CDKN1A_CCNE_A_B_1_Ser130u_ => _Nuc__CDC25_pSitesp_ + _Nuc__CCNB_CDK1_Thr14_Tyr15u_CDKN1A_1__CDKN1A_CCNE_A_B_1_Ser130u_; kCdc25_2*_Nuc__CDC25_pSitesp_*_Nuc__CCNB_CDK1_Thr14_Tyr15p_CDKN1A_1__CDKN1A_CCNE_A_B_1_Ser130u_*Nuc;
  R590: _Nuc__CDC25_pSitesu_ + _Nuc__CCNB_CDK1_Thr14_Tyr15p_CDKN1A_1__CDKN1A_CCNE_A_B_1_Ser130u_ => _Nuc__CDC25_pSitesu_ + _Nuc__CCNB_CDK1_Thr14_Tyr15u_CDKN1A_1__CDKN1A_CCNE_A_B_1_Ser130u_; kCdc25_1*_Nuc__CDC25_pSitesu_*_Nuc__CCNB_CDK1_Thr14_Tyr15p_CDKN1A_1__CDKN1A_CCNE_A_B_1_Ser130u_*Nuc;
  R591: _Nuc__CCNA_CDKN1A_B_1__CDKN1A_CCNE_A_B_1_Ser130u_ => _Nuc__CCNA_CDKN1A_B_; kDeCDKN1A_1*_Nuc__CCNA_CDKN1A_B_1__CDKN1A_CCNE_A_B_1_Ser130u_*Nuc;
  R592: _Nuc__CCNE_CDKN1A_B_1__CDKN1A_CCNE_A_B_1_Ser130u_ => _Nuc__CCNE_CDKN1A_B_; kDeCDKN1A_1*_Nuc__CCNE_CDKN1A_B_1__CDKN1A_CCNE_A_B_1_Ser130u_*Nuc;
  R593: _Nuc__CCNB_CDK1_Thr14_Tyr15u_CDKN1A_1__CDKN1A_CCNE_A_B_1_Ser130u_ => _Nuc__CCNB_CDK1_Thr14_Tyr15u_CDKN1A_; kDeCDKN1A_1*_Nuc__CCNB_CDK1_Thr14_Tyr15u_CDKN1A_1__CDKN1A_CCNE_A_B_1_Ser130u_*Nuc;
  R594: _Nuc__CCNB_CDK1_Thr14_Tyr15p_CDKN1A_1__CDKN1A_CCNE_A_B_1_Ser130u_ => _Nuc__CCNB_CDK1_Thr14_Tyr15p_CDKN1A_; kDeCDKN1A_1*_Nuc__CCNB_CDK1_Thr14_Tyr15p_CDKN1A_1__CDKN1A_CCNE_A_B_1_Ser130u_*Nuc;
  R595: _Nuc__CDKN1A_CCNE_A_B_Ser130p_ => ; kDeCDKN1A_1*_Nuc__CDKN1A_CCNE_A_B_Ser130p_*Nuc;
  R596: _Nuc__SKP2 + _Nuc__CDKN1A_CCNE_A_B_Ser130p_ => _Nuc__SKP2; kDeCDKN1A_2*_Nuc__SKP2*_Nuc__CDKN1A_CCNE_A_B_Ser130p_*Nuc;
  R597: _Nuc__SKP2 + _Nuc__CCNA_CDKN1A_B_1__CDKN1A_CCNE_A_B_1_Ser130u_ => _Nuc__CCNA_CDKN1A_B_ + _Nuc__SKP2; kDeCDKN1A_2*_Nuc__SKP2*_Nuc__CCNA_CDKN1A_B_1__CDKN1A_CCNE_A_B_1_Ser130u_*Nuc;
  R598: _Nuc__SKP2 + _Nuc__CCNE_CDKN1A_B_1__CDKN1A_CCNE_A_B_1_Ser130u_ => _Nuc__CCNE_CDKN1A_B_ + _Nuc__SKP2; kDeCDKN1A_2*_Nuc__SKP2*_Nuc__CCNE_CDKN1A_B_1__CDKN1A_CCNE_A_B_1_Ser130u_*Nuc;
  R599: _Nuc__SKP2 + _Nuc__CCNB_CDK1_Thr14_Tyr15u_CDKN1A_1__CDKN1A_CCNE_A_B_1_Ser130u_ => _Nuc__CCNB_CDK1_Thr14_Tyr15u_CDKN1A_ + _Nuc__SKP2; kDeCDKN1A_2*_Nuc__SKP2*_Nuc__CCNB_CDK1_Thr14_Tyr15u_CDKN1A_1__CDKN1A_CCNE_A_B_1_Ser130u_*Nuc;
  R600: _Nuc__SKP2 + _Nuc__CCNB_CDK1_Thr14_Tyr15p_CDKN1A_1__CDKN1A_CCNE_A_B_1_Ser130u_ => _Nuc__CCNB_CDK1_Thr14_Tyr15p_CDKN1A_ + _Nuc__SKP2; kDeCDKN1A_2*_Nuc__SKP2*_Nuc__CCNB_CDK1_Thr14_Tyr15p_CDKN1A_1__CDKN1A_CCNE_A_B_1_Ser130u_*Nuc;
  R601: _Nuc__CCNA_CDKN1A_B_1__CDKN1A_CCNE_A_B_1_Ser130u_ => _Nuc__CCNA_CDKN1A_B_ + _Nuc__CDKN1A_CCNE_A_B_Ser130u_; kDiCdkn1aC*_Nuc__CCNA_CDKN1A_B_1__CDKN1A_CCNE_A_B_1_Ser130u_*Nuc;
  R602: _Nuc__CCNE_CDKN1A_B_1__CDKN1A_CCNE_A_B_1_Ser130u_ => _Nuc__CCNE_CDKN1A_B_ + _Nuc__CDKN1A_CCNE_A_B_Ser130u_; kDiCdkn1aC*_Nuc__CCNE_CDKN1A_B_1__CDKN1A_CCNE_A_B_1_Ser130u_*Nuc;
  R603: _Nuc__CCNB_CDK1_Thr14_Tyr15u_CDKN1A_1__CDKN1A_CCNE_A_B_1_Ser130u_ => _Nuc__CCNB_CDK1_Thr14_Tyr15u_CDKN1A_ + _Nuc__CDKN1A_CCNE_A_B_Ser130u_; kDiCdkn1aC*_Nuc__CCNB_CDK1_Thr14_Tyr15u_CDKN1A_1__CDKN1A_CCNE_A_B_1_Ser130u_*Nuc;
  R604: _Nuc__CCNB_CDK1_Thr14_Tyr15p_CDKN1A_1__CDKN1A_CCNE_A_B_1_Ser130u_ => _Nuc__CCNB_CDK1_Thr14_Tyr15p_CDKN1A_ + _Nuc__CDKN1A_CCNE_A_B_Ser130u_; kDiCdkn1aC*_Nuc__CCNB_CDK1_Thr14_Tyr15p_CDKN1A_1__CDKN1A_CCNE_A_B_1_Ser130u_*Nuc;
  R605: _Nuc__CCNE_CDKN1A_B_ + _Nuc__CCNA_CDKN1A_B_1__CDKN1A_CCNE_A_B_1_Ser130u_ => _Nuc__CCNE_CDKN1A_B_ + _Nuc__CCNA_CDKN1A_B_ + _Nuc__CDKN1A_CCNE_A_B_Ser130p_; kPhCDKN1AByCe*_Nuc__CCNE_CDKN1A_B_*_Nuc__CCNA_CDKN1A_B_1__CDKN1A_CCNE_A_B_1_Ser130u_*Nuc;
  R606: _Nuc__CCNE_CDKN1A_B_ + _Nuc__CCNE_CDKN1A_B_1__CDKN1A_CCNE_A_B_1_Ser130u_ => _Nuc__CCNE_CDKN1A_B_ + _Nuc__CCNE_CDKN1A_B_ + _Nuc__CDKN1A_CCNE_A_B_Ser130p_; kPhCDKN1AByCe*_Nuc__CCNE_CDKN1A_B_*_Nuc__CCNE_CDKN1A_B_1__CDKN1A_CCNE_A_B_1_Ser130u_*Nuc;
  R607: _Nuc__CCNE_CDKN1A_B_ + _Nuc__CCNB_CDK1_Thr14_Tyr15u_CDKN1A_1__CDKN1A_CCNE_A_B_1_Ser130u_ => _Nuc__CCNE_CDKN1A_B_ + _Nuc__CCNB_CDK1_Thr14_Tyr15u_CDKN1A_ + _Nuc__CDKN1A_CCNE_A_B_Ser130p_; kPhCDKN1AByCe*_Nuc__CCNE_CDKN1A_B_*_Nuc__CCNB_CDK1_Thr14_Tyr15u_CDKN1A_1__CDKN1A_CCNE_A_B_1_Ser130u_*Nuc;
  R608: _Nuc__CCNE_CDKN1A_B_ + _Nuc__CCNB_CDK1_Thr14_Tyr15p_CDKN1A_1__CDKN1A_CCNE_A_B_1_Ser130u_ => _Nuc__CCNE_CDKN1A_B_ + _Nuc__CCNB_CDK1_Thr14_Tyr15p_CDKN1A_ + _Nuc__CDKN1A_CCNE_A_B_Ser130p_; kPhCDKN1AByCe*_Nuc__CCNE_CDKN1A_B_*_Nuc__CCNB_CDK1_Thr14_Tyr15p_CDKN1A_1__CDKN1A_CCNE_A_B_1_Ser130u_*Nuc;
  R609: _Nuc__CCNA_CDKN1A_B_ + _Nuc__CCNA_CDKN1A_B_1__CDKN1A_CCNE_A_B_1_Ser130u_ => _Nuc__CCNA_CDKN1A_B_ + _Nuc__CCNA_CDKN1A_B_ + _Nuc__CDKN1A_CCNE_A_B_Ser130p_; kPhCDKN1AByCa*_Nuc__CCNA_CDKN1A_B_*_Nuc__CCNA_CDKN1A_B_1__CDKN1A_CCNE_A_B_1_Ser130u_*Nuc;
  R610: _Nuc__CCNA_CDKN1A_B_ + _Nuc__CCNE_CDKN1A_B_1__CDKN1A_CCNE_A_B_1_Ser130u_ => _Nuc__CCNE_CDKN1A_B_ + _Nuc__CCNA_CDKN1A_B_ + _Nuc__CDKN1A_CCNE_A_B_Ser130p_; kPhCDKN1AByCa*_Nuc__CCNA_CDKN1A_B_*_Nuc__CCNE_CDKN1A_B_1__CDKN1A_CCNE_A_B_1_Ser130u_*Nuc;
  R611: _Nuc__CCNA_CDKN1A_B_ + _Nuc__CCNB_CDK1_Thr14_Tyr15u_CDKN1A_1__CDKN1A_CCNE_A_B_1_Ser130u_ => _Nuc__CCNA_CDKN1A_B_ + _Nuc__CCNB_CDK1_Thr14_Tyr15u_CDKN1A_ + _Nuc__CDKN1A_CCNE_A_B_Ser130p_; kPhCDKN1AByCa*_Nuc__CCNA_CDKN1A_B_*_Nuc__CCNB_CDK1_Thr14_Tyr15u_CDKN1A_1__CDKN1A_CCNE_A_B_1_Ser130u_*Nuc;
  R612: _Nuc__CCNA_CDKN1A_B_ + _Nuc__CCNB_CDK1_Thr14_Tyr15p_CDKN1A_1__CDKN1A_CCNE_A_B_1_Ser130u_ => _Nuc__CCNA_CDKN1A_B_ + _Nuc__CCNB_CDK1_Thr14_Tyr15p_CDKN1A_ + _Nuc__CDKN1A_CCNE_A_B_Ser130p_; kPhCDKN1AByCa*_Nuc__CCNA_CDKN1A_B_*_Nuc__CCNB_CDK1_Thr14_Tyr15p_CDKN1A_1__CDKN1A_CCNE_A_B_1_Ser130u_*Nuc;
  R613: _Nuc__CCNB_CDK1_Thr14_Tyr15u_CDKN1A_ + _Nuc__CCNA_CDKN1A_B_1__CDKN1A_CCNE_A_B_1_Ser130u_ => _Nuc__CCNA_CDKN1A_B_ + _Nuc__CCNB_CDK1_Thr14_Tyr15u_CDKN1A_ + _Nuc__CDKN1A_CCNE_A_B_Ser130p_; kPhCDKN1AByCb*_Nuc__CCNB_CDK1_Thr14_Tyr15u_CDKN1A_*_Nuc__CCNA_CDKN1A_B_1__CDKN1A_CCNE_A_B_1_Ser130u_*Nuc;
  R614: _Nuc__CCNB_CDK1_Thr14_Tyr15u_CDKN1A_ + _Nuc__CCNE_CDKN1A_B_1__CDKN1A_CCNE_A_B_1_Ser130u_ => _Nuc__CCNE_CDKN1A_B_ + _Nuc__CCNB_CDK1_Thr14_Tyr15u_CDKN1A_ + _Nuc__CDKN1A_CCNE_A_B_Ser130p_; kPhCDKN1AByCb*_Nuc__CCNB_CDK1_Thr14_Tyr15u_CDKN1A_*_Nuc__CCNE_CDKN1A_B_1__CDKN1A_CCNE_A_B_1_Ser130u_*Nuc;
  R615: _Nuc__CCNB_CDK1_Thr14_Tyr15u_CDKN1A_ + _Nuc__CCNB_CDK1_Thr14_Tyr15u_CDKN1A_1__CDKN1A_CCNE_A_B_1_Ser130u_ => _Nuc__CCNB_CDK1_Thr14_Tyr15u_CDKN1A_ + _Nuc__CCNB_CDK1_Thr14_Tyr15u_CDKN1A_ + _Nuc__CDKN1A_CCNE_A_B_Ser130p_; kPhCDKN1AByCb*_Nuc__CCNB_CDK1_Thr14_Tyr15u_CDKN1A_*_Nuc__CCNB_CDK1_Thr14_Tyr15u_CDKN1A_1__CDKN1A_CCNE_A_B_1_Ser130u_*Nuc;
  R616: _Nuc__CCNB_CDK1_Thr14_Tyr15u_CDKN1A_ + _Nuc__CCNB_CDK1_Thr14_Tyr15p_CDKN1A_1__CDKN1A_CCNE_A_B_1_Ser130u_ => _Nuc__CCNB_CDK1_Thr14_Tyr15u_CDKN1A_ + _Nuc__CCNB_CDK1_Thr14_Tyr15p_CDKN1A_ + _Nuc__CDKN1A_CCNE_A_B_Ser130p_; kPhCDKN1AByCb*_Nuc__CCNB_CDK1_Thr14_Tyr15u_CDKN1A_*_Nuc__CCNB_CDK1_Thr14_Tyr15p_CDKN1A_1__CDKN1A_CCNE_A_B_1_Ser130u_*Nuc;
  R617: _Nuc__CDKN1A_CCNE_A_B_Ser130p_ => _Nuc__CDKN1A_CCNE_A_B_Ser130u_; kDpCDKN1A*_Nuc__CDKN1A_CCNE_A_B_Ser130p_*Nuc;
  R618: _Cyt__CCNA_CDKN1A_B_1__CDKN1B_CCNE_A_1_Thr187p_ => _Cyt__CCNA_CDKN1A_B_; kDeCDKN1B_1*_Cyt__CCNA_CDKN1A_B_1__CDKN1B_CCNE_A_1_Thr187p_*Cyt;
  R619: _Nuc__CCNA_CDKN1A_B_1__CDKN1B_CCNE_A_1_Thr187u_ => _Nuc__CCNA_CDKN1A_B_; kDeCDKN1B_1*_Nuc__CCNA_CDKN1A_B_1__CDKN1B_CCNE_A_1_Thr187u_*Nuc;
  R620: _Cyt__CCNE_CDKN1A_B_1__CDKN1B_CCNE_A_1_Thr187p_ => _Cyt__CCNE_CDKN1A_B_; kDeCDKN1B_1*_Cyt__CCNE_CDKN1A_B_1__CDKN1B_CCNE_A_1_Thr187p_*Cyt;
  R621: _Nuc__CCNE_CDKN1A_B_1__CDKN1B_CCNE_A_1_Thr187u_ => _Nuc__CCNE_CDKN1A_B_; kDeCDKN1B_1*_Nuc__CCNE_CDKN1A_B_1__CDKN1B_CCNE_A_1_Thr187u_*Nuc;
  R622: _Nuc__CDKN1B_CCNE_A_Thr187p_ => ; kDeCDKN1B_1*_Nuc__CDKN1B_CCNE_A_Thr187p_*Nuc;
  R623: _Cyt__SKP2 + _Cyt__CCNA_CDKN1A_B_1__CDKN1B_CCNE_A_1_Thr187p_ => _Cyt__CCNA_CDKN1A_B_ + _Cyt__SKP2; kDeCDKN1B_2*_Cyt__SKP2*_Cyt__CCNA_CDKN1A_B_1__CDKN1B_CCNE_A_1_Thr187p_*Cyt;
  R624: _Cyt__SKP2 + _Cyt__CCNE_CDKN1A_B_1__CDKN1B_CCNE_A_1_Thr187p_ => _Cyt__CCNE_CDKN1A_B_ + _Cyt__SKP2; kDeCDKN1B_2*_Cyt__SKP2*_Cyt__CCNE_CDKN1A_B_1__CDKN1B_CCNE_A_1_Thr187p_*Cyt;
  R625: _Nuc__SKP2 + _Nuc__CDKN1B_CCNE_A_Thr187p_ => _Nuc__SKP2; kDeCDKN1B_2*_Nuc__SKP2*_Nuc__CDKN1B_CCNE_A_Thr187p_*Nuc;
  R626: _Nuc__SKP2 + _Nuc__CCNA_CDKN1A_B_1__CDKN1B_CCNE_A_1_Thr187u_ => _Nuc__CCNA_CDKN1A_B_ + _Nuc__SKP2; _rateLaw1*_Nuc__SKP2*_Nuc__CCNA_CDKN1A_B_1__CDKN1B_CCNE_A_1_Thr187u_*Nuc;
  R627: _Nuc__SKP2 + _Nuc__CCNE_CDKN1A_B_1__CDKN1B_CCNE_A_1_Thr187u_ => _Nuc__CCNE_CDKN1A_B_ + _Nuc__SKP2; _rateLaw1*_Nuc__SKP2*_Nuc__CCNE_CDKN1A_B_1__CDKN1B_CCNE_A_1_Thr187u_*Nuc;
  R628: _Nuc__CCNA_CDKN1A_B_ + _Nuc__CDKN1B_CCNE_A_Thr187p_ => _Nuc__CCNA_CDKN1A_B_1__CDKN1B_CCNE_A_1_Thr187p_; kAsCdkn1bC*_Nuc__CCNA_CDKN1A_B_*_Nuc__CDKN1B_CCNE_A_Thr187p_*Nuc;
  R629: _Cyt__CCNA_CDKN1A_B_1__CDKN1B_CCNE_A_1_Thr187p_ => _Cyt__CCNA_CDKN1A_B_ + _Cyt__CDKN1B_CCNE_A_Thr187p_; kDiCdkn1bC*_Cyt__CCNA_CDKN1A_B_1__CDKN1B_CCNE_A_1_Thr187p_*Cyt;
  R630: _Nuc__CCNA_CDKN1A_B_1__CDKN1B_CCNE_A_1_Thr187u_ => _Nuc__CCNA_CDKN1A_B_ + _Nuc__CDKN1B_CCNE_A_Thr187u_; kDiCdkn1bC*_Nuc__CCNA_CDKN1A_B_1__CDKN1B_CCNE_A_1_Thr187u_*Nuc;
  R631: _Nuc__CCNE_CDKN1A_B_ + _Nuc__CDKN1B_CCNE_A_Thr187p_ => _Nuc__CCNE_CDKN1A_B_1__CDKN1B_CCNE_A_1_Thr187p_; kAsCdkn1bC*_Nuc__CCNE_CDKN1A_B_*_Nuc__CDKN1B_CCNE_A_Thr187p_*Nuc;
  R632: _Cyt__CCNE_CDKN1A_B_1__CDKN1B_CCNE_A_1_Thr187p_ => _Cyt__CCNE_CDKN1A_B_ + _Cyt__CDKN1B_CCNE_A_Thr187p_; kDiCdkn1bC*_Cyt__CCNE_CDKN1A_B_1__CDKN1B_CCNE_A_1_Thr187p_*Cyt;
  R633: _Nuc__CCNE_CDKN1A_B_1__CDKN1B_CCNE_A_1_Thr187u_ => _Nuc__CCNE_CDKN1A_B_ + _Nuc__CDKN1B_CCNE_A_Thr187u_; kDiCdkn1bC*_Nuc__CCNE_CDKN1A_B_1__CDKN1B_CCNE_A_1_Thr187u_*Nuc;
  R634: _Nuc__CCNE_CDKN1A_B_ + _Nuc__CCNA_CDKN1A_B_1__CDKN1B_CCNE_A_1_Thr187u_ => _Nuc__CCNE_CDKN1A_B_ + _Nuc__CCNA_CDKN1A_B_1__CDKN1B_CCNE_A_1_Thr187p_; kPhCDKN1BByCe*_Nuc__CCNE_CDKN1A_B_*_Nuc__CCNA_CDKN1A_B_1__CDKN1B_CCNE_A_1_Thr187u_*Nuc;
  R635: _Nuc__CCNE_CDKN1A_B_ + _Nuc__CCNE_CDKN1A_B_1__CDKN1B_CCNE_A_1_Thr187u_ => _Nuc__CCNE_CDKN1A_B_ + _Nuc__CCNE_CDKN1A_B_1__CDKN1B_CCNE_A_1_Thr187p_; kPhCDKN1BByCe*_Nuc__CCNE_CDKN1A_B_*_Nuc__CCNE_CDKN1A_B_1__CDKN1B_CCNE_A_1_Thr187u_*Nuc;
  R636: _Nuc__CCNA_CDKN1A_B_ + _Nuc__CCNA_CDKN1A_B_1__CDKN1B_CCNE_A_1_Thr187u_ => _Nuc__CCNA_CDKN1A_B_ + _Nuc__CCNA_CDKN1A_B_1__CDKN1B_CCNE_A_1_Thr187p_; kPhCDKN1BByCa*_Nuc__CCNA_CDKN1A_B_*_Nuc__CCNA_CDKN1A_B_1__CDKN1B_CCNE_A_1_Thr187u_*Nuc;
  R637: _Nuc__CCNA_CDKN1A_B_ + _Nuc__CCNE_CDKN1A_B_1__CDKN1B_CCNE_A_1_Thr187u_ => _Nuc__CCNA_CDKN1A_B_ + _Nuc__CCNE_CDKN1A_B_1__CDKN1B_CCNE_A_1_Thr187p_; kPhCDKN1BByCa*_Nuc__CCNA_CDKN1A_B_*_Nuc__CCNE_CDKN1A_B_1__CDKN1B_CCNE_A_1_Thr187u_*Nuc;
  R638: _Nuc__CCNB_CDK1_Thr14_Tyr15u_CDKN1A_ + _Nuc__CCNA_CDKN1A_B_1__CDKN1B_CCNE_A_1_Thr187u_ => _Nuc__CCNB_CDK1_Thr14_Tyr15u_CDKN1A_ + _Nuc__CCNA_CDKN1A_B_1__CDKN1B_CCNE_A_1_Thr187p_; kPhCDKN1BByCb*_Nuc__CCNB_CDK1_Thr14_Tyr15u_CDKN1A_*_Nuc__CCNA_CDKN1A_B_1__CDKN1B_CCNE_A_1_Thr187u_*Nuc;
  R639: _Nuc__CCNB_CDK1_Thr14_Tyr15u_CDKN1A_ + _Nuc__CCNE_CDKN1A_B_1__CDKN1B_CCNE_A_1_Thr187u_ => _Nuc__CCNB_CDK1_Thr14_Tyr15u_CDKN1A_ + _Nuc__CCNE_CDKN1A_B_1__CDKN1B_CCNE_A_1_Thr187p_; kPhCDKN1BByCb*_Nuc__CCNB_CDK1_Thr14_Tyr15u_CDKN1A_*_Nuc__CCNE_CDKN1A_B_1__CDKN1B_CCNE_A_1_Thr187u_*Nuc;
  R640: _Cyt__CCNA_CDKN1A_B_1__CDKN1B_CCNE_A_1_Thr187p_ => _Cyt__CCNA_CDKN1A_B_1__CDKN1B_CCNE_A_1_Thr187u_; kDpCDKN1B*_Cyt__CCNA_CDKN1A_B_1__CDKN1B_CCNE_A_1_Thr187p_*Cyt;
  R641: _Cyt__CCNE_CDKN1A_B_1__CDKN1B_CCNE_A_1_Thr187p_ => _Cyt__CCNE_CDKN1A_B_1__CDKN1B_CCNE_A_1_Thr187u_; kDpCDKN1B*_Cyt__CCNE_CDKN1A_B_1__CDKN1B_CCNE_A_1_Thr187p_*Cyt;
  R642: _Nuc__CDKN1B_CCNE_A_Thr187p_ => _Nuc__CDKN1B_CCNE_A_Thr187u_; kDpCDKN1B*_Nuc__CDKN1B_CCNE_A_Thr187p_*Nuc;
  R643: _Num__NUP_pSitesu_ + _Nuc__CCNA_CDKN1A_B_1__CDKN1A_CCNE_A_B_1_Ser130u_ => _Num__NUP_pSitesu_ + _Cyt__CCNA_CDKN1A_B_1__CDKN1A_CCNE_A_B_1_Ser130u_; kExImCCNA_CDKN1A_B1__CDKN1A_CCNE_A_B1_Ser130u__1*_Num__NUP_pSitesu_*_Nuc__CCNA_CDKN1A_B_1__CDKN1A_CCNE_A_B_1_Ser130u_*Num;
  R644: _Num__NUP_pSitesu_ + _Nuc__CCNE_CDKN1A_B_1__CDKN1A_CCNE_A_B_1_Ser130u_ => _Num__NUP_pSitesu_ + _Cyt__CCNE_CDKN1A_B_1__CDKN1A_CCNE_A_B_1_Ser130u_; kExImCCNE_CDKN1A_B1__CDKN1A_CCNE_A_B1_Ser130u__1*_Num__NUP_pSitesu_*_Nuc__CCNE_CDKN1A_B_1__CDKN1A_CCNE_A_B_1_Ser130u_*Num;
  R645: _Num__NUP_pSitesu_ + _Nuc__CCNB_CDK1_Thr14_Tyr15u_CDKN1A_1__CDKN1A_CCNE_A_B_1_Ser130u_ => _Num__NUP_pSitesu_ + _Cyt__CCNB_CDK1_Thr14_Tyr15u_CDKN1A_1__CDKN1A_CCNE_A_B_1_Ser130u_; kExImCCNB_CDK1_Thr14_Tyr15u_CDKN1A1__CDKN1A_CCNE_A_B1_Ser130u__1*_Num__NUP_pSitesu_*_Nuc__CCNB_CDK1_Thr14_Tyr15u_CDKN1A_1__CDKN1A_CCNE_A_B_1_Ser130u_*Num;
  R646: _Num__NUP_pSitesu_ + _Nuc__CCNB_CDK1_Thr14_Tyr15p_CDKN1A_1__CDKN1A_CCNE_A_B_1_Ser130u_ => _Num__NUP_pSitesu_ + _Cyt__CCNB_CDK1_Thr14_Tyr15p_CDKN1A_1__CDKN1A_CCNE_A_B_1_Ser130u_; kExImCCNB_CDK1_Thr14_Tyr15p_CDKN1A1__CDKN1A_CCNE_A_B1_Ser130u__1*_Num__NUP_pSitesu_*_Nuc__CCNB_CDK1_Thr14_Tyr15p_CDKN1A_1__CDKN1A_CCNE_A_B_1_Ser130u_*Num;
  R647: _Num__NUP_pSitesu_ + _Nuc__CDKN1A_CCNE_A_B_Ser130p_ => _Num__NUP_pSitesu_ + _Cyt__CDKN1A_CCNE_A_B_Ser130p_; kExImCDKN1A_CCNE_A_B_Ser130p__1*_Num__NUP_pSitesu_*_Nuc__CDKN1A_CCNE_A_B_Ser130p_*Num;
  R648: _Num__NUP_pSitesu_ + _Nuc__CCNA_CDKN1A_B_1__CDKN1B_CCNE_A_1_Thr187u_ => _Num__NUP_pSitesu_ + _Cyt__CCNA_CDKN1A_B_1__CDKN1B_CCNE_A_1_Thr187u_; kExImCCNA_CDKN1A_B1__CDKN1B_CCNE_A1_Thr187u__1*_Num__NUP_pSitesu_*_Nuc__CCNA_CDKN1A_B_1__CDKN1B_CCNE_A_1_Thr187u_*Num;
  R649: _Num__NUP_pSitesu_ + _Nuc__CCNE_CDKN1A_B_1__CDKN1B_CCNE_A_1_Thr187u_ => _Num__NUP_pSitesu_ + _Cyt__CCNE_CDKN1A_B_1__CDKN1B_CCNE_A_1_Thr187u_; kExImCCNE_CDKN1A_B1__CDKN1B_CCNE_A1_Thr187u__1*_Num__NUP_pSitesu_*_Nuc__CCNE_CDKN1A_B_1__CDKN1B_CCNE_A_1_Thr187u_*Num;
  R650: _Num__NUP_pSitesu_ + _Nuc__CDKN1B_CCNE_A_Thr187p_ => _Num__NUP_pSitesu_ + _Cyt__CDKN1B_CCNE_A_Thr187p_; kExImCDKN1B_CCNE_A_Thr187p__1*_Num__NUP_pSitesu_*_Nuc__CDKN1B_CCNE_A_Thr187p_*Num;
  R651: _Num__NUP_pSitesu_ + _Cyt__CCNA_CDKN1A_B_1__CDKN1B_CCNE_A_1_Thr187p_ => _Num__NUP_pSitesu_ + _Nuc__CCNA_CDKN1A_B_1__CDKN1B_CCNE_A_1_Thr187p_; kImImCCNA_CDKN1A_B1__CDKN1B_CCNE_A1_Thr187p__1*_Num__NUP_pSitesu_*_Cyt__CCNA_CDKN1A_B_1__CDKN1B_CCNE_A_1_Thr187p_*Num;
  R652: _Num__NUP_pSitesu_ + _Cyt__CCNE_CDKN1A_B_1__CDKN1B_CCNE_A_1_Thr187p_ => _Num__NUP_pSitesu_ + _Nuc__CCNE_CDKN1A_B_1__CDKN1B_CCNE_A_1_Thr187p_; kImImCCNE_CDKN1A_B1__CDKN1B_CCNE_A1_Thr187p__1*_Num__NUP_pSitesu_*_Cyt__CCNE_CDKN1A_B_1__CDKN1B_CCNE_A_1_Thr187p_*Num;
  R653: _Nuc__CCNE_CDKN1A_B_1__CDKN1B_CCNE_A_1_Thr187p_ => _Nuc__CDKN1B_CCNE_A_Thr187p_; kDeCe*_Nuc__CCNE_CDKN1A_B_1__CDKN1B_CCNE_A_1_Thr187p_*Nuc;
  R654: _Nuc__CCNE_CDKN1A_B_ + _Nuc__CCNE_CDKN1A_B_1__CDKN1B_CCNE_A_1_Thr187p_ => _Nuc__CCNE_CDKN1A_B_ + _Nuc__CDKN1B_CCNE_A_Thr187p_; kPhCeE*_Nuc__CCNE_CDKN1A_B_*_Nuc__CCNE_CDKN1A_B_1__CDKN1B_CCNE_A_1_Thr187p_*Nuc;
  R655: _Nuc__CCNA_CDKN1A_B_1__CDKN1B_CCNE_A_1_Thr187p_ => _Nuc__CDKN1B_CCNE_A_Thr187p_; kDeCa1*_Nuc__CCNA_CDKN1A_B_1__CDKN1B_CCNE_A_1_Thr187p_*Nuc;
  R656: _Nuc__CCNA_CDKN1A_B_ + _Nuc__CCNE_CDKN1A_B_1__CDKN1B_CCNE_A_1_Thr187p_ => _Nuc__CCNA_CDKN1A_B_ + _Nuc__CDKN1B_CCNE_A_Thr187p_; kPhCeA*_Nuc__CCNA_CDKN1A_B_*_Nuc__CCNE_CDKN1A_B_1__CDKN1B_CCNE_A_1_Thr187p_*Nuc;
  R657: _Nuc__APC_FBXO5_FZR1_CDC20_1_Ser355u__FZR1_APC_1_FBXO5_nTermu_ + _Nuc__CCNA_CDKN1A_B_1__CDKN1B_CCNE_A_1_Thr187p_ => _Nuc__APC_FBXO5_FZR1_CDC20_1_Ser355u__FZR1_APC_1_FBXO5_nTermu_ + _Nuc__CDKN1B_CCNE_A_Thr187p_; kDeCa2*_Nuc__APC_FBXO5_FZR1_CDC20_1_Ser355u__FZR1_APC_1_FBXO5_nTermu_*_Nuc__CCNA_CDKN1A_B_1__CDKN1B_CCNE_A_1_Thr187p_*Nuc;
  R658: _Nuc__APC_FBXO5_FZR1_CDC20_1_Ser355p__FZR1_APC_1_FBXO5_nTermu_ + _Nuc__CCNA_CDKN1A_B_1__CDKN1B_CCNE_A_1_Thr187p_ => _Nuc__APC_FBXO5_FZR1_CDC20_1_Ser355p__FZR1_APC_1_FBXO5_nTermu_ + _Nuc__CDKN1B_CCNE_A_Thr187p_; kDeCa2*_Nuc__APC_FBXO5_FZR1_CDC20_1_Ser355p__FZR1_APC_1_FBXO5_nTermu_*_Nuc__CCNA_CDKN1A_B_1__CDKN1B_CCNE_A_1_Thr187p_*Nuc;
  R659: _Nuc__APC_FBXO5_FZR1_CDC20_1_Ser355p__CDC20_APC_1_ + _Nuc__CCNA_CDKN1A_B_1__CDKN1B_CCNE_A_1_Thr187p_ => _Nuc__APC_FBXO5_FZR1_CDC20_1_Ser355p__CDC20_APC_1_ + _Nuc__CDKN1B_CCNE_A_Thr187p_; kDeCa3*_Nuc__APC_FBXO5_FZR1_CDC20_1_Ser355p__CDC20_APC_1_*_Nuc__CCNA_CDKN1A_B_1__CDKN1B_CCNE_A_1_Thr187p_*Nuc;
  R660: _Nuc__CCNA_CDKN1A_B_1__CDKN1B_CCNE_A_1_Thr187p_ => _Nuc__CCNA_CDKN1A_B_; kDeCDKN1B_1*_Nuc__CCNA_CDKN1A_B_1__CDKN1B_CCNE_A_1_Thr187p_*Nuc;
  R661: _Nuc__CCNE_CDKN1A_B_1__CDKN1B_CCNE_A_1_Thr187p_ => _Nuc__CCNE_CDKN1A_B_; kDeCDKN1B_1*_Nuc__CCNE_CDKN1A_B_1__CDKN1B_CCNE_A_1_Thr187p_*Nuc;
  R662: _Nuc__SKP2 + _Nuc__CCNA_CDKN1A_B_1__CDKN1B_CCNE_A_1_Thr187p_ => _Nuc__CCNA_CDKN1A_B_ + _Nuc__SKP2; kDeCDKN1B_2*_Nuc__SKP2*_Nuc__CCNA_CDKN1A_B_1__CDKN1B_CCNE_A_1_Thr187p_*Nuc;
  R663: _Nuc__SKP2 + _Nuc__CCNE_CDKN1A_B_1__CDKN1B_CCNE_A_1_Thr187p_ => _Nuc__CCNE_CDKN1A_B_ + _Nuc__SKP2; kDeCDKN1B_2*_Nuc__SKP2*_Nuc__CCNE_CDKN1A_B_1__CDKN1B_CCNE_A_1_Thr187p_*Nuc;
  R664: _Nuc__CCNA_CDKN1A_B_1__CDKN1B_CCNE_A_1_Thr187p_ => _Nuc__CCNA_CDKN1A_B_ + _Nuc__CDKN1B_CCNE_A_Thr187p_; kDiCdkn1bC*_Nuc__CCNA_CDKN1A_B_1__CDKN1B_CCNE_A_1_Thr187p_*Nuc;
  R665: _Nuc__CCNE_CDKN1A_B_1__CDKN1B_CCNE_A_1_Thr187p_ => _Nuc__CCNE_CDKN1A_B_ + _Nuc__CDKN1B_CCNE_A_Thr187p_; kDiCdkn1bC*_Nuc__CCNE_CDKN1A_B_1__CDKN1B_CCNE_A_1_Thr187p_*Nuc;
  R666: _Nuc__CCNA_CDKN1A_B_1__CDKN1B_CCNE_A_1_Thr187p_ => _Nuc__CCNA_CDKN1A_B_1__CDKN1B_CCNE_A_1_Thr187u_; kDpCDKN1B*_Nuc__CCNA_CDKN1A_B_1__CDKN1B_CCNE_A_1_Thr187p_*Nuc;
  R667: _Nuc__CCNE_CDKN1A_B_1__CDKN1B_CCNE_A_1_Thr187p_ => _Nuc__CCNE_CDKN1A_B_1__CDKN1B_CCNE_A_1_Thr187u_; kDpCDKN1B*_Nuc__CCNE_CDKN1A_B_1__CDKN1B_CCNE_A_1_Thr187p_*Nuc;
  R668: _Num__NUP_pSitesu_ + _Nuc__CCNA_CDKN1A_B_1__CDKN1B_CCNE_A_1_Thr187p_ => _Num__NUP_pSitesu_ + _Cyt__CCNA_CDKN1A_B_1__CDKN1B_CCNE_A_1_Thr187p_; kExImCCNA_CDKN1A_B1__CDKN1B_CCNE_A1_Thr187p__1*_Num__NUP_pSitesu_*_Nuc__CCNA_CDKN1A_B_1__CDKN1B_CCNE_A_1_Thr187p_*Num;
  R669: _Num__NUP_pSitesu_ + _Nuc__CCNE_CDKN1A_B_1__CDKN1B_CCNE_A_1_Thr187p_ => _Num__NUP_pSitesu_ + _Cyt__CCNE_CDKN1A_B_1__CDKN1B_CCNE_A_1_Thr187p_; kExImCCNE_CDKN1A_B1__CDKN1B_CCNE_A1_Thr187p__1*_Num__NUP_pSitesu_*_Nuc__CCNE_CDKN1A_B_1__CDKN1B_CCNE_A_1_Thr187p_*Num;

  // Unit definitions:
  unit substance = item;
  unit volume = litre;
  unit area = metre^2;
end
