// SBML level 2 version 4

model Leloup1999_CircadianRhythms_Neurospora()
  // This a model from the article:
  // Limit cycle models for circadian rhythms based on transcriptional regulation in Drosophila and Neurospora.
  // Leloup JC, Gonze D, Goldbeter A. J Biol Rhythms. 1999 Dec;14(6):433-48. 10643740 ,
  // Abstract:
  // We examine theoretical models for circadian oscillations based on transcriptional regulation in Drosophila and Neurospora. For Drosophila, the molecular model is based on the negative feedback exerted on the expression of the per and tim genes by the complex formed between the PER and TIM proteins. For Neurospora, similarly, the model relies on the feedback exerted on the expression of the frq gene by its protein product FRQ. In both models, sustained rhythmic variations in protein and mRNA levels occur in continuous darkness, in the form of limit cycle oscillations. The effect of light on circadian rhythms is taken into account in the models by considering that it triggers degradation of the TIM protein in Drosophila, and frq transcription in Neurospora. When incorporating the control exerted by light at the molecular level, we show that the models can account for the entrainment of circadian rhythms by light-dark cycles and for the damping of the oscillations in constant light, though such damping occurs more readily in the Drosophila model. The models account for the phase shifts induced by light pulses and allow the construction of phase response curves. These compare well with experimental results obtained in Drosophila. The model for Drosophila shows that when applied at the appropriate phase, light pulses of appropriate duration and magnitude can permanently or transiently suppress circadian rhythmicity. We investigate the effects of the magnitude of light-induced changes on oscillatory behavior. Finally, we discuss the common and distinctive features of circadian oscillations in the two organisms.
  // This particular version of the model has been translated from equations 4a-4c (Neurospora).
  // This model was taken from the CellML repository and automatically converted to SBML.
  // The original model was: Leloup JC, Gonze D, Goldbeter A. (1999) - version02
  // The original CellML model was created by:
  // Lloyd, Catherine, May
  // c.lloyd@aukland.ac.nz
  // The University of Auckland
  // The Bioengineering Institute
  // This model originates from BioModels Database: A Database of Annotated Published Models (http://www.ebi.ac.uk/biomodels/). It is copyright (c) 2005-2010 The BioModels.net Team.
  // For more information see the terms of use .
  // To cite BioModels Database, please use: Li C, Donizelli M, Rodriguez N, Dharuri H, Endler L, Chelliah V, Li L, He E, Henry A, Stefan MI, Snoep JL, Hucka M, Le Novère N, Laibe C (2010) BioModels Database: An enhanced, curated and annotated resource for published quantitative kinetic models. BMC Syst Biol., 4:92.
  // biomodels.db:MODEL1101140000
  // biomodels.db:BIOMD0000000299
  // isDescribedBy pubmed:10643740
  // isVersionOf GO:0042752
  // hasTaxon taxonomy:5141
  // hasProperty mamo:MAMO_0000046

  // Compartments:
  compartment Cytoplasm = 1;  // isVersionOf GO:0005737
  compartment Nucleus = 1;  // isVersionOf GO:0005634

  // Species:
  species M in Nucleus = 0.1;  // encodes uniprot:P19970; isVersionOf CHEBI:33699 kegg.compound:C02100
  species FC in Cytoplasm = 0.1;  // isVersionOf uniprot:P19970
  species FN in Nucleus = 0.1;  // isVersionOf uniprot:P19970

  // Parameters:
  vs = 1.6;
  vm = 0.505;
  Km = 0.5;
  KI = 1;
  n = 4;
  ks = 0.5;
  vd = 1.4;
  Kd = 0.13;
  k1 = 0.5;
  k2 = 0.6;

  // Assignment rules:
  Ft := FC + FN;

  // Rate rules:
  M' = vs*(KI^n/(KI^n + FN^n)) - vm*(M/(Km + M));
  FC' = ks*M + k2*FN - (vd*(FC/(Kd + FC)) + k1*FC);
  FN' = k1*FC - k2*FN;
end
