// SBML level 2 version 4

model Morris1981_MuscleFibre_Voltage_reduced()
  // This is the reduced model of the voltage oscillations in barnacle muscle fibers, generally known as the Morris-Lecar model (eg. wikipedia), described in the article:
  // Voltage oscillations in the barnacle giant muscle fiber.
  // Morris C, Lecar H. Biophys J. 1981 Jul;35(1):193-213. PubmedID:7260316; DOI:10.1016/S0006-3495(81)84782-0
  // Abstract:
  // Barnacle muscle fibers subjected to constant current stimulation produce a variety of types of oscillatory behavior when the internal medium contains the Ca++ chelator EGTA. Oscillations are abolished if Ca++ is removed from the external medium, or if the K+ conductance is blocked. Available voltage-clamp data indicate that the cell's active conductance systems are exceptionally simple. Given the complexity of barnacle fiber voltage behavior, this seems paradoxical. This paper presents an analysis of the possible modes of behavior available to a system of two noninactivating conductance mechanisms, and indicates a good correspondence to the types of behavior exhibited by barnacle fiber. The differential equations of a simple equivalent circuit for the fiber are dealt with by means of some of the mathematical techniques of nonlinear mechanics. General features of the system are (a) a propensity to produce damped or sustained oscillations over a rather broad parameter range, and (b) considerable latitude in the shape of the oscillatory potentials. It is concluded that for cells subject to changeable parameters (either from cell to cell or with time during cellular activity), a system dominated by two noninactivating conductances can exhibit varied oscillatory and bistable behavior.
  // The model consists of the differential equations (9) and (2) given on pages 205 and 196 of the article. There seems to be a typo in the figure caption of figure 9. Using V2 = 15 instead of -15 allows to reproduce the results.
  // Originally created by libAntimony v1.4 (using libSBML 3.4.1)
  // biomodels.db:MODEL1011240000
  // biomodels.db:BIOMD0000000280
  // isDescribedBy pubmed:7260316
  // isVersionOf GO:0001508
  // hasTaxon taxonomy:6678
  // hasProperty mamo:MAMO_0000046

  // Compartments:
  compartment musclefiber = 1;  // FMA:30316

  // Parameters:
  Minf has dimensionless;
  V = -50 mV;
  V1 = 10 mV;
  V2 = 15 mV;
  Ninf has dimensionless;
  V3 = -1 mV;
  V4 = 14.5 mV;
  lambdaN has per_ms;
  lambdaN_bar = 0.06666667 per_ms;
  Iapp = 300 uA_per_cm2;
  gL = 2 mS_per_cm2;
  VL = -50 mV;
  gCa = 4 mS_per_cm2;
  VCa = 100 mV;
  gK = 8 mS_per_cm2;
  N = (1 + tanh((V - V3)/V4))/2; N has dimensionless;
  VK = -70 mV;
  C = 20 uF_per_cm2;

  // Assignment rules:
  Minf := (1 + tanh((V - V1)/V2))/2;
  Ninf := (1 + tanh((V - V3)/V4))/2;
  lambdaN := lambdaN_bar*cosh((V - V3)/(2*V4));

  // Rate rules:
  V' = (Iapp - gL*(V - VL) - gCa*Minf*(V - VCa) - gK*N*(V - VK))/C;
  N' = lambdaN*(Ninf - N);

  // Unit definitions:
  unit time = 1e-3 second; time is "ms";
  unit per_ms = 1 / (1e-3 second);
  unit mV = 1e-3 volt;
  unit mS_per_cm2 = 1e-3 siemens / (0.01 metre)^2;
  unit uA_per_cm2 = 1e-6 ampere / (0.01 metre)^2; uA_per_cm2 is "microA_per_cm2";
  unit uF_per_cm2 = 1e-6 farad / (0.01 metre)^2; uF_per_cm2 is "microF per cm2";
end
