// SBML level 2 version 4

function Constant_flux__irreversible(v)
  v;
end
Constant_flux__irreversible is "Constant flux (irreversible)";

function VD(Vm, X, Kx, S, Km, Den)
  Vm/(1 + X/Kx)*S/Km/Den;
end

function V1_3_4_5(Vm, S, Km1, M, Km2)
  Vm*S/Km1/(1 + S/Km1 + M/Km2);
end
V1_3_4_5 is "V1,3,4,5";

function V2(Vm, S, Km)
  Vm*S/Km/(1 + S/Km);
end

model Ortega2013()
  // Ortega2013 - Interplay between secretases determines biphasic amyloid-beta level
  // This model is described in the article:
  // Interplay between ?-, ?-, and ?-secretases determines biphasic amyloid-? protein level in the presence of a ?-secretase inhibitor.
  // Ortega F, Stott J, Visser SA, Bendtsen C.
  // J. Biol. Chem. 2013 Jan; 288(2): 785-792
  // Abstract:
  // Amyloid-? (A?) is produced by the consecutive cleavage of amyloid precursor protein (APP) first by ?-secretase, generating C99, and then by ?-secretase. APP is also cleaved by ?-secretase. It is hypothesized that reducing the production of A? in the brain may slow the progression of Alzheimer disease. Therefore, different ?-secretase inhibitors have been developed to reduce A? production. Paradoxically, it has been shown that low to moderate inhibitor concentrations cause a rise in A? production in different cell lines, in different animal models, and also in humans. A mechanistic understanding of the A? rise remains elusive. Here, a minimal mathematical model has been developed that quantitatively describes the A? dynamics in cell lines that exhibit the rise as well as in cell lines that do not. The model includes steps of APP processing through both the so-called amyloidogenic pathway and the so-called non-amyloidogenic pathway. It is shown that the cross-talk between these two pathways accounts for the increase in A? production in response to inhibitor, i.e. an increase in C99 will inhibit the non-amyloidogenic pathway, redirecting APP to be cleaved by ?-secretase, leading to an additional increase in C99 that overcomes the loss in ?-secretase activity. With a minor extension, the model also describes plasma A? profiles observed in humans upon dosing with a ?-secretase inhibitor. In conclusion, this mechanistic model rationalizes a series of experimental results that spans from in vitro to in vivo and to humans. This has important implications for the development of drugs targeting A? production in Alzheimer disease.
  // This model is hosted on BioModels Database and identified by: BIOMD0000000556.
  // To cite BioModels Database, please use: BioModels Database: An enhanced, curated and annotated resource for published quantitative kinetic models.
  // To the extent possible under law, all copyright and related or neighbouring rights to this encoded model have been dedicated to the public domain worldwide. Please refer to CC0 Public Domain Dedication for more information.
  // biomodels.db:MODEL1409240000
  // biomodels.db:BIOMD0000000556
  // isDescribedBy pubmed:23152503
  // isVersionOf GO:0042987 GO:0034205
  // hasTaxon taxonomy:9606
  // hasProperty mamo:MAMO_0000046

  // Compartments:
  // Brain
  compartment Brain = 1;  // BTO:0000142

  // Species:
  // Amyloid protein precursor
  species $APP in Brain = 0;  // isVersionOf uniprot:P05067
  // C83 proteolytic product
  species $C83 in Brain = 0;  // isVersionOf uniprot:P05067
  // C99 proteolytic product
  species $C99 in Brain = 0;  // isVersionOf uniprot:P05067
  // Amyloid-beta
  species $AB in Brain = 0;  // isVersionOf uniprot:P05067
  // gamma-secretase inhibitor drug
  species $X in Brain = 0;  // chembl.compound:CHEMBL177969
  // Amyloid-beta p3 fragment
  species $p3 in Brain = 0;  // isVersionOf uniprot:P05067

  // Parameters:
  v0 = 1;
  km1 = 0.186;
  vm1 = 1.1;
  km3 = 28.8;
  vm3 = 14.6;
  km4 = 0.915;
  vm4 = 1.71;
  km5 = 0.0672;
  vm5 = 0.0223;
  km2 = 1.64;
  vm2 = 0.153;
  kic = 0.173;
  kiu1 = 145;
  kiu2 = 7.31;

  // Assignment rules:
  den := 1 + C83/km3*((1 + X/kiu1)/(1 + X/kic)) + C99/km4*((1 + X/kiu2)/(1 + X/kic));

  // Rate rules:
  APP' = r0 - r1 - r2;
  C83' = r1 + r5 - r3__D;
  C99' = r2 - r5 - r4__D;
  AB' = r4__D;
  p3' = r3__D;

  // Reactions:
  r0: => $APP; Brain*Constant_flux__irreversible(v0);
  r1: $APP => $C83; Brain*V1_3_4_5(vm1, APP, km1, C99, km5);  // modifiers: C99
  r2: $APP => $C99; Brain*V2(vm2, APP, km2);
  r3__ND: $C83 => $p3; Brain*V1_3_4_5(vm3, C83, km3, C99, km4); r3__ND is "r3 (ND)";  // modifiers: C99
  r4__ND: $C99 => $AB; Brain*V1_3_4_5(vm4, C99, km4, C83, km3); r4__ND is "r4 (ND)";  // modifiers: C83
  r5: $C99 => $C83; Brain*V1_3_4_5(vm5, C99, km5, APP, km1);  // modifiers: APP
  r3__D: $C83 => $p3; Brain*VD(vm3, X, kic, C83, km3, den); r3__D is "r3 (D)";  // modifiers: X
  r4__D: $C99 => $AB; Brain*VD(vm4, X, kic, C99, km4, den); r4__D is "r4 (D)";  // modifiers: X

  // Unit definitions:
  unit volume = 1e-3 litre;
  unit substance = 1e-3 mole;
end
