// SBML level 2 version 4

model Shi1993_Caffeine_pressor_tolerance()
  // described in: Pharmacokinetic-pharmacodynamic modeling of caffeine: Tolerance to pressor effects
  // Shi J, Benowitz NL, Denaro CP and Sheiner LB. ;Clin. Pharmacol. Ther. 1993 Jan;53(1):6-14. PMID:8422743;
  // Abstract:
  // We propose a parametric pharmacokinetic-pharmacodynamic model for caffeine that quantifies the development of tolerance to the pressor effect of the drug and characterizes the mean behavior and inter-individual variation of both pharmacokinetics and pressor effect. Our study in a small group of subjects indicates that acute tolerance develops to the pressor effect of caffeine and that both the pressor effect and tolerance occur after some time delay relative to changes in plasma caffeine concentration. The half-life of equilibration of effect with plasma caffeine concentration is about 20 minutes. The half-life of development and regression of tolerance is estimated to be about 1 hour, and the model suggests that tolerance, at its fullest, causes more than a 90 percent reduction of initial (nontolerant) effect. Whereas tolerance to the pressor effect of caffeine develops in habitual coffee drinkers, the pressor response is regained after relatively brief periods of abstinence. Because of the rapid development and regression of tolerance, the pressor response to caffeine depends on how much caffeine is consumed, the schedule of consumption, and the elimination half-life of caffeine.
  // Caffeine intake in this version is modelled as cups of coffee drunk at regular intervals (parameter t_interval). The amount of caffeine per cup is determined by the parameter cupsize. The body weight of the person drinking is given by the parameter bodyweight.
  // The even coffee cup occures delayed to the drinking of each cup, as the availability of the caffeine in the digestive tract is assumed to be delayed to the ingestion by the time t_lag.
  // This model originates from BioModels Database: A Database of Annotated Published Models. It is copyright (c) 2005-2011 The BioModels.net Team.
  // For more information see the terms of use.
  // To cite BioModels Database, please use: Li C, Donizelli M, Rodriguez N, Dharuri H, Endler L, Chelliah V, Li L, He E, Henry A, Stefan MI, Snoep JL, Hucka M, Le Novère N, Laibe C (2010) BioModels Database: An enhanced, curated and annotated resource for published quantitative kinetic models. BMC Syst Biol., 4:92.
  // biomodels.db:MODEL1001080000
  // biomodels.db:BIOMD0000000241
  // isDescribedBy pubmed:8422743
  // hasTaxon taxonomy:9606
  // isVersionOf GO:0031000 GO:0008217
  // hasProperty mamo:MAMO_0000046

  // Compartments:
  // gut compartment, the digestive tract
  compartment Gut = 1;  // isVersionOf FMA:71132
  // the central compartment, corresponding mainly to the plasma. Its apparant volume is given by the parameter V_C
  compartment C = 0.31;  // isVersionOf FMA:62970
  // peripheral compartment
  compartment P = 1;  // isPartOf FMA:20394
  // virtual compartment to account for tolerance effects
  compartment Tol = 1;
  // virtual effect compartment
  compartment Eff = 1;

  // Species:
  substanceOnly species X_gut in Gut = 0;  // substance in mg_per_kg; kegg.compound:C07481; CHEBI:27732
  species C_p in C = 0;  // CHEBI:27732 kegg.compound:C07481
  species C_per in P = 0;  // CHEBI:27732 kegg.compound:C07481
  // hypothetical effect-site concentration
  species C_e in Eff = 0;  // isVersionOf CHEBI:27732
  // hypothetical antagonistic metabolite to account for tolerance development
  species C_t in Tol = 0;  // isVersionOf CHEBI:27732

  // Parameters:
  // overall clearance per kilogram bodyweight
  CL = 0.11;
  // apparent volume of the central compartment per kg body-weight
  V_C = 0.32 l_per_kg;
  k_a = 12 per_hour;
  // time lag between drinking of coffee and arrival in gastrointestinal tract
  t_lag = 0.15 time;
  // plasma clearance rate
  k10 = 0.34 per_hour;
  // central to peripheral transport rate
  k12 = 1.64 per_hour;
  // peripheral to central compartment transport rate
  k21 = 1.19 per_hour;
  t_half = 3.98 time;
  // bioavailability
  F = 0.984;
  // first order rate of entry/exit to/from effector site
  k_eo = 2.03 per_hour;
  // first order rate constant of appearance/disappearance of tolerance
  k_tol = 0.75 per_hour;
  // base line effect (base MAP)
  E_0 = 83.3 mm_Hg;
  S = 19.07 mm_Hg_l_per_mg;
  T_50 = 0.26 mg_per_l;
  // effect (mean arterial pressure, MAP)
  E has mm_Hg; E is "MAP";
  // intervall between drinking of cups of coffee
  t_int = 2 time; t_int is "t_intervall";
  // amount of caffeine per cup
  cupsize = 90 substance;
  // total body weight
  bodyweight = 80 kilogram;
  // number of cups drank at time t
  cups = 0 dimensionless;

  // Assignment rules:
  E := E_0 + S*C_e/(1 + C_t/T_50);

  // Rate rules:
  X_gut' = -k_a*X_gut;
  C_p' = k_a*F*X_gut/V_C - k12*C_p + k21*C_per - k10*C_p;
  C_per' = k12*C_p - k21*C_per;
  C_e' = k_eo*(C_p - C_e);
  C_t' = k_tol*(C_p - C_t);

  // Events:
  // availability of caffeine in gut after drinking a cup
  coffecup: at (time >= t_int*cups + t_lag): cups = cups + 1, X_gut = X_gut + cupsize/bodyweight; coffecup is "coffee cup";

  // Unit definitions:
  unit substance = 1e-6 kilogram; substance is "mg";
  unit time = 3600 second; time is "hr";
  unit per_hour = 1 / (3600 second);
  unit l_per_kg = litre / kilogram; l_per_kg is "liter_per_kg";
  // unit for blood pressure
  unit mm_Hg = 1e-3 metre;
  unit mm_Hg_l_per_mg = 1e-3 metre * litre / (1e-6 kilogram); mm_Hg_l_per_mg is "mm_Hg per (mg/l)";
  unit mg_per_l = 1e-6 kilogram / litre; mg_per_l is "mg/l";
  unit mg_per_kg = dimensionless;
end
