// SBML level 2 version 4

model MODEL1409100000()
  // Sneppen2009 - Modeling proteasome dynamics in Parkinson's disease
  // This model is described in the article:
  // Modeling proteasome dynamics in Parkinson's disease.
  // Sneppen K, Lizana L, Jensen MH, Pigolotti S, Otzen D.
  // Phys Biol 2009; 6(3): 036005
  // Abstract:
  // In Parkinson's disease (PD), there is evidence that alpha-synuclein (alphaSN) aggregation is coupled to dysfunctional or overburdened protein quality control systems, in particular the ubiquitin-proteasome system. Here, we develop a simple dynamical model for the on-going conflict between alphaSN aggregation and the maintenance of a functional proteasome in the healthy cell, based on the premise that proteasomal activity can be titrated out by mature alphaSN fibrils and their protofilament precursors. In the presence of excess proteasomes the cell easily maintains homeostasis. However, when the ratio between the available proteasome and the alphaSN protofilaments is reduced below a threshold level, we predict a collapse of homeostasis and onset of oscillations in the proteasome concentration. Depleted proteasome opens for accumulation of oligomers. Our analysis suggests that the onset of PD is associated with a proteasome population that becomes occupied in periodic degradation of aggregates. This behavior is found to be the general state of a proteasome/chaperone system under pressure, and suggests new interpretations of other diseases where protein aggregation could stress elements of the protein quality control system.
  // This model is hosted on BioModels Database and identified by: BIOMD0000000548.
  // To cite BioModels Database, please use: BioModels Database: An enhanced, curated and annotated resource for published quantitative kinetic models.
  // To the extent possible under law, all copyright and related or neighbouring rights to this encoded model have been dedicated to the public domain worldwide. Please refer to CC0 Public Domain Dedication for more information.
  // biomodels.db:MODEL1409100000
  // biomodels.db:BIOMD0000000548
  // isDescribedBy pubmed:19411740
  // hasTaxon taxonomy:9606
  // isVersionOf GO:0043161 GO:0070841
  // hasProperty mamo:MAMO_0000046

  // Compartments:
  compartment Brain = 1;  // BTO:0000142

  // Species:
  // Mature α-synuclein fibrils
  species $F in Brain = 135;  // isVersionOf GO:0043205; uniprot:P37840
  // Proteasome
  species $P in Brain = 0;  // GO:0000502
  // Complex mature α-synuclein fibrils - proteasome
  species $C in Brain = 18;  // hasPart uniprot:P37840; hasPart GO:0000502; hasVersion GO:0043205

  // Parameters:
  // Constant influx of protofilaments
  m = 25;
  // Reaction constant associated with the formationof the proteasome-fibril complex
  gamma = 1;
  // Inverse of degradation time for fibrils in the complex
  nu = 1;
  // Production rate of proteasome proteins
  sigma = 1;

  // Rate rules:
  F' = m/(1 + P) - gamma*F*P;
  P' = sigma - P - gamma*F*P + nu*C;
  C' = gamma*F*P - nu*C;

  // Unit definitions:
  unit volume = 1e-3 litre;
  unit substance = 1e-3 mole;
end
