// SBML level 2 version 4

model Sturis1991_InsulinGlucoseModel_UltradianOscillation()
  // This a model from the article:
  // Computer model for mechanisms underlying ultradian oscillations of insulin and glucose.
  // Sturis J, Polonsky KS, Mosekilde E, Van Cauter E. Am J Physiol.1991 May;260(5 Pt 1):E801-9. 2035636,
  // Abstract:
  // Oscillations in human insulin secretion have been observed in two distinct period ranges, 10-15 min (i.e. rapid) and 100-150 min (i.e., ultradian). The cause of the ultradian oscillations remains to be elucidated. To determine whether the oscillations could result from the feedback loops between insulin and glucose, a parsimonious mathematical model including the major mechanisms involved in glucose regulation was developed. This model comprises two major negative feedback loops describing the effects of insulin on glucose utilization and glucose production, respectively, and both loops include the stimulatory effect of glucose on insulin secretion. Model formulations and parameters are representative of results from published clinical investigations. The occurrence of sustained insulin and glucose oscillations was found to be dependent on two essential features: 1) a time delay of 30-45 min for the effect of insulin on glucose production and 2) a sluggish effect of insulin on glucose utilization, because insulin acts from a compartment remote from plasma. When these characteristics were incorporated in the model, numerical simulations mimicked all experimental findings so far observed for these ultradian oscillations, including 1) self-sustained oscillations during constant glucose infusion at various rates; 2) damped oscillations after meal or oral glucose ingestion; 3) increased amplitude of oscillation after increased stimulation of insulin secretion, without change in frequency; and 4) slight advance of the glucose oscillation compared with the insulin oscillation.(ABSTRACT TRUNCATED AT 250 WORDS)
  // This model originates from BioModels Database: A Database of Annotated Published Models. It is copyright (c) 2005-2011 The BioModels.net Team.
  // For more information see the terms of use.
  // To cite BioModels Database, please use: Li C, Donizelli M, Rodriguez N, Dharuri H, Endler L, Chelliah V, Li L, He E, Henry A, Stefan MI, Snoep JL, Hucka M, Le Novère N, Laibe C (2010) BioModels Database: An enhanced, curated and annotated resource for published quantitative kinetic models. BMC Syst Biol., 4:92.
  // biomodels.db:MODEL1110180000
  // biomodels.db:BIOMD0000000382
  // isDescribedBy pubmed:2035636
  // hasTaxon taxonomy:9606
  // encodes GO:0030073 GO:0015758 GO:0044381
  // hasProperty mamo:MAMO_0000046

  // Compartments:
  compartment compartment1 = 1;

  // Species:
  species x in compartment1 = 90/compartment1;  // isVersionOf uniprot:P01308
  species y in compartment1 = 180/compartment1;  // isVersionOf uniprot:P01308
  species z in compartment1 = 13000/compartment1;  // CHEBI:17234
  species h1 in compartment1 = 70/compartment1;
  species h2 in compartment1 = 70/compartment1;
  species h3 in compartment1 = 70/compartment1;

  // Parameters:
  v1 = 3;
  v2 = 11;
  v3 = 10;
  t1 = 6;
  t2 = 100;
  t3 = 36;
  I = 216;
  E = 0.21;

  // Assignment rules:
  f1 := 209/(1 + exp(-z/(300*v3) + 6.6));
  f2 := 72*(1 - exp(-z/144*v3));
  f3 := 0.01*z/v3;
  f5 := 180/(1 + exp(0.29*h3/v1 - 7.5));
  f4 := 90/(1 + exp(-1.772*ln(y*(1/v2 + 1/(E*t2))) + 7.76)) + 4;

  // Rate rules:
  x' = f1 - E*(x/v1 - y/v2) - x/t1;
  y' = E*(x/v1 - y/v2) - y/t2;
  z' = f5 + I - f2 - f3*f4;
  h1' = 3*(x - h1)/t3;
  h2' = 3*(h1 - h2)/t3;
  h3' = 3*(h2 - h3)/t3;
end
