// SBML level 2 version 4

model MODEL1409250001()
  // Baker2013 - Cytokine Mediated Inflammation in Rheumatoid Arthritis - Age Dependent
  // Baker2013 - Cytokine Mediated Inflammation in Rheumatoid Arthritis - Age Dependant
  // This model by Baker M. 2013, describes the interaction between pro and anti-inflammatory cytokine signalling in rheumatoid arthritis.
  // Using two ordinary differential equations, the first model [BIOMD0000000550] analyses bifurcation and describes different pathological states by altering inflammatory regulation parameters.
  // The second model [BIOMD0000000549] includes the effect that ageing has on pro-inflammatory signalling, allowing for time-dependant properties and disease progression to be observed. The author also describes potential dosing for reversal of the disease state.
  // This model is described in the article:
  // Mathematical modelling of cytokine-mediated inflammation in rheumatoid arthritis.
  // Baker M, Denman-Johnson S, Brook BS, Gaywood I, Owen MR.
  // Math Med Biol 2013 Dec; 30(4): 311-337
  // Abstract:
  // Rheumatoid arthritis (RA) is a chronic inflammatory disease preferentially affecting the joints and leading, if untreated, to progressive joint damage and disability. Cytokines, a group of small inducible proteins, which act as intercellular messengers, are key regulators of the inflammation that characterizes RA. They can be classified into pro-inflammatory and anti-inflammatory groups. Numerous cytokines have been implicated in the regulation of RA with complex up and down regulatory interactions. This paper considers a two-variable model for the interactions between pro-inflammatory and anti-inflammatory cytokines, and demonstrates that mathematical modelling may be used to investigate the involvement of cytokines in the disease process. The model displays a range of possible behaviours, such as bistability and oscillations, which are strongly reminiscent of the behaviour of RA e.g. genetic susceptibility and remitting-relapsing disease. We also show that the dose regimen as well as the dose level are important factors in RA treatments.
  // This model is hosted on BioModels Database and identified by: BIOMD0000000549.
  // To cite BioModels Database, please use: BioModels Database: An enhanced, curated and annotated resource for published quantitative kinetic models.
  // To the extent possible under law, all copyright and related or neighbouring rights to this encoded model have been dedicated to the public domain worldwide. Please refer to CC0 Public Domain Dedication for more information.
  // biomodels.db:MODEL1409250001
  // biomodels.db:BIOMD0000000549
  // isDescribedBy pubmed:23002057
  // hasTaxon taxonomy:9606
  // isPartOf reactome:REACT_75790
  // isVersionOf GO:0050727 GO:0019221

  // Compartments:
  // Compartment notes: "The synovium is modelled as a spatially uniform collection of homogeneous, generic cells."
  compartment Synovium = 1;  // BTO:0001823

  // Species:
  // Anti-inflammatory cytokine concentration (dimensionless)
  species $a in Synovium = 0.005776676;  // isVersionOf CHEBI:67079
  // Pro-inflammatory cytokine concentration (dimensionless)
  species $p in Synovium = 0.02032983;  // isVersionOf FMA:84050; hasProperty PATO:0002104

  // Parameters:
  // Background pro-inflammatory production rate
  alpha1 = 0.025;
  // In this model, alpha2 (the additional pro-inflammatory production parameter) is a function of time as described in the original article.
  var alpha2;
  // Pro-inflammatory cytokine concentration at which the anti-inflammatoryproduction is half maximal
  alpha3 = 0.5;
  // Magnitude of anti-inflammatory cytokine production.
  alpha4 = 7;
  // Relative rate of clearance of pro-inflammatory cytokine to anti-inflammatory cytokine.
  gamma = 1.25;
  // Value of alpha2 where t = 1/2 of maximal alpha2
  alpha2T = 15;
  // minimum value of alpha2
  alpha2_min = 1;
  // maximum value of alpha2
  alpha2_max = 50;

  // Assignment rules:
  alpha2 := alpha2_min + (alpha2_max - alpha2_min)*time^2/(alpha2T^2 + time^2);

  // Rate rules:
  a' = -a + alpha4*(p^2/(alpha3^2 + p^2));
  p' = -gamma*p + 1/(1 + a^2)*(alpha1 + alpha2*(p^2/(1 + p^2)));

  // Unit definitions:
  unit volume = dimensionless;
  unit time = dimensionless;
  unit substance = dimensionless;
end
