// SBML level 2 version 4

model Bertram2000_PancreaticBetaCells_Oscillations()
  // This a model from the article:
  // The phantom burster model for pancreatic beta-cells.
  // Bertram R, Previte J, Sherman A, Kinard TA, Satin LS. Biophys J2000 Dec;79(6):2880-92 11106596,
  // Abstract:
  // Pancreatic beta-cells exhibit bursting oscillations with a wide range of periods. Whereas periods in isolated cells are generally either a few seconds or a few minutes, in intact islets of Langerhans they are intermediate (10-60 s). We develop a mathematical model for beta-cell electrical activity capable of generating this wide range of bursting oscillations. Unlike previous models, bursting is driven by the interaction of two slow processes, one with a relatively small time constant (1-5 s) and the other with a much larger time constant (1-2 min). Bursting on the intermediate time scale is generated without need for a slow process having an intermediate time constant, hence phantom bursting. The model suggests that isolated cells exhibiting a fast pattern may nonetheless possess slower processes that can be brought out by injecting suitable exogenous currents. Guided by this, we devise an experimental protocol using the dynamic clamp technique that reliably elicits islet-like, medium period oscillations from isolated cells. Finally, we show that strong electrical coupling between a fast burster and a slow burster can produce synchronized medium bursting, suggesting that islets may be composed of cells that are intrinsically either fast or slow, with few or none that are intrinsically medium.
  // This model was taken from the CellML repository and automatically converted to SBML.
  // The original model was: Bertram R, Previte J, Sherman A, Kinard TA, Satin LS. (2000) - version02
  // This model originates from BioModels Database: A Database of Annotated Published Models (http://www.ebi.ac.uk/biomodels/). It is copyright (c) 2005-2011 The BioModels.net Team.
  // For more information see the terms of use.
  // To cite BioModels Database, please use: Li C, Donizelli M, Rodriguez N, Dharuri H, Endler L, Chelliah V, Li L, He E, Henry A, Stefan MI, Snoep JL, Hucka M, Le Novère N, Laibe C (2010) BioModels Database: An enhanced, curated and annotated resource for published quantitative kinetic models. BMC Syst Biol., 4:92.
  // biomodels.db:MODEL0911270001
  // biomodels.db:BIOMD0000000377
  // isDescribedBy pubmed:11106596
  // isDerivedFrom pubmed:1850840
  // isVersionOf GO:0061469 GO:0044342 GO:0003323
  // occursIn BTO:0000783

  // Compartments:
  compartment Compartment = 1;

  // Species:
  species V in Compartment = -43/Compartment;  // isVersionOf PATO:0001462
  species n in Compartment = 0.03/Compartment;  // isVersionOf GO:0005251
  species s1 in Compartment = 0.1/Compartment;  // isVersionOf PATO:0001227
  species s2 in Compartment = 0.434/Compartment;  // isVersionOf PATO:0001227

  // Parameters:
  Cm = 4524;
  Vm = -22;
  VCa = 100;
  gCa = 280;
  sm = 7.5;
  VK = -80;
  gK = 1300;
  lambda = 1.1;
  tnbar = 8.3;
  Vn = -9;
  sn = 10;
  gs1 = 20;
  Vs1 = -40;
  ss1 = 0.5;
  taus1 = 1000;
  Vs2 = -42;
  ss2 = 0.4;
  gs2 = 32;
  taus2 = 120000;
  gl = 25;
  Vl = -40;
  var I1_I2; I1_I2 is "I1+I2";

  // Assignment rules:
  s1inf := 1/(1 + exp((Vs1 - V)/ss1));
  minf := 1/(1 + exp((Vm - V)/sm));
  ICa := gCa*minf*(V - VCa);
  IK := gK*n*(V - VK);
  taun := tnbar/(1 + exp((V - Vn)/sn));
  ninf := 1/(1 + exp((Vn - V)/sn));
  Is1 := gs1*s1*(V - VK);
  s2inf := 1/(1 + exp((Vs2 - V)/ss2));
  Is2 := gs2*s2*(V - VK);
  Il := gl*(V - Vl);
  I1_I2 := Is1 + Is2;

  // Rate rules:
  V' = -(ICa + IK + Il + Is1 + Is2)/Cm;
  n' = (ninf - n)/taun;
  s1' = (s1inf - s1)/taus1;
  s2' = (s2inf - s2)/taus2;
end
