// SBML level 2 version 4

model Bier2000_GlycolyticOscillation()
  // This a model from the article:
  // How yeast cells synchronize their glycolytic oscillations: a perturbation analytic treatment
  // Bier M, Bakker BM, Westerhoff HV. Biophys. J2000 Mar;78(3):1087-93. 10692299,
  // Abstract:
  // Of all the lifeforms that obtain their energy from glycolysis, yeast cells are among the most basic. Under certain conditions the concentrations of the glycolytic intermediates in yeast cells can oscillate. Individual yeast cells in a suspension can synchronize their oscillations to get in phase with each other. Although the glycolytic oscillations originate in the upper part of the glycolytic chain, the signaling agent in this synchronization appears to be acetaldehyde, a membrane-permeating metabolite at the bottom of the anaerobic part of the glycolytic chain. Here we address the issue of how a metabolite remote from the pacemaking origin of the oscillation may nevertheless control the synchronization. We present a quantitative model for glycolytic oscillations and their synchronization in terms of chemical kinetics. We show that, in essence, the common acetaldehyde concentration can be modeled as a small perturbation on the "pacemaker" whose effect on the period of the oscillations of cells in the same suspension is indeed such that a synchronization develops.
  // biomodels.db:MODEL1007260000
  // biomodels.db:BIOMD0000000254
  // isDescribedBy pubmed:10692299
  // hasTaxon taxonomy:4932
  // isVersionOf GO:0006096
  // hasProperty mamo:MAMO_0000046

  // Compartments:
  compartment compartment = 1;  // GO:0005623

  // Species:
  species G1 in compartment = 6.6; G1 is "Glucose_1";  // isVersionOf CHEBI:17234 kegg.compound:C00293
  species T1 in compartment = 7.6; T1 is "ATP_1";  // isVersionOf CHEBI:15422 kegg.compound:C00002
  species G2 in compartment = 10.3; G2 is "Glucose_2";  // isVersionOf CHEBI:17234 kegg.compound:C00293
  species T2 in compartment = 0.41; T2 is "ATP_2";  // isVersionOf CHEBI:15422 kegg.compound:C00002

  // Parameters:
  // V_in represents the constant glucose inflow
  V_in = 0.36;
  // k1 represents the phosphofructo kinase activity
  k1 = 0.02;
  kp = 6;
  km = 13;
  epsilon = 0.01;

  // Assignment rules:
  Tsum := T2 + T1;
  Tdiff := T2 - T1;

  // Rate rules:
  G1' = V_in - k1*G1*T1;
  G2' = V_in - k1*G2*T2;
  T1' = 2*k1*T1*G1 - kp*T1/(km + T1) + epsilon*(T2 - T1);
  T2' = 2*k1*G2*T2 - kp*T2/(km + T2) - epsilon*(T2 - T1);
end
