// SBML level 2 version 4

model Das2010___Effect_of_a_gamma_secretase_inhibitor_on_Amyloid_beta_dynamics()
  // Das2010 - Effect of a gamma-secretase inhibitor on Amyloid-beta dynamics
  // This model is described in the article:
  // Modeling effect of a ?-secretase inhibitor on amyloid-? dynamics reveals significant role of an amyloid clearance mechanism.
  // Das R, Nachbar RB, Edelstein-Keshet L, Saltzman JS, Wiener MC, Bagchi A, Bailey J, Coombs D, Simon AJ, Hargreaves RJ, Cook JJ.
  // Bull. Math. Biol. 2011 Jan; 73(1): 230-247
  // Abstract:
  // Aggregation of the small peptide amyloid beta (A?) into oligomers and fibrils in the brain is believed to be a precursor to Alzheimer's disease. A? is produced via multiple proteolytic cleavages of amyloid precursor protein (APP), mediated by the enzymes ?- and ?-secretase. In this study, we examine the temporal dynamics of soluble (unaggregated) A? in the plasma and cerebral-spinal fluid (CSF) of rhesus monkeys treated with different oral doses of a ?-secretase inhibitor. A dose-dependent reduction of A? concentration was observed within hours of drug ingestion, for all doses tested. A? concentration in the CSF returned to its predrug level over the monitoring period. In contrast, A? concentration in the plasma exhibited an unexpected overshoot to as high as 200% of the predrug concentration, and this overshoot persisted as late as 72 hours post-drug ingestion. To account for these observations, we proposed and analyzed a minimal physiological model for A? dynamics that could fit the data. Our analysis suggests that the overshoot arises from the attenuation of an A? clearance mechanism, possibly due to the inhibitor. Our model predicts that the efficacy of A? clearance recovers to its basal (pretreatment) value with a characteristic time of >48 hours, matching the time-scale of the overshoot. These results point to the need for a more detailed investigation of soluble A? clearance mechanisms and their interaction with A?-reducing drugs.
  // This model is hosted on BioModels Database and identified by: BIOMD0000000551.
  // To cite BioModels Database, please use: BioModels Database: An enhanced, curated and annotated resource for published quantitative kinetic models.
  // To the extent possible under law, all copyright and related or neighbouring rights to this encoded model have been dedicated to the public domain worldwide. Please refer to CC0 Public Domain Dedication for more information.
  // biomodels.db:MODEL1409230000
  // biomodels.db:BIOMD0000000551
  // isDescribedBy pubmed:20411345
  // isVersionOf GO:0097242
  // hasTaxon taxonomy:9544
  // hasProperty mamo:MAMO_0000046

  // Compartments:
  compartment CSF = 1;  // BTO:0000237
  compartment Plasma = 1;  // BTO:0000131

  // Species:
  // Abeta concentration in CSF
  species $C in CSF = 1;  // isVersionOf uniprot:P05067
  // Abeta concentration in plasma
  species $P in Plasma = 1;  // isVersionOf uniprot:P05067

  // Parameters:
  // Efficacy of Abeta clearance
  l = 1;
  Sc = 1.16;
  // time course for the gamma-secretase inhibitor in CSF
  var g_t; g_t is "g(t)";
  Ki = 0.0232;
  k1 = 1.13;
  J = 0;
  r = 0.43;
  deltap = 0.55;
  epsilon = 0.0206;
  alpha = 0.522;
  // time course for the gamma-secretase inhibitor in plasma
  var f_t; f_t is "f(t)";
  aplasma = 187;
  bplasma = 0.089;
  tauplasma = 1.66;
  aCSF = 4.92;
  bCSF = 0.259;
  tauCSF = 2.06;

  // Assignment rules:
  g_t := piecewise(time/tauCSF*aCSF*exp(-bCSF*tauCSF), time < tauCSF, aCSF*exp(-bCSF*time));
  f_t := piecewise(time/tauplasma*aplasma*exp(-bplasma*tauplasma), time < tauplasma, aplasma*exp(-bplasma*time));

  // Rate rules:
  C' = Sc/(1 + g_t/Ki) - k1*C + J;
  P' = k1*r*C - J*r - deltap*P*l;
  l' = epsilon*(1/(1 + alpha*f_t) - l);

  // Unit definitions:
  unit volume = 1e-3 litre;
  unit time = 3600 second;
  unit substance = 1e-3 mole;
end
