// SBML level 2 version 4

model MODEL1407300001()
  // Steckmann2012 - Amyloid beta-protein fibrillogenesis (kinetics of secondary structure conversion)
  // This model is described in the article:
  // Kinetics of peptide secondary structure conversion during amyloid ?-protein fibrillogenesis.
  // Steckmann T, Awan Z, Gerstman BS, Chapagain PP.
  // J. Theor. Biol. 2012 May; 301: 95-102
  // Abstract:
  // Amyloid fibrils are a common component in many debilitating human neurological diseases such as Alzheimer's (AD), Parkinson's, and Creutzfeldt-Jakob, and in animal diseases such as BSE. The role of fibrillar ?? proteins in AD has stimulated interest in the kinetics of ?? fibril formation. Kinetic models that include reaction pathways and rate parameters for the various stages of the process can be helpful towards understanding the dynamics on a molecular level. Based upon experimental data, we have developed a mathematical model for the reaction pathways and determined rate parameters for peptide secondary structural conversion and aggregation during the entire fibrillogenesis process from random coil to mature fibrils, including the molecular species that accelerate the conversions. The model and the rate parameters include different molecular structural stages in the nucleation and polymerization processes and the numerical solutions yield graphs of concentrations of different molecular species versus time that are in close agreement with experimental results. The model also allows for the calculation of the time-dependent increase in aggregate size. The calculated results agree well with experimental results, and allow differences in experimental conditions to be included in the calculations. The specific steps of the model and the rate constants that are determined by fitting to experimental data provide insight on the molecular species involved in the fibril formation process.
  // This model is hosted on BioModels Database and identified by: BIOMD0000000533.
  // To cite BioModels Database, please use: BioModels Database: An enhanced, curated and annotated resource for published quantitative kinetic models.
  // To the extent possible under law, all copyright and related or neighbouring rights to this encoded model have been dedicated to the public domain worldwide. Please refer to CC0 Public Domain Dedication for more information.
  // biomodels.db:MODEL1407300001
  // biomodels.db:BIOMD0000000533
  // isDescribedBy pubmed:22586726
  // hasTaxon taxonomy:9606
  // isVersionOf GO:0034205 GO:0070841
  // hasProperty mamo:MAMO_0000046

  // Compartments:
  compartment cell = 1;  // BTO:0000142

  // Species:
  species $RCT0 in cell = 88.1;  // isVersionOf uniprot:P05067
  species $alpha in cell = 0;  // isVersionOf uniprot:P05067
  species $BN1 in cell = 11.9;  // isVersionOf uniprot:P05067
  species $BN2 in cell = 0;  // isVersionOf uniprot:P05067
  species $BN3 in cell = 0;  // isVersionOf uniprot:P05067
  species $BN4 in cell = 0;  // isVersionOf uniprot:P05067
  species $BTX in cell = 0;  // isVersionOf uniprot:P05067
  species $BM in cell = 0;  // isVersionOf uniprot:P05067
  species $RCT1 in cell = 0;  // isVersionOf uniprot:P05067
  species $RC in cell;  // isVersionOf uniprot:P05067
  species $beta in cell;  // isVersionOf uniprot:P05067

  // Parameters:
  k0 = 0.59;
  k1 = 0.672;
  k2 = 0.678;
  k3 = 0.0392;
  k4 = 0.554;
  q = 2;
  epsilon = 0;

  // Assignment rules:
  RC := RCT0 + RCT1;
  beta := BM + BN1 + BN2 + BN3 + BN4 + BTX;

  // Rate rules:
  RCT0' = -k0*(epsilon + BM)*RCT0 - k1*BTX*RCT0;
  alpha' = k1*BTX*RCT0 - k2*BTX^q*alpha;
  BN1' = k2*BTX^q*alpha - 4*k3*BN1;
  BN2' = 4*k3*BN1 - 4*k3*BN2;
  BN3' = 4*k3*BN2 - 4*k3*BN3;
  BN4' = 4*k3*BN3 - 4*k3*BN4;
  BTX' = 4*k3*BN4 - k4*BTX;
  BM' = k4*BTX;
  RCT1' = k0*(epsilon + BM)*RCT0;

  // Unit definitions:
  unit volume = 1e-3 litre;
  unit time = 86400 second;
  unit substance = 1e-3 mole;
end
