// SBML level 2 version 4
// dcterms:bibliographicCitation: http://identifiers.org/pubmed/16794927

model Waugh2006___Diabetic_Wound_Healing___Treated_and_Untreated_Macrophage_Dynamics()
  // Waugh2006 - Diabetic Wound Healing - Treated and Untreated Macrophage Dynamics
  // This a model from the article:
  // Macrophage dynamics in diabetic wound dealing.
  // Waugh HV, Sherratt JA. Bull Math Biol 2006 Jan;68(1):197-207 16794927 ,
  // Abstract:
  // Wound healing in diabetes is a complex process, characterised by a chronic inflammation phase. The exact mechanism by which this occurs is not fully understood, and whilst several treatments for healing diabetic wounds exist, very little research has been conducted towards the causes of the extended inflammation phase. We describe a mathematical model which offers a possible explanation for diabetic wound healing in terms of the distribution of macrophage phenotypes being altered in the diabetic patient compared to normal wound repair. As a consequence of this, we put forward a suggestion for treatment based on rectifying the macrophage phenotype imbalance.
  // This model was taken from the CellML repository and automatically converted to SBML.
  // The original model was: Waugh HV, Sherratt JA. (2006) - version=1.0
  // The original CellML model was created by:
  // Catherine Lloyd
  // c.lloyd@auckland.ac.nz
  // The University of Auckland
  // This model originates from BioModels Database: A Database of Annotated Published Models (http://www.ebi.ac.uk/biomodels/). It is copyright (c) 2005-2011 The BioModels.net Team.
  // To the extent possible under law, all copyright and related or neighbouring rights to this encoded model have been dedicated to the public domain worldwide. Please refer to CC0 Public Domain Dedication for more information.
  // In summary, you are entitled to use this encoded model in absolutely any manner you deem suitable, verbatim, or with modification, alone or embedded it in a larger context, redistribute it, commercially or not, in a restricted way or not..
  // To cite BioModels Database, please use: Li C, Donizelli M, Rodriguez N, Dharuri H, Endler L, Chelliah V, Li L, He E, Henry A, Stefan MI, Snoep JL, Hucka M, Le Novère N, Laibe C (2010) BioModels Database: An enhanced, curated and annotated resource for published quantitative kinetic models. BMC Syst Biol., 4:92.
  // biomodels.db:MODEL1006230098
  // isDescribedBy pubmed:16794927
  // biomodels.db:BIOMD0000000681
  // isVersionOf GO:0061041
  // hasTaxon taxonomy:9606
  // isDescribedBy pubmed:16794927

  // Compartments:
  compartment COMpartment = 1; COMpartment is "Wound";  // isVersionOf efo:0005756

  // Species:
  species $K_T in COMpartment;  // isInstanceOf BTO:0000876 GO:0035703; isVersionOf BTO:0000876
  species $phi_I in COMpartment = 200;  // isVersionOf BTO:0000801; isVersionOf CL:0000863
  species $phi_R in COMpartment = 200;  // isVersionOf BTO:0000801; hasProperty ncit:C17260
  species $T in COMpartment = 6;  // isVersionOf PR:000000046

  // Parameters:
  tau1 = -2.47 unit_0;
  tau2 = 21.94 unit_1;
  tau3 = 6.41 unit_2;
  tau4 = 1.75 unit_3;
  alpha = 0.8 unit_4;
  k1 = 0.05 unit_4;  // encodes ncit:C16864
  k2 = 0.693 unit_5;
  k3 = 0.002 unit_6;
  k4 = 0.07 unit_7;
  d1 = 0.2 unit_5;
  d2 = 9.1 unit_5;
  dummy_variable = 0;

  // Assignment rules:
  K_T := tau1*T^3 + tau2*T^2 + tau3*T + tau4;
  total_M := 0*K_T + phi_I + phi_R;

  // Rate rules:
  phi_I' = alpha*K_T + k1*k2*phi_I*(1 - k3*(phi_I + phi_R)) - d1*phi_I;
  phi_R' = (1 - alpha)*K_T + k1*k2*phi_R*(1 - k3*(phi_I + phi_R)) - d1*phi_R;
  T' = k4*phi_I - d2*T;

  // Events:
  event: at (time > 22): alpha = 0.2 + 0.6*dummy_variable;

  // Unit definitions:
  unit time = 86400 second;
  unit unit_0 = (8.64e-11 metre)^6 / (gram^3 * second); unit_0 is "8.64e-11*m^6/(g³*s)";
  unit unit_1 = (8.64e-5 metre)^3 / (gram^2 * second); unit_1 is "0.0864*mm³/(g²*s)";
  unit unit_2 = 1 / (1.15741e7 gram * second); unit_2 is "1/(11.5741*Mg*s)";
  unit unit_3 = 1 / ((0.0115741 metre)^3 * second); unit_3 is "1/(0.0115741*m³*s)";
  unit unit_4 = dimensionless^0; unit_4 is "1";
  unit unit_5 = 1 / (1.15741e-5 second); unit_5 is "1/(0.0115741*ms)";
  unit unit_6 = (1e-3 metre)^3; unit_6 is "0.001*m³";
  unit unit_7 = (8.64e-8 dimensionless)^0 * 0.0864 gram / second; unit_7 is "0.0864*µg/s";
end
