// SBML level 2 version 3

model hhsa_1952()
  // hodgkin-huxley squid-axon 1952
  // This is an implementation of the Hodgkin-Huxley model of the electrical behavior of the squid axon membrane from:
  // A quantitative description of membrane current and its application to conduction and excitation in nerve.
  // A. L. Hodgkin and A. F. Huxley. (1952 ) Journal of Physiology 119(4): pp 500-544; pmID: 12991237 .
  // Abstract:
  // This article concludes a series of papers concerned with the flow of electric current through the surface membrane of a giant nerve fibre (Hodgkin,Huxley & Katz, 1952; Hodgkin & Huxley, 1952 a-c). Its general object is to discuss the results of the preceding papers (Part I), to put them into mathematical form (Part II) and to show that they will account for conduction and excitation in quantitative terms (Part III).
  // This SBML model uses the same formalism as the one described in the paper, contrary to modern versions:
  // * V describes the the membrane depolarisation relative to the resting potential of the membrane
  // * opposing to modern practice, depolarization is negative , not positive , so the sign of V is different
  // * inward transmembrane currents are considered positive (inward current positive), contrary to modern use
  // The changeable parameters are the equilibrium potentials( E_R, E_K, E_L, E_Na ), the membrane depolarization ( V ) and the initial sodium and potassium channel activation and inactivation coefficients ( m,h,n ). The initial values of m,h,n for the model were calculated for V = 0 using the equations from the article: n t=0 = α_n V=0 /(α_n V=0 + β_n V=0 ) and equivalent expressions for h and m .
  // For single excitations apply a negative membrane depolarization (V < 0). To achieve oscillatory behavior either change the resting potential to a more positive value or apply a constant negative ionic current (I < 0).
  // Two assignments for parameters in the model, alpha_n and alpha_m, are not defined at V=-10 resp. -25 mV. We did not change this to keep the formulas similar to the original publication and as most integrators seem not to have any problem with it. The limits at V=-10 and -25 mV are 0.1 for alpha_n resp. 1 for alpha_m.
  // We thank Mark W. Johnson for finding a bug in the model and his helpful comments.
  // This model originates from BioModels Database: A Database of Annotated Published Models. It is copyright (c) 2005-2009 The BioModels Team.
  // For more information see the terms of use .
  // To cite BioModels Database, please use Le Novère N., Bornstein B., Broicher A., Courtot M., Donizelli M., Dharuri H., Li L., Sauro H., Schilstra M., Shapiro B., Snoep J.L., Hucka M. (2006) BioModels Database: A Free, Centralized Database of Curated, Published, Quantitative Kinetic Models of Biochemical and Cellular Systems Nucleic Acids Res., 34: D689-D691.
  // biomodels.db:MODEL6617668482
  // biomodels.db:BIOMD0000000020
  // isDescribedBy pubmed:12991237
  // isVersionOf GO:0019227 GO:0005248 GO:0005249
  // hasTaxon taxonomy:6618 GO:0042757
  // hasProperty mamo:MAMO_0000046

  // Compartments:
  compartment unit_compartment = 1;

  // Parameters:
  // membrane depolarisation
  V = 0 mV;
  // negative membrane depolarisation
  V_neg has mV;
  // transmembrane potential
  E has mV;
  // applied current
  I = 0;
  // sodium channel activation coefficient
  // m t=0 = α_m V=0 /(α_m V=0 + β_m V=0 )
  m = 0.052932;
  // sodium channel inactivation coefficient
  // h t=0 = α_h V=0 /(α_h V=0 + β_h V=0 )
  h = 0.59612;
  // potassium channel activation coefficient
  // n t=0 = α_n V=0 /(α_n V=0 + β_n V=0 )
  n = 0.31768;
  // resting membrane potential
  E_R = -75 mV;
  // membrane capacitance
  Cm = 1;
  // maximum sodium channel conductance
  g_Na = 120;
  // maximum potassium channel conductance
  g_K = 36;
  // maximum leakage conductance
  g_L = 0.3;
  // sodium equilibrium potential
  E_Na = -190 mV;
  // potassium equilibrium potential
  E_K = -63 mV;
  // leakage equilibrium potential
  E_L = -85.613 mV;
  // sodium potential displacement
  V_Na has mV;
  // potassium potential displacement
  V_K has mV;
  // leakage potential displacement
  V_L has mV;
  // membrane depolarisation
  var alpha_h; alpha_h is "auxiliary alpha_h";

  // Assignment rules:
  // V_neg = -V
  V_neg := -V;
  // E = V + E_R
  E := V + E_R;
  // V_L = E_L - E_R
  V_L := E_L - E_R;
  // beta_n = 0.125 * exp[V / 80.0]
  beta_n := 0.125*exp(V/80);
  // alpha_h = 0.07 * exp[V / 20.0]
  alpha_h := 0.07*exp(V/20);
  // V_Na = E_Na - E_R
  V_Na := E_Na - E_R;
  // V_K = E_K - E_R
  V_K := E_K - E_R;
  // i_K = g_K * n^4.0 * (V - V_K)
  i_K := g_K*n^4*(V - V_K);
  // i_Na = g_Na * m^3.0 * h * (V - V_Na)
  i_Na := g_Na*m^3*h*(V - V_Na);
  // i_L = g_L * (V - V_L)
  i_L := g_L*(V - V_L);
  // beta_m = 4.0 * exp[V / 18.0]
  beta_m := 4*exp(V/18);
  // alpha_n = 0.01 * (V + 10.0)/(exp[0.1 * (V + 10.0)] - 1.0)
  alpha_n := 0.01*(V + 10)/(exp((V + 10)/10) - 1);
  // alpha_m = 0.1 * (V + 25.0)/(exp[0.1 * (V + 25.0)] - 1.0)
  alpha_m := 0.1*(V + 25)/(exp((V + 25)/10) - 1);
  // beta_h = 1.0 /(exp[0.1 * (V + 30.0)] + 1.0)
  beta_h := 1/(exp((V + 30)/10) + 1);

  // Rate rules:
  // dV/dt = (I - (i_Na + i_K + i_L))/Cm
  V' = (I - (i_Na + i_K + i_L))/Cm;
  // dm/dt = alpha_m * (1.0 - m) - beta_m * m
  m' = alpha_m*(1 - m) - beta_m*m;
  // dh/dt = alpha_h * (1.0 - h) - beta_h * h
  h' = alpha_h*(1 - h) - beta_h*h;
  // dn/dt = alpha_n * (1.0 - n) - beta_n * n
  n' = alpha_n*(1 - n) - beta_n*n;

  // Unit definitions:
  unit time = 1e-3 second; time is "millisecond";
  unit mV = 1e-3 volt;
end
