// SBML level 2 version 4

model Model_1()
  // Vizan2013 - TGF pathway long term signaling
  // biomodels.db:MODEL1203120000
  // biomodels.db:BIOMD0000000499
  // isDescribedBy pubmed:24327760
  // biomodels.db:MODEL1203120000
  // biomodels.db:BIOMD0000000499
  // isDerivedFrom biomodels.db:BIOMD0000000173

  // Compartments:
  compartment Cell = 1;  // isVersionOf GO:0005623

  // Species:
  // total cellular homomeric S22 complexes
  species $S22 in Cell = 0;  // hasPart uniprot:Q15796
  // total cellular heteromeric S24 complexes
  species $S24 in Cell = 0;  // hasPart uniprot:Q15796 uniprot:Q13485
  // total cellular pS2
  species $pS2tot in Cell = 0;  // hasPart uniprot:Q15796 kegg.compound:C00562
  // TGFbeta
  species $TGF in Cell = Tmax_in_ng_ml*TSca;  // isVersionOf uniprot:P01137
  // nascent receptors
  species $R in Cell = (1 - rc0)/(alpha + 1);  // isVersionOf uniprot:P36897; occursIn GO:0005622
  // cytoplasmic, unphosphorylated Smad2
  species $S2c in Cell = S2tot*kex*(1 + a)/(kin + a*kex);  // isVersionOf uniprot:Q15796; occursIn GO:0005737
  // TGFb bound receptors
  species $Rcom in Cell = (rc0 + alpha)/(1 + alpha);  // isVersionOf uniprot:P36897; occursIn GO:0005622
  // Total cytoplasmic pS2
  species $pS2c in Cell = 0;  // hasPart uniprot:Q15796 kegg.compound:C00562; occursIn GO:0005737
  // mature, competent receptors
  species $Rcom_S in Cell;  // isVersionOf uniprot:P36897; occursIn GO:0016020
  // nuclear unphosphorylated Smad2
  species $S2n in Cell;  // isVersionOf uniprot:Q15796; occursIn GO:0005634
  // nuclear homomeric S22 complexes
  species $S22n in Cell;  // hasPart uniprot:Q15796; occursIn GO:0005634
  // total nuclear Smad4
  species $S4n in Cell;  // isVersionOf uniprot:Q13485; occursIn GO:0005634
  // cytoplasmic homomeric S22 complexes
  species $S22c in Cell = 0;  // hasPart uniprot:Q15796; occursIn GO:0005737
  // total nuclear pS2
  species $pS2n in Cell;  // hasPart uniprot:Q15796 kegg.compound:C00562; occursIn GO:0005634
  // monomeric nuclear pS2
  species $pS2fn in Cell;  // isVersionOf uniprot:Q15796; occursIn GO:0005634
  // nuclear heteromeric S24 complexes
  species $S24n in Cell;  // hasPart uniprot:Q15796 uniprot:Q13485; occursIn GO:0005634
  // cytoplasmic heteromeric S24 complexes
  species $S24c in Cell = 0;  // hasPart uniprot:Q15796 uniprot:Q13485; occursIn GO:0005737
  // monomeric cytoplasmic Smad4
  species $S4fc in Cell;  // isVersionOf uniprot:Q13485; occursIn GO:0005737
  // total cytoplasmic Smad4
  species $S4c in Cell = S4tot;  // hasPart uniprot:Q13485; occursIn GO:0005737
  // monomeric cytoplasmic pS2
  species $pS2fc in Cell;  // isVersionOf uniprot:Q15796; occursIn GO:0005737
  // monomeric nuclear Smad4
  species $S4fn in Cell;  // isVersionOf uniprot:Q13485; occursIn GO:0005634
  // Receptor inhibitor, either present or absent (1, 0)
  species SBI in Cell = 0;  // isVersionOf CHEBI:35222
  // total receptors
  species $Rtot in Cell;  // isVersionOf uniprot:P36897
  // active receptors
  species $RT in Cell = 0;  // isVersionOf uniprot:P36897
  species $Rcom_I in Cell;  // isVersionOf uniprot:P36897
  species $Ract in Cell = 0;  // isVersionOf uniprot:P36897

  // Parameters:
  // basal receptor degradation
  kd = 0.32;
  // Smad nuclear export
  kex = 20;
  // Smad nuclear import
  kin = 9.36;
  // receptor exocytosis
  alpha = 0.08;
  // Binary, Cycloheximide absent (0) or present (1)
  CHX = 0;
  kp = 21.3715;
  // dephosphorylation
  kdp = 24;
  // Smad complex off rate, 1 over the mean life time tau
  koff = 60;
  // Smad complex on rate
  var kon;
  // Smad complex dissociation
  var KDiss;
  // Complex import factor
  CIF = 5.7;
  // ratio of induced to basal receptor degradation
  D = 4;
  // Cyto/Nuc volume ratio
  a = 2.27;
  // Total S2 in the system
  S2tot = 1;
  // Total S4 in the system
  S4tot = 1;
  // fraction of total receptors that are competent and at the membrane in the absence of a signal. From this number, kexo and kdeg we calculate ken accordingly.
  rc0 = 0.05;
  // Dissociation constant of the SBI/receptor interaction
  KSBI = 0.196565;
  // receptor activation
  k_T = 100; k_T is "k'T";
  var kex4;
  var Total_Nuc_S2_for_fit;
  var Ktr;
  k_act = 24.5383; k_act is "k'act";
  Tmax_in_ng_ml = 2; Tmax_in_ng_ml is "Tmax in ng/ml";
  TSca = 2;
  k_cc = 0.35; k_cc is "k'cc";
  k_synT = 0; k_synT is "k'synT";
  k_synTbas = 0; k_synTbas is "k'synTbas";
  MG132 = 0;
  Initial_for_S2n = S2n;

  // Assignment rules:
  S24n := (a + 1)*S24 - a*S24c;
  S4fc := S4c - S24c;
  KDiss := 0.171;
  kon := koff/KDiss;
  kex4 := kin;
  Ktr := rc0/(1 - rc0)*((alpha + 1)/alpha);
  pS2fc := pS2c - 2*S22c - S24c;
  Rtot := R + Rcom + RT + Ract;
  Rcom_I := Rcom*(1/(1 + Ktr));
  Rcom_S := Rcom*(Ktr/(1 + Ktr));
  S2n := (a + 1)*(S2tot - pS2tot) - a*S2c;
  S22n := (a + 1)*S22 - a*S22c;
  S4n := (a + 1)*S4tot - a*S4c;
  S4fn := S4n - S24n;
  pS2n := (a + 1)*pS2tot - a*pS2c;
  pS2fn := pS2n - 2*S22n - S24n;
  Total_Nuc_S2_for_fit := (S2n + pS2n)/Initial_for_S2n;

  // Rate rules:
  S22' = 1/(1 + a)*(kon*(a*pS2fc^2 + pS2fn^2) - koff*(a*S22c + S22n));
  S24' = 1/(a + 1)*(kon*(a*S4fc*pS2fc + pS2fn*S4fn) - koff*(a*S24c + S24n));
  pS2tot' = 1/(1 + a)*(a*kp*Ract*(KSBI/(KSBI + SBI))*S2c - kdp*pS2fn);
  TGF' = kd*(k_synTbas + k_synT*S24n - (k_T*Rcom_S + k_cc)*TGF);
  R' = kd*((1 - CHX)*(1 - rc0) - (alpha + (1 - MG132))*R);
  S2c' = kex*S2n - (kin + kp*Ract*(KSBI/(KSBI + SBI)))*S2c;
  Rcom' = kd*(alpha*R - (1 - MG132)*Rcom_I - k_T*TGF*Rcom_S);
  pS2c' = kp*Ract*(KSBI/(KSBI + SBI))*S2c + kex*pS2fn - kin*(pS2fc + CIF*(S24c + 2*S22c));
  S22c' = kon*pS2fc^2 - (koff + kin*CIF)*S22c;
  S24c' = kon*S4fc*pS2fc - (koff + kin*CIF)*S24c;
  S4c' = kex4*S4fn - kin*(S4fc + CIF*S24c);
  RT' = kd*(k_T*TGF*Rcom_S - (k_act + D*(1 - MG132))*RT);
  Ract' = kd*(k_act*RT - D*(1 - MG132)*Ract);

  // Unit definitions:
  unit volume = dimensionless;
  unit time = 3600 second;
  unit substance = dimensionless;
end
