// SBML level 2 version 4

model voit03()
  // Voit2003_Trehalose_Cycle
  // Voit2003 - Trehalose Cycle
  // This model is described in the article:
  // Biochemical and genomic regulation of the trehalose cycle in yeast: review of observations and canonical model analysis.
  // Voit EO.
  // J. Theor. Biol. 2003 Jul; 223(1): 55-78
  // Abstract:
  // The physiological hallmark of heat-shock response in yeast is a rapid, enormous increase in the concentration of trehalose. Normally found in growing yeast cells and other organisms only as traces, trehalose becomes a crucial protector of proteins and membranes against a variety of stresses, including heat, cold, starvation, desiccation, osmotic or oxidative stress, and exposure to toxicants. Trehalose is produced from glucose 6-phosphate and uridine diphosphate glucose in a two-step process, and recycled to glucose by trehalases. Even though the trehalose cycle consists of only a few metabolites and enzymatic steps, its regulatory structure and operation are surprisingly complex. The article begins with a review of experimental observations on the regulation of the trehalose cycle in yeast and proposes a canonical model for its analysis. The first part of this analysis demonstrates the benefits of the various regulatory features by means of controlled comparisons with models of otherwise equivalent pathways lacking these features. The second part elucidates the significance of the expression pattern of the trehalose cycle genes in response to heat shock. Interestingly, the genes contributing to trehalose formation are up-regulated to very different degrees, and even the trehalose degrading trehalases show drastically increased activity during heat-shock response. Again using the method of controlled comparisons, the model provides rationale for the observed pattern of gene expression and reveals benefits of the counterintuitive trehalase up-regulation.
  // To induce a heat shock, set the parameter heat_shock from 0 to 1. This changes the parameter values of X8 to X19 from 1 to the values given in table 3 of the original publication.
  // As this is an S-systems model, it does not contain any reactions encoded in SBML.
  // This model is hosted on BioModels Database and identified by: BIOMD0000000266.
  // To cite BioModels Database, please use: BioModels Database: An enhanced, curated and annotated resource for published quantitative kinetic models.
  // To the extent possible under law, all copyright and related or neighbouring rights to this encoded model have been dedicated to the public domain worldwide. Please refer to CC0 Public Domain Dedication for more information.
  // biomodels.db:MODEL1007210000
  // biomodels.db:BIOMD0000000266
  // isDescribedBy pubmed:12782117
  // hasVersion GO:0033638
  // hasPart GO:0005978 GO:0005992
  // isPartOf kegg.pathway:sce00500

  // Compartments:
  compartment cell in external = 1;  // GO:0005622
  compartment external = 1;  // GO:0005576

  // Species:
  species $glucose_external in external = 1;  // CHEBI:17925
  species $glucose_cell in cell = 0.03;  // CHEBI:17925
  species $G6P in cell = 1;  // CHEBI:17665
  species $G1P in cell = 0.1;  // CHEBI:16077
  species $UDPG in cell = 0.7;  // CHEBI:18066
  species $glycogen in cell = 1;  // CHEBI:28087
  species $T6P in cell = 0.02;  // CHEBI:18283
  species $trehalose in cell = 0.05;  // CHEBI:16551

  // Parameters:
  heat_shock = 0 dimensionless;  // isVersionOf GO:0009408
  glucose_transport_into_cell has dimensionless;  // isVersionOf GO:0046323
  hexokinase_glucokinase has dimensionless; hexokinase_glucokinase is "hexokinase/glucokinase";
  phosphofructokinase has dimensionless;
  G6P_dehydrogenase has dimensionless;  // ec-code:1.1.1.49
  X12r has dimensionless; X12r is "phoshpoglucomutase";  // isVersionOf ec-code:5.4.2.2
  X12f has dimensionless; X12f is "phoshpoglucomutase";  // isVersionOf ec-code:5.4.2.2
  UDPG_pyrophosphorylase has dimensionless;  // ec-code:2.7.7.9
  glycogen_synthase has dimensionless;  // ec-code:2.4.1.11
  X15r has dimensionless; X15r is "glycogen phosphorylase";  // isVersionOf ec-code:2.4.1.1
  X15f has dimensionless; X15f is "glycogen phosphorylase";  // isVersionOf ec-code:2.4.1.1
  glycogen_use has dimensionless;  // isVersionOf GO:0005980
  alpha_alpha_T6P_synthase has dimensionless; alpha_alpha_T6P_synthase is "alpha,alpha-T6P synthase";  // ec-code:2.4.1.15
  alpha_alpha_T6P_phosphatase has dimensionless; alpha_alpha_T6P_phosphatase is "alpha,alpha--T6P phosphatase";  // ec-code:3.1.3.12
  trehalase has dimensionless;  // ec-code:3.2.1.28
  flux_X1_in has flux; flux_X1_in is "flux_to_glucose";
  flux_X1_out has flux; flux_X1_out is "flux_from_glucose";
  flux_X2_in has flux; flux_X2_in is "flux_to_G6P";
  flux_X2_out has flux; flux_X2_out is "flux_from_G6P";
  flux_X3_in has flux; flux_X3_in is "flux_to_G1P";
  flux_X3_out has flux; flux_X3_out is "flux_from_G1P";
  flux_X4_in has flux; flux_X4_in is "flux_to_UDPG";
  flux_X4_out has flux; flux_X4_out is "flux_from_UDPG";
  flux_X5_in has flux; flux_X5_in is "flux_to_glycogen";
  flux_X5_out has flux; flux_X5_out is "flux_from_glucogen";
  flux_X6_in has flux; flux_X6_in is "flux_to_T6P";
  flux_X6_out has flux; flux_X6_out is "flux_from_T6P";
  flux_X7_in has flux; flux_X7_in is "flux_to_trehalose";
  flux_X7_out has flux; flux_X7_out is "flux_from_trehalose";

  // Assignment rules:
  flux_X1_in := 31.912*glucose_external^0.968*G6P^(-0.194)*trehalose^0.00968*glucose_transport_into_cell^0.968*trehalase^0.0323;
  flux_X1_out := 89.935*glucose_cell^0.75*T6P^(-0.4)*hexokinase_glucokinase;
  flux_X2_in := 142.72*glucose_cell^0.517*G6P^(-0.179)*G1P^0.183*T6P^(-0.276)*hexokinase_glucokinase^0.689*X12r^0.311;
  flux_X2_out := 30.12*glucose_cell^(-0.00333)*G6P^0.575*G1P^(-0.17)*UDPG^0.00333*phosphofructokinase^0.5111*G6P_dehydrogenase^0.0667*X12f^0.411*alpha_alpha_T6P_synthase^0.0111;
  flux_X3_in := 7.8819*G6P^0.394*G1P^(-0.392)*UDPG^(-0.01)*glycogen^0.0128*X12f^0.949*X15r^0.0513;
  flux_X3_out := 76.434*G6P^(-0.412)*G1P^0.593*X12r^0.718*UDPG_pyrophosphorylase^0.18*X15f^0.103;
  flux_X4_in := 11.07*G1P^0.5*UDPG_pyrophosphorylase;
  flux_X4_out := 3.4556*glucose_cell^(-0.0429)*G6P^0.214*UDPG^0.386*glycogen_synthase^0.857*alpha_alpha_T6P_synthase^0.143;
  flux_X5_in := 11.06*G6P^0.04*G1P^0.32*UDPG^0.16*glycogen_synthase^0.6*X15f^0.4;
  flux_X5_out := 4.929*G6P^(-0.04)*UDPG^(-0.04)*glycogen^0.25*X15r^0.2*glycogen_use^0.8;
  flux_X6_in := 0.19424*glucose_cell^(-0.3)*G6P^0.3*UDPG^0.3*alpha_alpha_T6P_synthase;
  flux_X6_out := 1.0939*T6P^0.2*alpha_alpha_T6P_phosphatase;
  flux_X7_in := 1.0939*T6P^0.2*alpha_alpha_T6P_phosphatase;
  flux_X7_out := 1.2288*trehalose^0.3*trehalase;
  glucose_transport_into_cell := piecewise(8, heat_shock == 1, 1);
  hexokinase_glucokinase := piecewise(1, heat_shock == 8, 1);
  phosphofructokinase := piecewise(1, heat_shock == 1, 1);
  G6P_dehydrogenase := piecewise(1, heat_shock == 6, 1);
  X12f := piecewise(1, heat_shock == 16, 1);
  X12r := piecewise(16, heat_shock == 1, 1);
  UDPG_pyrophosphorylase := piecewise(16, heat_shock == 1, 1);
  glycogen_synthase := piecewise(1, heat_shock == 16, 1);
  X15f := piecewise(1, heat_shock == 50, 1);
  X15r := piecewise(50, heat_shock == 1, 1);
  glycogen_use := piecewise(16, heat_shock == 1, 1);
  alpha_alpha_T6P_synthase := piecewise(1, heat_shock == 12, 1);
  alpha_alpha_T6P_phosphatase := piecewise(18, heat_shock == 1, 1);
  trehalase := piecewise(1, heat_shock == 6, 1);

  // Rate rules:
  glucose_cell' = flux_X1_in - flux_X1_out;
  G6P' = flux_X2_in - flux_X2_out;
  G1P' = flux_X3_in - flux_X3_out;
  UDPG' = flux_X4_in - flux_X4_out;
  glycogen' = flux_X5_in - flux_X5_out;
  T6P' = flux_X6_in - flux_X6_out;
  trehalose' = flux_X7_in - flux_X7_out;

  // Unit definitions:
  unit substance = 1e-3 mole; substance is "milimole";
  unit time = 60 second; time is "minutes";
  unit flux = 1e-3 mole / (60 second * litre); flux is "mM per minute";
  unit mM = 1e-3 mole / litre;
end
